# OpenSim document version 10600
ForwardTool block_hanging_from_muscle:
  model_file: block_hanging_from_muscle.osim
  replace_force_set: false
  results_directory: block_hanging_from_muscle_ForwardResults
  output_precision: 20
  initial_time: 0
  final_time: 5
  solve_for_equilibrium_for_auxiliary_states: true
  maximum_number_of_integrator_steps: 30000
  maximum_integrator_step_size: 1
  minimum_integrator_step_size: 0.0000000001
  integrator_error_tolerance: 1e-7
  states_file: block_hanging_from_muscle_InitialStates.sto
  use_specified_dt: false
  output_detailed_results: false
  ControllerSet:
    ControlSetController: controls_file=block_hanging_from_muscle_controls.xml
