Model:
  DynamicsEngine:
    SimbodyEngine: gravity=(0 -10 0)
      BodySet:
        SimbodyBody ground: mass=0 mass_center=(0 0 0) inertia=(0 0 0 0 0 0 0 0 0)
        SimbodyBody Pendulum: mass=2 mass_center=(0 -0.5 0) inertia=(1 0 0 0 1 0 0 0 1)
      JointSet:
        SimbodyJoint GroundJoint: bodies=(ground Pendulum) location_in_parent=(20 0 0) location_in_child=(0 0.5 0)
          DofSet:
            SimbodyTranslationDof tx:
              Value: Constant(value=20)
            SimbodyTranslationDof tz: coordinate=Pendulum_tz
              Value
            SimbodyRotationDof r1: coordinate=Pendulum_r1 axis=(1 0 0)
              Value
            SimbodyRotationDof r2: coordinate=Pendulum_r2 axis=(0 1 0)
              Value
            SimbodyRotationDof r3: coordinate=Pendulum_r3 axis=(0 0 1)
              Value
      SimbodyCoordinate Pendulum_tz: default_value=0 initial_value=0 tolerance=0 stiffness=0 range=(-999999.9 999999.9)
          clamped=true restraint_active=true
      SimbodyCoordinate Pendulum_r1: default_value=0 initial_value=0.1 tolerance=0 stiffness=0
          range=(-999999.9 999999.9) clamped=true restraint_active=true
      SimbodyCoordinate Pendulum_r2: default_value=0 initial_value=0 tolerance=0 stiffness=0 range=(-999999.9 999999.9)
          clamped=true restraint_active=true
      SimbodyCoordinate Pendulum_r3: default_value=0 initial_value=0 tolerance=0 stiffness=0 range=(-999999.9 999999.9)
          clamped=true restraint_active=true
      SpeedSet:
        SimbodySpeed Pendulum_tz_u: default_value=0 coordinate=Pendulum_tz
        SimbodySpeed Pendulum_r1_u: default_value=0 coordinate=Pendulum_r1
        SimbodySpeed Pendulum_r2_u: default_value=0 coordinate=PendulumPin2
        SimbodySpeed Pendulum_r3_u: default_value=0 coordinate=Pendulum_r3
