# OpenSim document version 20303
Model tugOfWar:
  length_units: meters
  force_units: N
  gravity: 0 -9.80665 0
  BodySet:
    Body ground: mass=0 mass_center=(0 0 0) inertia_xx=1 inertia_yy=1 inertia_zz=1
        meshes=(ground.vtp anchor1.vtp anchor2.vtp)
    Body block: mass=20 mass_center=(0 0 0) inertia_xx=0.1333333 inertia_yy=0.1333333 inertia_zz=0.1333333
        meshes=block.vtp
      FreeJoint blockToGround: parent_body=ground location_in_parent=(0 0.05 0) location=(0 0 0)
        Coordinate blockToGround_xRotation: motion_type=rotational range=(-1.570796 1.570796)
        Coordinate blockToGround_yRotation: motion_type=rotational range=(-1.570796 1.570796)
        Coordinate blockToGround_zRotation: motion_type=rotational range=(-1.570796 1.570796)
        Coordinate blockToGround_xTranslation: motion_type=translational range=(-1 1)
        Coordinate blockToGround_yTranslation: motion_type=translational range=(-1 1)
        Coordinate blockToGround_zTranslation: motion_type=translational range=(-1 1)
  ConstraintSet:
    ConstantDistanceConstraint: body_1=ground body_2=block location_body_1=(0 0.05 0) location_body_2=(0 0 0)
        constant_distance=0.2
  ForceSet:
    Thelen2003Muscle muscle1: min_control=0 max_control=1 max_isometric_force=1000 optimal_fiber_length=0.25
        tendon_slack_length=0.1 pennation_angle_at_optimal=0 [radians] default_activation=1 default_fiber_length=0.25
      PathPoint point1: ground (0 0.05 -0.35)
      PathPoint point2: block (0 0 -0.05)
    Thelen2003Muscle muscle2: min_control=0 max_control=1 max_isometric_force=1000 optimal_fiber_length=0.25
        tendon_slack_length=0.1 pennation_angle_at_optimal=0 default_activation=0.05 default_fiber_length=0.25
      PathPoint point1: ground (0 0.05 0.35)
      PathPoint point2: block (0 0 0.05)
    ElasticFoundationForce contactForce:
      ContactParametersSet contact_parameters:
        ContactParameters: geometry=(cube floor) stiffness=10000000 dissipation=0.1 static_friction=0.2
            dynamic_friction=0.2 viscous_friction=0.01
    PrescribedForce: body=block
      FunctionSet forceFunctions: PiecewiseLinearFunction(x=0 3, y=0 588.399) Constant(value=0) Constant(value=0)
      FunctionSet pointFunctions: Constant(value=0) Constant(value=0) Constant(value=0)
  ContactGeometrySet:
    ContactHalfSpace floor: body_name=ground location=(0 0 0) orientation=(0 0 -1.570796)
    ContactMesh cube: body_name=block location=(0 0 0) filename=blockRemesh192.obj
  ControllerSet Controllers:
    PrescribedController: actuator_list=(muscle1 muscle2)
      FunctionSet ControlFunctions: LinearFunction(coefficients=-0.333333 1) LinearFunction(coefficients=0.316667 0.05)
