# OpenSim document version 30000
Model tugOfWar:
  length_units: meters
  force_units: N
  gravity: 0 -9.80665 0
  credits:
    Author: The OpenSim Teams
    License:
    Creative Commons (CCBY 3.0). You are free to distribute, remix, tweak, and build upon this work, even commercially,
    as long as you credit us for the original creation.
    http://creativecommons.org/licenses/by/3.0/
  BodySet:
    Body ground: mass=0 mass_center=(0 0 0) inertia_xx=1 inertia_yy=1 inertia_zz=1
        meshes=(checkered_floor.vtp block.vtp)
    Body block: mass=20 mass_center=(0 0 0) inertia_xx=0.1333333 inertia_yy=0.1333333 inertia_zz=0.1333333
        meshes=block.vtp
      FreeJoint blockToGround: parent_body=ground location_in_parent=(0 0.05 0) location=(0 0 0)
        Coordinate blockToGround_xRotation: motion_type=rotational default_value=0 range=(-1.570796 1.570796)
            clamped=false
        Coordinate blockToGround_yRotation: motion_type=rotational default_value=0 range=(-1.570796 1.570796)
            clamped=false
        Coordinate blockToGround_zRotation: motion_type=rotational default_value=0 range=(-1.570796 1.570796)
            clamped=false
        Coordinate blockToGround_xTranslation: motion_type=translational default_value=0 range=(-1 1) clamped=false
        Coordinate blockToGround_yTranslation: motion_type=translational default_value=0 range=(-1 1) clamped=false
        Coordinate blockToGround_zTranslation: motion_type=translational default_value=0 range=(-1 1) clamped=false
  ForceSet:
    Millard2012EquilibriumMuscle fatigable: min_control=0 max_control=1 max_isometric_force=1000
        optimal_fiber_length=0.2 tendon_slack_length=0.1 pennation_angle_at_optimal=0 [radians]
        default_fiber_length=0.2 default_activation=0.01 fatigue_factor=0.3 recovery_factor=0.2
      PathPoint muscle1-point1: ground (0 0.05 -0.35)
      PathPoint muscle1-point2: block (0 0 -0.05)
      MuscleFirstOrderActivationDynamicModel:
        minimum_activation: 0.01
      ActiveForceLengthCurve
      ForceVelocityInverseCurve
      FiberForceLengthCurve
      TendonForceLengthCurve
    Millard2012EquilibriumMuscle original: min_control=0 max_control=1 max_isometric_force=1000
        optimal_fiber_length=0.2 tendon_slack_length=0.1 pennation_angle_at_optimal=0 default_fiber_length=0.2
        default_activation=0.01
      PathPoint muscle2-point1: ground (0 0.05 0.35)
      PathPoint muscle2-point2: block (0 0 0.05)
      MuscleFirstOrderActivationDynamicModel:
        minimum_activation: 0.01
      ActiveForceLengthCurve
      ForceVelocityInverseCurve
      FiberForceLengthCurve
      TendonForceLengthCurve
  ControllerSet Controllers:
    PrescribedController: actuator_list=(fatigable original)
      FunctionSet ControlFunctions: Constant(value=1) Constant(value=1)
