# OpenSim document version 10600
Model Wrist Model:
  credits: Gonzalez, R.V., Buchanan, T.S., Delp, S.L.
  angle_units: radians
  publications:
    How muscle architecture and moment arms affect wrist flexion-extension moments. Journal of Biomechanics, vol. 30, pp. 705-712, 1997.
  defaults: Schutte1993Muscle defaultmuscle: max_isometric_force=546 optimal_fiber_length=0.0535
      tendon_slack_length=0.078 pennation_angle=0.1396263 max_contraction_velocity=10
    tendon_force_length_curve: natCubicSpline: x=(-10 -0.002 -0.001 0 0.00131 0.00281 0.00431 0.00581 0.00731 0.00881 0.0103 0.0118 0.0123 9.2 9.201 9.202 20)
        y=(0 0 0 0 0.0108 0.0257 0.0435 0.0652 0.0915 0.123 0.161 0.208 0.227 345 345 345 345)
    active_force_length_curve: natCubicSpline: x=(-35 0 0.401 0.402 0.4035 0.52725 0.62875 0.71875 0.86125 1.045 1.2175 1.43875 1.61875 1.62 1.621 2.2 35)
        y=(0 0 0 0 0 0.226667 0.636667 0.856667 0.95 0.993333 0.77 0.246667 0 0 0 0 0)
    passive_force_length_curve: natCubicSpline: x=(-35 0.998 0.999 1.15 1.25 1.35 1.45 1.55 1.65 1.75 1.7501 1.7502 35)
        y=(0 0 0 0 0.035 0.12 0.26 0.55 1.17 2 2 2 2)
  ActuatorSet:
    ObjectGroup transfer: members=(ECU_pre-surgery ECRB)
    ObjectGroup final: members=ECU_post-surgery
    ObjectGroup flexors: members=(APL EPB FCR FCU FDPI FDPL FDPM FDPR FDSI FDSL FDSM FDSR FPL PL)
    ObjectGroup extensors: members=(ECRB ECRL ECU_pre-surgery EDCI EDCL EDCM EDCR EDM EIP EPL)
    ObjectGroup ulnar deviators: members=(ECU_pre-surgery EDCL EDCR EDM FCU FDPL FDPM FDPR FDSL FDSR)
    ObjectGroup radial deviators: members=(APL ECRB ECRL EDCI EIP EPB EPL FCR FDPI FDSI FPL PL)
    ObjectGroup wrist: members=(ECRB ECRL ECU_pre-surgery FCR FCU)
    ObjectGroup hand: members=(EDCI EDCL EDCM EDCR EDM EIP FDPI FDPL FDPM FDPR FDSI FDSL FDSM FDSR FPL PL)
    ObjectGroup thumb: members=(APL EPB EPL)
    Schutte1993Muscle ECU_pre-surgery: max_isometric_force=117 optimal_fiber_length=0.0622 tendon_slack_length=0.231
        pennation_angle=0.06108652
      MusclePoint: humerus (0.02268 -0.26804 0.06679)
      MusclePoint: radius (-0.00239 -0.01019 0.01329)
      MusclePoint: radius (-0.01094 -0.03546 0.01362)
      MusclePoint: ulna (-0.02457 -0.09422 0.03348)
      MusclePoint: ulna (-0.02793 -0.23106 0.05873)
      MusclePoint: triquetrum (-0.00094 -0.00436 -0.00442)
      MusclePoint: metacarpal5 (-0.00458 -0.00734 -0.02848)
    Schutte1993Muscle ECU_post-surgery: max_isometric_force=117 optimal_fiber_length=0.0622 tendon_slack_length=0.231
        pennation_angle=0.06108652
      MusclePoint: humerus (0.02268 -0.26804 0.06679)
      MusclePoint: radius (-0.00239 -0.01019 0.01329)
      MusclePoint: radius (-0.01094 -0.03546 0.01362)
      MusclePoint: ulna (-0.02457 -0.09422 0.03348)
      MusclePoint: ulna (-0.02463 -0.1364 0.04159)
      MusclePoint: ulna (-0.02953 -0.18933 0.07846)
      MusclePoint: radius (-0.01789 -0.19788 0.06459)
      MusclePoint: radius (-0.01779 -0.20954 0.07234)
      MusclePoint: trapezoid (-0.01575 0.00302 0.00216)
      MusclePoint: metacarpal3 (-0.01502 -0.00464 0.01507)
    Schutte1993Muscle FCR: max_isometric_force=59.7 optimal_fiber_length=0.0628 tendon_slack_length=0.2185
        pennation_angle=0.05410521
      MusclePoint: humerus (0.00639 -0.27761 0.01313)
      MusclePoint: radius (0.00953 -0.21667 0.05024)
      MusclePoint: trapezoid (0.01395 -0.0012 -0.0067)
      MusclePoint: metacarpal2 (0.00592 0.00269 0.01328)
    Schutte1993Muscle FCU: max_isometric_force=102.6 optimal_fiber_length=0.0509 tendon_slack_length=0.242
        pennation_angle=0.2111848
      MusclePoint: humerus (0.00463 -0.27768 0.01318)
      MuscleViaPoint: ulna (-0.00465 -0.22771 0.05589) coordinate=flexion range=(0.5585054 1.570796)
      MuscleViaPoint: ulna (-0.01368 -0.22899 0.05805) coordinate=flexion range=(-1.570796 -0.6283185)
      MuscleViaPoint: hamate (0.01901 0.0109 0.00261) coordinate=flexion range=(-1.570796 -0.03490659)
      MuscleViaPoint: hamate (0.01899 0.0024 0.0012) coordinate=flexion range=(-1.570796 0.5585054)
      MusclePoint: metacarpal5 (0.00845 -0.0091 -0.01963)
    Schutte1993Muscle EDM: max_isometric_force=28.8 optimal_fiber_length=0.0675 tendon_slack_length=0.347
        pennation_angle=0.05235988
      MusclePoint: humerus (0.02257 -0.26792 0.06683)
      MusclePoint: radius (-0.00523 -0.01802 0.01357)
      MusclePoint: radius (-0.01075 -0.07282 0.01237)
      MusclePoint: ulna (-0.03277 -0.22628 0.07769)
      MuscleViaPoint: triquetrum (-0.00965 -0.00461 0.00733) coordinate=deviation range=(0 0)
      MusclePoint: metacarpal5 (-0.00895 -0.00546 -0.02267)
      MusclePoint: metacarpal5 (-0.00709 -0.06329 -0.03424)
      MusclePoint: littlefinger (-0.00281 -0.10702 -0.03713)
      MusclePoint: littlefinger (-0.00027 -0.13243 -0.0357)
    Schutte1993Muscle ECRB: max_isometric_force=122.9 optimal_fiber_length=0.0585 tendon_slack_length=0.2205
        pennation_angle=0.1553343
      MusclePoint: humerus (0.02254 -0.26813 0.06679)
      MusclePoint: radius (-0.00384 -0.1248 0.05482)
      MusclePoint: radius (-0.01733 -0.20892 0.0704)
      MusclePoint: trapezoid (-0.01598 0.00257 0.00197)
      MusclePoint: metacarpal3 (-0.01528 -0.00506 0.01554)
    Schutte1993Muscle ECRL: max_isometric_force=65.7 optimal_fiber_length=0.0936 tendon_slack_length=0.2026
        pennation_angle=0.04363323
      MusclePoint: humerus (0.01337 -0.26111 0.07069)
      MusclePoint: humerus (0.02239 -0.26834 0.06679)
      MusclePoint: radius (-0.00136 -0.12953 0.05532)
      MusclePoint: radius (-0.0083 -0.21052 0.0752)
      MuscleViaPoint: metacarpal2 (-0.01349 0.01118 0.02204) coordinate=deviation range=(0 0)
      MusclePoint: metacarpal2 (-0.01108 -0.01106 0.02568)
    Schutte1993Muscle FDSI: max_isometric_force=51.3 optimal_fiber_length=0.0835 tendon_slack_length=0.338
        pennation_angle=0.1047198
      MusclePoint: humerus (0.0035 -0.29455 0.03226)
      MuscleViaPoint: radius (0.01091 -0.21436 0.04048) coordinate=flexion range=(0.4363323 1.570796)
      MuscleViaPoint: radius (0.00183 -0.21671 0.04253) coordinate=flexion range=(-1.570796 -0.08726646)
      MuscleViaPoint: capitate (0.02244 0.01397 0.00139) coordinate=flexion range=(-1.570796 -0.715585)
      MuscleViaPoint: capitate (0.02703 0.00411 0.00444) coordinate=flexion range=(-1.570796 -0.3316126)
      MusclePoint: capitate (0.02944 -0.01143 0.00869)
      MusclePoint: metacarpal2 (0.01297 -0.01437 0.02183)
      MusclePoint: metacarpal2 (0.00543 -0.06688 0.04728)
      MusclePoint: proximal_phalanx (0.00596 -0.04624 0.00883)
      MusclePoint: distal_phalanx (0.00581 -0.0059 0.00263)
    Schutte1993Muscle FDSM: max_isometric_force=75.9 optimal_fiber_length=0.0749 tendon_slack_length=0.354
        pennation_angle=0.122173
      MusclePoint: humerus (0.0035 -0.29455 0.03226)
      MuscleViaPoint: radius (0.01048 -0.21423 0.03978) coordinate=flexion range=(0.4363323 1.570796)
      MuscleViaPoint: radius (0.0019 -0.2167 0.0438) coordinate=flexion range=(-1.570796 -0.08726646)
      MuscleViaPoint: capitate (0.02277 0.01364 0.00172) coordinate=flexion range=(-1.570796 -0.6981317)
      MuscleViaPoint: capitate (0.0269 0.0054 0.0037) coordinate=flexion range=(-1.570796 -0.3490659)
      MusclePoint: capitate (0.03 -0.0118 0.0084)
      MusclePoint: metacarpal3 (0.0144 -0.01632 0.01008)
      MusclePoint: metacarpal3 (0.00429 -0.08012 0.01596)
      MusclePoint: midfinger (-0.00048 -0.12516 0.01851)
      MusclePoint: midfinger (0.00028 -0.17254 0.02483)
    Schutte1993Muscle FDSR: max_isometric_force=48.3 optimal_fiber_length=0.0736 tendon_slack_length=0.3535
        pennation_angle=0.06981317
      MusclePoint: humerus (0.0035 -0.29455 0.03226)
      MuscleViaPoint: radius (0.01037 -0.21504 0.03862) coordinate=flexion range=(0.4363323 1.570796)
      MuscleViaPoint: radius (-0.00037 -0.21764 0.0409) coordinate=flexion range=(-1.570796 -0.08726646)
      MuscleViaPoint: capitate (0.02189 0.01306 0.00048) coordinate=flexion range=(-1.570796 -0.6981317)
      MuscleViaPoint: capitate (0.02545 0.00479 0.0023) coordinate=flexion range=(-1.570796 -0.3490659)
      MusclePoint: capitate (0.0289 -0.0155 0.0073)
      MusclePoint: metacarpal3 (0.0144 -0.0252 -0.00101)
      MusclePoint: metacarpal4 (0.00807 -0.07635 -0.00696)
      MusclePoint: ringfinger (0.0033 -0.12455 -0.00441)
      MusclePoint: ringfinger (0.00672 -0.17283 0.00102)
    Schutte1993Muscle FDSL: max_isometric_force=12 optimal_fiber_length=0.0515 tendon_slack_length=0.343
        pennation_angle=0.08726646
      MusclePoint: humerus (0.0035 -0.29455 0.03226)
      MuscleViaPoint: radius (0.01048 -0.21423 0.03978) coordinate=flexion range=(0.4799655 1.570796)
      MuscleViaPoint: radius (0.001 -0.2177 0.0418) coordinate=flexion range=(-1.570796 0.01745329)
      MuscleViaPoint: capitate (0.02201 0.01258 -0.00027) coordinate=flexion range=(-1.570796 -0.6981317)
      MuscleViaPoint: capitate (0.0255 0.0021 0.0025) coordinate=flexion range=(-1.570796 -0.3490659)
      MusclePoint: capitate (0.0268 -0.0129 0.0061)
      MusclePoint: metacarpal4 (0.01463 -0.02498 -0.01151)
      MusclePoint: metacarpal5 (0.00674 -0.06152 -0.0347)
      MusclePoint: littlefinger (0.0073 -0.10135 -0.0357)
      MusclePoint: littlefinger (0.00983 -0.13986 -0.03115)
    Schutte1993Muscle FDPI: max_isometric_force=53.1 optimal_fiber_length=0.0749 tendon_slack_length=0.322
        pennation_angle=0.122173
      MusclePoint: ulna (-0.0113 -0.03157 0.00208)
      MuscleViaPoint: radius (0.00797 -0.21647 0.04395) coordinate=flexion range=(0.3490659 1.570796)
      MuscleViaPoint: radius (0.0013 -0.21659 0.04619) coordinate=flexion range=(-1.570796 0.01745329)
      MuscleViaPoint: capitate (0.02269 0.01117 0.00347) coordinate=flexion range=(-1.570796 -0.3839724)
      MuscleViaPoint: capitate (0.02499 0.00065 0.00589) coordinate=flexion range=(-1.570796 -0.3839724)
      MusclePoint: metacarpal2 (0.013 -0.0048 0.01072)
      MusclePoint: metacarpal2 (0.00363 -0.06662 0.0449)
      MusclePoint: proximal_phalanx (0.00494 -0.0506 0.00914)
      MusclePoint: mid_phalanx (0.0095 -0.03028 0.00343)
    Schutte1993Muscle FDPM: max_isometric_force=66.9 optimal_fiber_length=0.0835 tendon_slack_length=0.32
        pennation_angle=0.1047198
      MusclePoint: ulna (-0.0113 -0.03157 0.00208)
      MuscleViaPoint: radius (0.00433 -0.21689 0.0427) coordinate=flexion range=(0.2792527 1.570796)
      MuscleViaPoint: radius (-0.00152 -0.21639 0.04445) coordinate=flexion range=(-1.570796 0)
      MuscleViaPoint: capitate (0.02125 0.01055 0.00154) coordinate=flexion range=(-1.570796 -0.4363323)
      MuscleViaPoint: capitate (0.02346 0.00125 0.00384) coordinate=flexion range=(-1.570796 -0.1745329)
      MusclePoint: metacarpal3 (0.01168 -0.00745 0.00755)
      MusclePoint: metacarpal3 (0.00765 -0.07598 0.01288)
      MusclePoint: midfinger (0.00087 -0.1259 0.01853)
      MusclePoint: midfinger (0.00142 -0.16485 0.0224)
    Schutte1993Muscle FDPR: max_isometric_force=51.6 optimal_fiber_length=0.0798 tendon_slack_length=0.314
        pennation_angle=0.122173
      MusclePoint: ulna (-0.0113 -0.03157 0.00208)
      MuscleViaPoint: radius (0.00438 -0.21834 0.03741) coordinate=flexion range=(0.3141593 1.570796)
      MuscleViaPoint: radius (-0.00261 -0.217 0.04286) coordinate=flexion range=(-1.570796 -0.3141593)
      MuscleViaPoint: capitate (0.0238 0.01117 -0.00097) coordinate=flexion range=(-1.570796 -0.4363323)
      MuscleViaPoint: capitate (0.02829 0.00175 0.00473) coordinate=flexion range=(-1.570796 0.1745329)
      MusclePoint: metacarpal3 (0.01263 -0.0153 0.00166)
      MusclePoint: metacarpal4 (0.00788 -0.07665 -0.0056)
      MusclePoint: ringfinger (0.00288 -0.12885 -0.0044)
      MusclePoint: ringfinger (0.00609 -0.15981 -0.0023)
    Schutte1993Muscle FDPL: max_isometric_force=66 optimal_fiber_length=0.0749 tendon_slack_length=0.3036
        pennation_angle=0.1396263
      MusclePoint: ulna (-0.0113 -0.03157 0.00208)
      MuscleViaPoint: radius (0.00377 -0.21886 0.03584) coordinate=flexion range=(0.3490659 1.570796)
      MuscleViaPoint: radius (-0.0015 -0.217 0.0433) coordinate=flexion range=(-1.570796 -0.296706)
      MuscleViaPoint: capitate (0.02424 0.01233 0.0008) coordinate=flexion range=(-1.570796 -0.4363323)
      MuscleViaPoint: capitate (0.02829 0.00175 0.00473) coordinate=flexion range=(-1.570796 0.2)
      MusclePoint: metacarpal4 (0.01286 -0.01597 -0.00617)
      MusclePoint: metacarpal5 (0.00655 -0.06359 -0.03689)
      MusclePoint: littlefinger (0.00865 -0.10564 -0.03479)
      MusclePoint: littlefinger (0.0092 -0.13216 -0.03269)
    Schutte1993Muscle EDCL: max_isometric_force=18 optimal_fiber_length=0.065 tendon_slack_length=0.3495
        pennation_angle=0.03490659
      MusclePoint: humerus (0.01056 -0.26789 0.07127)
      MusclePoint: radius (-0.0082 -0.04004 0.01668)
      MusclePoint: radius (-0.01974 -0.18469 0.04807)
      MusclePoint: radius (-0.02211 -0.21097 0.05287)
      MuscleViaPoint: scaphoid (-0.01357 -0.0079 -0.01241) coordinate=deviation range=(0 0)
      MuscleViaPoint: capitate (-0.00192 -0.01151 0.00084) coordinate=deviation range=(0 0)
      MuscleViaPoint: metacarpal3 (-0.01096 -0.02472 -0.01035) coordinate=flexion range=(-0.06981317 1.745329)
      MusclePoint: metacarpal5 (-0.00801 -0.06389 -0.03508)
      MusclePoint: littlefinger (-0.00303 -0.10372 -0.03765)
      MusclePoint: littlefinger (0.00129 -0.13957 -0.03333)
    Schutte1993Muscle EDCR: max_isometric_force=38.7 optimal_fiber_length=0.0626 tendon_slack_length=0.39
        pennation_angle=0.05235988
      MusclePoint: humerus (0.01011 -0.26789 0.07127)
      MusclePoint: radius (-0.0082 -0.04004 0.01668)
      MusclePoint: radius (-0.01766 -0.18446 0.04898)
      MusclePoint: radius (-0.02021 -0.21054 0.05596)
      MuscleViaPoint: scaphoid (-0.01286 -0.0042 -0.01106) coordinate=deviation range=(0 0)
      MuscleViaPoint: metacarpal3 (-0.00903 0.00837 -0.00741) coordinate=flexion range=(0.2268928 1.745329)
      MusclePoint: metacarpal4 (-0.01378 -0.07606 -0.01001)
      MusclePoint: ringfinger (-0.0088 -0.12604 -0.00859)
      MusclePoint: ringfinger (-0.00093 -0.16987 -0.00249)
    Schutte1993Muscle EDCM: max_isometric_force=45.9 optimal_fiber_length=0.0724 tendon_slack_length=0.39
        pennation_angle=0.05235988
      MusclePoint: humerus (0.01011 -0.26789 0.07127)
      MusclePoint: radius (-0.0082 -0.04004 0.01668)
      MusclePoint: radius (-0.01675 -0.18466 0.04682)
      MusclePoint: radius (-0.01933 -0.21054 0.05152)
      MuscleViaPoint: scaphoid (-0.01198 -0.00332 -0.01283) coordinate=deviation range=(0 0)
      MuscleViaPoint: metacarpal3 (-0.01257 0.00659 -0.00208) coordinate=flexion range=(-0.3490659 1.745329)
      MusclePoint: metacarpal3 (-0.01348 -0.07696 0.01108)
      MusclePoint: midfinger (-0.01347 -0.13109 0.01966)
      MusclePoint: midfinger (-0.00737 -0.17492 0.02576)
    Schutte1993Muscle EDCI: max_isometric_force=23.4 optimal_fiber_length=0.07 tendon_slack_length=0.385
        pennation_angle=0.05235988
      MusclePoint: humerus (0.01011 -0.26789 0.07127)
      MusclePoint: radius (-0.0082 -0.04004 0.01668)
      MusclePoint: radius (-0.02209 -0.18446 0.04898)
      MusclePoint: radius (-0.02376 -0.21054 0.0533)
      MuscleViaPoint: scaphoid (-0.01359 -0.00761 -0.01108) coordinate=deviation range=(0 0)
      MuscleViaPoint: capitate (-0.00196 -0.00655 0.00232) coordinate=deviation range=(0 0)
      MuscleViaPoint: metacarpal3 (-0.01421 -0.01886 0.0078) coordinate=flexion range=(0.01745329 1.745329)
      MusclePoint: metacarpal2 (-0.01225 -0.06926 0.04042)
      MusclePoint: proximal_phalanx (-0.00658 -0.04852 0.0044)
      MusclePoint: distal_phalanx (-0.00291 -0.01043 0.00007)
    Schutte1993Muscle FPL: max_isometric_force=62.4 optimal_fiber_length=0.0552 tendon_slack_length=0.1988
        pennation_angle=0.122173
      MusclePoint: radius (-0.00284 -0.09605 0.02992)
      MusclePoint: radius (-0.00166 -0.13532 0.04257)
      MusclePoint: radius (-0.00037 -0.16882 0.04439)
      MuscleViaPoint: radius (0.00345 -0.21433 0.04621) coordinate=flexion range=(-1.570796 0.1745329)
      MuscleViaPoint: thumb (0.00577 0.01018 -0.01528) coordinate=flexion range=(-1.570796 0.01745329)
      MusclePoint: thumb (0.0063 -0.0177 0.0199)
      MusclePoint: thumb (0.00009 -0.04175 0.03446)
      MusclePoint: thumb (0.00081 -0.04594 0.03877)
      MusclePoint: thumb (0.00577 -0.06923 0.04948)
      MusclePoint: thumb (0.00493 -0.07776 0.05542)
    Schutte1993Muscle APL: max_isometric_force=57.9 optimal_fiber_length=0.0713 tendon_slack_length=0.125
        pennation_angle=0.1308997
      MusclePoint: radius (-0.00494 -0.09677 0.03004)
      MusclePoint: radius (-0.00892 -0.13772 0.05255)
      MusclePoint: radius (-0.0066 -0.15947 0.06132)
      MusclePoint: radius (-0.00682 -0.17731 0.06462)
      MusclePoint: radius (-0.00282 -0.20831 0.07607)
      MuscleViaPoint: radius (0.00117 -0.21506 0.07845) coordinate=flexion range=(-1.570796 -0.4712389)
      MuscleViaPoint: trapezium (0.00722 0.00906 0.01082) coordinate=flexion range=(-1.570796 0.7853982)
      MusclePoint: thumb (0.00384 0.00196 0.01452)
      MusclePoint: thumb (0.00816 -0.02324 0.03082)
    Schutte1993Muscle EPB: max_isometric_force=14.1 optimal_fiber_length=0.0675 tendon_slack_length=0.11
        pennation_angle=0.1256637
      MusclePoint: radius (-0.00294 -0.13573 0.04196)
      MusclePoint: radius (-0.00701 -0.14896 0.04387)
      MusclePoint: radius (-0.01283 -0.17881 0.05817)
      MusclePoint: radius (-0.00547 -0.19041 0.06961)
      MusclePoint: radius (0.00469 -0.21769 0.0756)
      MuscleViaPoint: trapezium (-0.00078 0.00458 0.01475) coordinate=flexion range=(-1.570796 -0.3490659)
      MusclePoint: thumb (-0.00387 0.00011 0.01647)
      MusclePoint: thumb (0.00452 -0.02214 0.03593)
      MusclePoint: thumb (0.0073 -0.03012 0.04408)
      MusclePoint: thumb (0.00871 -0.03603 0.048)
    Schutte1993Muscle EPL: max_isometric_force=44.1 optimal_fiber_length=0.054 tendon_slack_length=0.22
        pennation_angle=0.1047198
      MusclePoint: ulna (-0.02127 -0.0916 0.03268)
      MusclePoint: radius (-0.01652 -0.16952 0.03814)
      MusclePoint: radius (-0.01762 -0.20537 0.0523)
      MusclePoint: scaphoid (-0.008 0.00038 -0.00774)
      MusclePoint: scaphoid (-0.0084 -0.00663 0.00319)
      MusclePoint: thumb (-0.0133 -0.00263 0.01214)
      MusclePoint: thumb (-0.00352 -0.03198 0.04462)
      MusclePoint: thumb (0.00081 -0.04107 0.05071)
      MusclePoint: thumb (0.00966 -0.06693 0.06022)
      MusclePoint: thumb (0.01228 -0.07282 0.06269)
    Schutte1993Muscle EIP: max_isometric_force=25.2 optimal_fiber_length=0.0589 tendon_slack_length=0.24804
        pennation_angle=0.1047198
      MusclePoint: ulna (-0.01974 -0.14668 0.04449)
      MusclePoint: radius (-0.01612 -0.20811 0.05228)
      MusclePoint: scaphoid (-0.01119 -0.00448 -0.00483)
      MusclePoint: metacarpal2 (-0.01312 0.00595 0.0075)
      MusclePoint: metacarpal2 (-0.01022 -0.07179 0.04293)
      MusclePoint: distal_phalanx (-0.00452 -0.0182 0.00396)
    Schutte1993Muscle PL: max_isometric_force=20.7 optimal_fiber_length=0.0638 tendon_slack_length=0.236
        pennation_angle=0.06981317
      MusclePoint: humerus (0.00468 -0.27698 0.01316)
      MusclePoint: radius (0.01122 -0.20758 0.04487)
      MuscleViaPoint: capitate (0.03689 0.00135 0.00732) coordinate=flexion range=(-1.570796 0.5934119)
      MusclePoint: metacarpal3 (0.00932 -0.02377 0.00981)
  DynamicsEngine:
    SimbodyEngine: gravity=(0 -9.80665 0)
      BodySet:
        Body ground: mass=0 mass_center=(0 0 0) inertia_xx=0 inertia_yy=0 inertia_zz=0
        Body humerus: mass=0 mass_center=(0 0 0) inertia_xx=0 inertia_yy=0 inertia_zz=0 meshes=humerus.vtp
          CustomJoint ground_humerus: parent_body=ground location_in_parent=(0 0 0) location=(0 0 0)
            Coordinate ground_humerus_r3: default_value=0 initial_value=0 range=(-99999.9 99999.9) clamped=false
            TransformAxis: coordinate=ground_humerus_r3 axis=(0 0 1)
              natCubicSpline: x=(-17453.29 17453.29) y=(0 0)
        Body ulna: mass=0 mass_center=(0 0 0) inertia_xx=0 inertia_yy=0 inertia_zz=0 meshes=ulna.vtp
          CustomJoint elbow: parent_body=humerus location_in_parent=(0.0127 -0.274 0.0389) location=(0 0 0)
            Coordinate elbow_flexion: default_value=0 initial_value=0 range=(0 2.268928) keys=(e_key leftmouse_button)
                clamped=true restraint_active=false
            TransformAxis: coordinate=elbow_flexion axis=(0.2260469 0.1910399 0.9551997)
        Body radius: mass=0 mass_center=(0 0 0) inertia_xx=0 inertia_yy=0 inertia_zz=0 meshes=radius.vtp
          CustomJoint radioulnar: parent_body=ulna location_in_parent=(-0.0065 -0.008 0.027) location=(0 0 0)
            Coordinate pro_sup: default_value=0 initial_value=0 range=(-1.570796 1.570796)
                keys=(p_key leftmouse_button) clamped=true restraint_active=false
            TransformAxis: coordinate=pro_sup axis=(0.05639802 0.9835774 -0.1714491)
        Body rotaxis: mass=0 mass_center=(0 0 0) inertia_xx=0 inertia_yy=0 inertia_zz=0
          CustomJoint rad-rotaxis: parent_body=radius location_in_parent=(-0.0085 -0.2313 0.0561)
              orientation_in_parent=(-0.2617994 0.3926991 0) location=(0 0 0)
            Coordinate rad-rotaxis_r3: default_value=0 initial_value=0 range=(-99999.9 99999.9) clamped=false
            TransformAxis: coordinate=rad-rotaxis_r3 axis=(0 0 1)
              natCubicSpline: x=(-17453.29 17453.29) y=(0 0)
        Body auxprfem: mass=0 mass_center=(0 0 0) inertia_xx=0 inertia_yy=0 inertia_zz=0
          CustomJoint rotaxis-auxprfem: parent_body=rotaxis location_in_parent=(-0.001 0.009 0) location=(0 0 0)
            Coordinate rotaxis-auxprfem_r3: default_value=0 initial_value=0 range=(-99999.9 99999.9) clamped=false
            TransformAxis: coordinate=rotaxis-auxprfem_r3 axis=(0 0 1)
        Body auxprrud: mass=0 mass_center=(0 0 0) inertia_xx=0 inertia_yy=0 inertia_zz=0
          CustomJoint auxprfem-auxprrud: parent_body=auxprfem location_in_parent=(0 0 0) location=(0 0 0)
            Coordinate auxprfem-auxprrud_r1: default_value=0 initial_value=0 range=(-99999.9 99999.9) clamped=false
            TransformAxis: coordinate=auxprfem-auxprrud_r1 axis=(1 0 0)
        Body auxdrfem: mass=0 mass_center=(0 0 0) inertia_xx=0 inertia_yy=0 inertia_zz=0
          CustomJoint auxprrud-auxdrfem: parent_body=auxprrud location_in_parent=(0.001 -0.02 0) location=(0 0 0)
            Coordinate auxprrud-auxdrfem_r3: default_value=0 initial_value=0 range=(-99999.9 99999.9) clamped=false
            TransformAxis: coordinate=auxprrud-auxdrfem_r3 axis=(0 0 1)
        Body auxdrrud: mass=0 mass_center=(0 0 0) inertia_xx=0 inertia_yy=0 inertia_zz=0
          CustomJoint auxdrfem-auxdrrud: parent_body=auxdrfem location_in_parent=(0 0 0) location=(0 0 0)
            Coordinate auxdrfem-auxdrrud_r1: default_value=0 initial_value=0 range=(-99999.9 99999.9) clamped=false
            TransformAxis: coordinate=auxdrfem-auxdrrud_r1 axis=(1 0 0)
        Body scaphoid: mass=0 mass_center=(0 0 0) inertia_xx=0 inertia_yy=0 inertia_zz=0 meshes=r_scaph.vtp
          CustomJoint prox-scaph: parent_body=auxprrud location_in_parent=(-0.0035 -0.0025 0.009)
              orientation_in_parent=(0.4014257 0 0) location=(0 0 0)
            Coordinate prox-scaph_r3: default_value=0 initial_value=0 range=(-99999.9 99999.9) clamped=false
            TransformAxis: coordinate=prox-scaph_r3 axis=(0 0 1)
              natCubicSpline: x=(-17453.29 17453.29) y=(0 0)
        Body lunate: mass=0 mass_center=(0 0 0) inertia_xx=0 inertia_yy=0 inertia_zz=0 meshes=r_lun.vtp
          CustomJoint prox-lun: parent_body=auxprrud location_in_parent=(-0.004 -0.0015 -0.007) location=(0 0 0)
            Coordinate prox-lun_r3: default_value=0 initial_value=0 range=(-99999.9 99999.9) clamped=false
            TransformAxis: coordinate=prox-lun_r3 axis=(0 0 1)
              natCubicSpline: x=(-17453.29 17453.29) y=(0 0)
        Body trapezium: mass=0 mass_center=(0 0 0) inertia_xx=0 inertia_yy=0 inertia_zz=0 meshes=r_trpzm.vtp
          CustomJoint dist-trpzm: parent_body=auxdrrud location_in_parent=(0.0035 -0.0035 0.02)
              orientation_in_parent=(-0.2617994 0 0) location=(0 0 0)
            Coordinate dist-trpzm_r3: default_value=0 initial_value=0 range=(-99999.9 99999.9) clamped=false
            TransformAxis: coordinate=dist-trpzm_r3 axis=(0 0 1)
              natCubicSpline: x=(-17453.29 17453.29) y=(0 0)
        Body trapezoid: mass=0 mass_center=(0 0 0) inertia_xx=0 inertia_yy=0 inertia_zz=0 meshes=r_trpzd.vtp
          CustomJoint dist-trpzd: parent_body=auxdrrud location_in_parent=(-0.0015 -0.0044 0.0134)
              orientation_in_parent=(0.3490659 -0.1745329 0) location=(0 0 0)
            Coordinate dist-trpzd_r3: default_value=0 initial_value=0 range=(-99999.9 99999.9) clamped=false
            TransformAxis: coordinate=dist-trpzd_r3 axis=(0 0 1)
              natCubicSpline: x=(-17453.29 17453.29) y=(0 0)
        Body capitate: mass=0 mass_center=(0 0 0) inertia_xx=0 inertia_yy=0 inertia_zz=0 meshes=r_cap.vtp
          CustomJoint dist-cap: parent_body=auxdrrud location_in_parent=(-0.0155 -0.0018 -0.0055)
              orientation_in_parent=(0.1745329 0 0) location=(0 0 0)
            Coordinate dist-cap_r3: default_value=0 initial_value=0 range=(-99999.9 99999.9) clamped=false
            TransformAxis: coordinate=dist-cap_r3 axis=(0 0 1)
              natCubicSpline: x=(-17453.29 17453.29) y=(0 0)
        Body pisiform: mass=0 mass_center=(0 0 0) inertia_xx=0 inertia_yy=0 inertia_zz=0 meshes=r_pis.vtp
          CustomJoint prox-pis: parent_body=auxprrud location_in_parent=(0.005 -0.015 -0.0201) location=(0 0 0)
            Coordinate prox-pis_r3: default_value=0 initial_value=0 range=(-99999.9 99999.9) clamped=false
            TransformAxis: coordinate=prox-pis_r3 axis=(0 0 1)
              natCubicSpline: x=(-17453.29 17453.29) y=(0 0)
        Body triquetrum: mass=0 mass_center=(0 0 0) inertia_xx=0 inertia_yy=0 inertia_zz=0 meshes=r_triq.vtp
          CustomJoint prox-triq: parent_body=auxprrud location_in_parent=(-0.0055 -0.01 -0.021) location=(0 0 0)
            Coordinate prox-triq_r3: default_value=0 initial_value=0 range=(-99999.9 99999.9) clamped=false
            TransformAxis: coordinate=prox-triq_r3 axis=(0 0 1)
              natCubicSpline: x=(-17453.29 17453.29) y=(0 0)
        Body hamate: mass=0 mass_center=(0 0 0) inertia_xx=0 inertia_yy=0 inertia_zz=0 meshes=r_ham.vtp
          CustomJoint dist-ham: parent_body=auxdrrud location_in_parent=(-0.006 -0.005 -0.0175)
              orientation_in_parent=(-0.2094395 0 0) location=(0 0 0)
            Coordinate dist-ham_r3: default_value=0 initial_value=0 range=(-99999.9 99999.9) clamped=false
            TransformAxis: coordinate=dist-ham_r3 axis=(0 0 1)
              natCubicSpline: x=(-17453.29 17453.29) y=(0 0)
        Body carp_metacarp: mass=0 mass_center=(0 0 0) inertia_xx=0 inertia_yy=0 inertia_zz=0
          CustomJoint auxCMC: parent_body=auxdrrud location_in_parent=(0 0 0) location=(0 0 0)
            Coordinate auxCMC_r3: default_value=0 initial_value=0 range=(-99999.9 99999.9) clamped=false
            TransformAxis: coordinate=auxCMC_r3 axis=(0 0 1)
              natCubicSpline: x=(-17453.29 17453.29) y=(0 0)
        Body metacarpal2: mass=0 mass_center=(0 0 0) inertia_xx=0 inertia_yy=0 inertia_zz=0 meshes=fingers1.vtp
          CustomJoint CMC2: parent_body=carp_metacarp location_in_parent=(-0.0047 -0.0095 -0.005)
              orientation_in_parent=(0.1745329 0.2617994 0) location=(0 0 0)
            Coordinate CMC2_r3: default_value=0 initial_value=0 range=(-99999.9 99999.9) clamped=false
            TransformAxis: coordinate=CMC2_r3 axis=(0 0 1)
              natCubicSpline: x=(-17453.29 17453.29) y=(0 0)
        Body proximal_phalanx: mass=0 mass_center=(0 0 0) inertia_xx=0 inertia_yy=0 inertia_zz=0 meshes=fingers2.vtp
          CustomJoint MCP2: parent_body=metacarpal2 location_in_parent=(-0.002402 -0.0685 0.045) location=(0 0 0)
            Coordinate MCP2_lateral: default_value=0 initial_value=0 range=(-0.3490659 0.3490659) clamped=true
                restraint_active=false
            Coordinate MCP2_flex: default_value=0 initial_value=0 range=(-0.1745329 1.570796) keys=m_key clamped=true
                restraint_active=false
            TransformAxis: coordinate=MCP2_lateral axis=(1 0 0)
            TransformAxis: coordinate=MCP2_flex axis=(0 0 1)
        Body mid_phalanx: mass=0 mass_center=(0 0 0) inertia_xx=0 inertia_yy=0 inertia_zz=0 meshes=fingers3.vtp
          CustomJoint PIP: parent_body=proximal_phalanx location_in_parent=(0.0005 -0.04826 0.00799) location=(0 0 0)
            Coordinate PIP_flex: default_value=0 initial_value=0 range=(-0.08726646 1.570796) clamped=true
                restraint_active=false
            TransformAxis: coordinate=PIP_flex axis=(0 0 1)
        Body distal_phalanx: mass=0 mass_center=(0 0 0) inertia_xx=0 inertia_yy=0 inertia_zz=0 meshes=fingers4.vtp
          CustomJoint DIP: parent_body=mid_phalanx location_in_parent=(0.00193 -0.03277 0.00472) location=(0 0 0)
            Coordinate DIP_flex: default_value=0 initial_value=0 range=(-0.08726646 1.570796) clamped=true
                restraint_active=false
            TransformAxis: coordinate=DIP_flex axis=(0 0 1)
        Body metacarpal3: mass=0 mass_center=(0 0 0) inertia_xx=0 inertia_yy=0 inertia_zz=0 meshes=fingers8.vtp
          CustomJoint CMC3: parent_body=carp_metacarp location_in_parent=(-0.0047 -0.0085 -0.005)
              orientation_in_parent=(0.08726646 0.1745329 0) location=(0 0 0)
            Coordinate CMC3_r3: default_value=0.08726646 initial_value=0.08726646 range=(-99999.9 99999.9)
                clamped=false
            TransformAxis: coordinate=CMC3_r3 axis=(0 0 1)
              natCubicSpline: x=(-17453.29 17453.29) y=(0.08726646 0.08726646)
        Body midfinger: mass=0 mass_center=(0 0 0) inertia_xx=0 inertia_yy=0 inertia_zz=0
            meshes=(fingers6.vtp fingers7.vtp fingers5.vtp)
          CustomJoint MCP3: parent_body=metacarpal3 location_in_parent=(0 -0.003 0) location=(0 0 0)
            Coordinate MCP3_r3: default_value=0 initial_value=0 range=(-99999.9 99999.9) clamped=false
            TransformAxis: coordinate=MCP3_r3 axis=(0 0 1)
              natCubicSpline: x=(-17453.29 17453.29) y=(0 0)
        Body metacarpal4: mass=0 mass_center=(0 0 0) inertia_xx=0 inertia_yy=0 inertia_zz=0 meshes=fingers12.vtp
          CustomJoint CMC4: parent_body=carp_metacarp location_in_parent=(-0.0047 -0.008 -0.0033)
              orientation_in_parent=(0.08726646 0.1745329 0) location=(0 0 0)
            Coordinate CMC4_r3: default_value=0.08726646 initial_value=0.08726646 range=(-99999.9 99999.9)
                clamped=false
            TransformAxis: coordinate=CMC4_r3 axis=(0 0 1)
              natCubicSpline: x=(-17453.29 17453.29) y=(0.08726646 0.08726646)
        Body ringfinger: mass=0 mass_center=(0 0 0) inertia_xx=0 inertia_yy=0 inertia_zz=0
            meshes=(fingers10.vtp fingers11.vtp fingers9.vtp)
          CustomJoint MCP4: parent_body=metacarpal4 location_in_parent=(0 -0.0025 0) location=(0 0 0)
            Coordinate MCP4_r3: default_value=0 initial_value=0 range=(-99999.9 99999.9) clamped=false
            TransformAxis: coordinate=MCP4_r3 axis=(0 0 1)
              natCubicSpline: x=(-17453.29 17453.29) y=(0 0)
        Body metacarpal5: mass=0 mass_center=(0 0 0) inertia_xx=0 inertia_yy=0 inertia_zz=0 meshes=fingers16.vtp
          CustomJoint CMC5: parent_body=carp_metacarp location_in_parent=(-0.002 -0.01 0.0035)
              orientation_in_parent=(0.08726646 0.1745329 0) location=(0 0 0)
            Coordinate CMC5_r3: default_value=0.08726646 initial_value=0.08726646 range=(-99999.9 99999.9)
                clamped=false
            TransformAxis: coordinate=CMC5_r3 axis=(0 0 1)
              natCubicSpline: x=(-17453.29 17453.29) y=(0.08726646 0.08726646)
        Body littlefinger: mass=0 mass_center=(0 0 0) inertia_xx=0 inertia_yy=0 inertia_zz=0
            meshes=(fingers14.vtp fingers15.vtp fingers13.vtp)
          CustomJoint MCP5: parent_body=metacarpal5 location_in_parent=(0 -0.002 0) location=(0 0 0)
            Coordinate MCP5_r3: default_value=0 initial_value=0 range=(-99999.9 99999.9) clamped=false
            TransformAxis: coordinate=MCP5_r3 axis=(0 0 1)
              natCubicSpline: x=(-17453.29 17453.29) y=(0 0)
        Body thumb: mass=0 mass_center=(0 0 0) inertia_xx=0 inertia_yy=0 inertia_zz=0
            meshes=(fingers17.vtp fingers18.vtp fingers19.vtp)
          CustomJoint CMC1: parent_body=carp_metacarp location_in_parent=(0.008 -0.0045 0.0219) location=(0 0 0)
            Coordinate thumb_abd: default_value=0 initial_value=0 range=(-0.7853982 0.2617994) clamped=true
                restraint_active=false
            Coordinate thumb_flex: default_value=0 initial_value=0 range=(-0.7853982 1.570796) clamped=true
                restraint_active=false
            TransformAxis: coordinate=thumb_abd axis=(1 0 0)
            TransformAxis: coordinate=thumb_flex axis=(0.05639802 0.9835774 -0.1714491)
        Body extra: mass=0 mass_center=(0 0 0) inertia_xx=0 inertia_yy=0 inertia_zz=0
          CustomJoint humerus_extra: parent_body=humerus location_in_parent=(0 0 0) location=(0 0 0)
            Coordinate flexion: default_value=0 initial_value=0 range=(-1.22173 1.22173) keys=(f_key leftmouse_button)
                clamped=true restraint_active=false
            Coordinate deviation: default_value=0 initial_value=0 range=(-0.4363323 0.6108652)
                keys=(v_key leftmouse_button) clamped=true restraint_active=false
            TransformAxis: coordinate=flexion axis=(1 0 0)
            TransformAxis: coordinate=deviation axis=(0 1 0)
        Body imagine: mass=0 mass_center=(0 0 0) inertia_xx=0 inertia_yy=0 inertia_zz=0
          CustomJoint updown: parent_body=rotaxis location_in_parent=(0 0 0) location=(0 0 0)
              orientation=(0 0 -1.570796)
            Coordinate updown_tx: default_value=0 initial_value=0 range=(-99999.9 99999.9) clamped=false
            TransformAxis: coordinate=updown_tx is_rotation=false axis=(1 0 0)
      ConstraintSet:
        CoordinateCouplerConstraint rotaxis-auxprfem_r3_con: dependent_coordinate_name=rotaxis-auxprfem_r3
            independent_coordinate_names=flexion
          coupled_coordinates_function: natCubicSpline: x=(-1.570796 1.570796) y=(-0.7853982 0.7853982)
        CoordinateCouplerConstraint auxprfem-auxprrud_r1_con: dependent_coordinate_name=auxprfem-auxprrud_r1
            independent_coordinate_names=deviation
          coupled_coordinates_function: natCubicSpline: x=(-0.4363323 0 0.6108652) y=(-0.1636246 0 0.3054326)
        CoordinateCouplerConstraint auxprrud-auxdrfem_r3_con: dependent_coordinate_name=auxprrud-auxdrfem_r3
            independent_coordinate_names=flexion
          coupled_coordinates_function: natCubicSpline: x=(-1.22173 1.22173) y=(-0.6108652 0.6108652)
        CoordinateCouplerConstraint auxdrfem-auxdrrud_r1_con: dependent_coordinate_name=auxdrfem-auxdrrud_r1
            independent_coordinate_names=deviation
          coupled_coordinates_function: natCubicSpline: x=(-0.4363323 0 0.6108652) y=(-0.2727077 0 0.3054326)
        CoordinateCouplerConstraint updown_tx_con: dependent_coordinate_name=updown_tx
            independent_coordinate_names=flexion
          coupled_coordinates_function: natCubicSpline: x=(-1.570796 0 1.570796) y=(-0.01 0 0.01)
