# OpenSim document version 30000
Model PushUpToesOnGround:
  credits: Model authors names..
  length_units: meters
  force_units: N
  gravity: 0 -9.80665 0
  publications:
    Delp, S.L., Loan, J.P., Hoy, M.G., Zajac, F.E., Topp E.L., Rosen, J.M.: An interactive graphics-based model of the lower extremity to study orthopaedic surgical procedures, IEEE Transactions on Biomedical Engineering, vol. 37, pp. 757-767, 1990. Yamaguchi G.T., Zajac F.E.: A planar model of the knee joint to characterize the knee extensor mechanism." J . Biomecl7. vol. 21. pp. 1-10. 1989. Anderson F.C., Pandy M.G.: A dynamic optimization solution for vertical jumping in three dimensions. Computer Methods in Biomechanics and Biomedical Engineering 2:201-231, 1999. Anderson F.C., Pandy M.G.: Dynamic optimization of human walking. Journal of Biomechanical Engineering 123:381-390, 2001. Delp SL, Anderson FC, Arnold AS, Loan P, Habib A, John CT, Guendelman E, Thelen DG (in press). OpenSim: Open-source Software to Create and Analyze Dynamic Simulations of Movement. IEEE Transactions on Biomedical Engineering. (2007) Holzbaur KR, Murray WM, Delp SL.: A model of the upper extremity for simulating musculoskeletal surgery and analyzing neuromuscular control., Ann Biomed Eng. 2005 Jun;33(6):829-40. (2005) NOTE: This model has been developed on the base of the 3DGaitModel2354.osim model (developed by Delp S.L. et all) and the Stanford VA Upper Limb Model.osim model (developed by Holzbaur KR et all). Not additional informations are present in this model that cannot be found in the original ones. This model has been built by the author aiming only to provide a starting model for a full body model.
  defaults: Thelen2003Muscle default: min_control=0 max_control=1 optimal_force=1 max_isometric_force=546
      optimal_fiber_length=0.0535 tendon_slack_length=0.078 pennation_angle_at_optimal=0.1396263 [radians]
      max_contraction_velocity=10 activation_time_constant=0.01 deactivation_time_constant=0.04 FmaxTendonStrain=0.033
      FmaxMuscleStrain=0.6 KshapeActive=0.5 KshapePassive=4 Af=0.3 Flen=1.8
  BodySet:
    Body ground: mass=0 mass_center=(0 0 0) inertia_xx=0 inertia_yy=0 inertia_zz=0 meshes=treadmill.vtp
    Body pelvis: mass=11.777 mass_center=(-0.0707 0 0) inertia_xx=0.1028 inertia_yy=0.0871 inertia_zz=0.0579
        meshes=(sacrum.vtp pelvis_r.vtp pelvis_l.vtp)
      CustomJoint ground_pelvis: parent_body=ground location_in_parent=(0 0 0) location=(0 0 0)
        Coordinate pelvis_rotation: motion_type=rotational default_value=-1.324419 range=(-1.570796 1.570796)
            clamped=true
        Coordinate pelvis_tx: motion_type=translational default_value=0.75 range=(-5 5) clamped=true
        Coordinate pelvis_ty: motion_type=translational default_value=0.3550167 range=(-5 5) clamped=true
        SpatialTransform: axes_held_at_zero=(rotation1 rotation2 translation3)
          TransformAxis rotation3: coordinates=pelvis_rotation axis=(0 0 1) LinearFunction(coefficients=1 0)
          TransformAxis translation1: coordinates=pelvis_tx axis=(1 0 0) LinearFunction(coefficients=1 0)
          TransformAxis translation2: coordinates=pelvis_ty axis=(0 1 0) LinearFunction(coefficients=1 0)
    Body thorax: mass=27.853 mass_center=(-0.0317853 -0.0858467 0) inertia_xx=1.181757 inertia_yy=0.2775728
        inertia_zz=1.04043 meshes=(thorax.vtp hat_spine.vtp hat_jaw.vtp hat_skull.vtp)
      PinJoint back: parent_body=pelvis location_in_parent=(-0.1007 0.0815 0) location=(-0.0205 -0.3785 0)
        Coordinate back_rotation: motion_type=rotational default_value=0 range=(-1.570796 1.570796) clamped=true
            locked=true
    Body femur_r: mass=9.3014 mass_center=(0 -0.17 0) inertia_xx=0.1339 inertia_yy=0.0351 inertia_zz=0.1412
        meshes=femur_r.vtp
      PinJoint hip_r: parent_body=pelvis location_in_parent=(-0.0707 -0.0661 0.0835) location=(0 0 0)
        Coordinate hip_flexion_r: motion_type=rotational default_value=0 range=(-2.094395 2.094395) clamped=true
            locked=true
    Body femur_l: mass=9.3014 mass_center=(0 -0.17 0) inertia_xx=0.1339 inertia_yy=0.0351 inertia_zz=0.1412
        meshes=femur_l.vtp
      PinJoint hip_l: parent_body=pelvis location_in_parent=(-0.0707 -0.0661 -0.0835) location=(0 0 0)
        Coordinate hip_flexion_l: motion_type=rotational default_value=0 range=(-2.094395 2.094395) clamped=true
            locked=true
    Body tibia_r: mass=3.7075 mass_center=(0 -0.1867 0) inertia_xx=0.0504 inertia_yy=0.0051 inertia_zz=0.0511
        meshes=(tibia_r.vtp fibula_r.vtp)
      PinJoint knee_r: parent_body=femur_r location_in_parent=(0 -0.4 0) orientation_in_parent=(0 3.141593 0)
          location=(0 0 0) orientation=(0 3.141593 0)
        Coordinate knee_flexion_r: motion_type=rotational default_value=0 range=(-0.1745329 2.094395) clamped=true
            locked=true
    Body tibia_l: mass=3.7075 mass_center=(0 -0.1867 0) inertia_xx=0.0504 inertia_yy=0.0051 inertia_zz=0.0511
        meshes=(tibia_l.vtp fibula_l.vtp)
      PinJoint knee_l: parent_body=femur_l location_in_parent=(0 -0.4 0) orientation_in_parent=(0 3.141593 0)
          location=(0 0 0) orientation=(0 3.141593 0)
        Coordinate knee_flexion_l: motion_type=rotational default_value=0 range=(-0.1745329 2.094395) clamped=true
            locked=true
    Body talus_r: mass=0.1 mass_center=(0 0 0) inertia_xx=0.001 inertia_yy=0.001 inertia_zz=0.001 meshes=talus_r.vtp
      PinJoint ankle_r: parent_body=tibia_r location_in_parent=(0 -0.43 0) orientation_in_parent=(0 3.141593 0)
          location=(0 0 0) orientation=(0 3.141593 0)
        Coordinate ankle_plantarflexion_r: motion_type=rotational default_value=0.2463772 range=(-0.2617994 0.7853982)
            clamped=true
    Body calcn_r: mass=1.25 mass_center=(0.1 0.03 0) inertia_xx=0.0014 inertia_yy=0.0039 inertia_zz=0.0041
        meshes=foot_r.vtp
      WeldJoint subtalar_r: parent_body=talus_r location_in_parent=(-0.04877 -0.04195 0.00792) location=(0 0 0)
    Body toes_r: mass=0.2166 mass_center=(0.0346 0.006 -0.0175) inertia_xx=0.0001 inertia_yy=0.0002 inertia_zz=0.0003
        meshes=bofoot_r.vtp
      WeldJoint toe_flexion_r: parent_body=calcn_r location_in_parent=(0.1788 -0.002 0.00108) location=(0 0 0)
    Body talus_l: mass=0.1 mass_center=(0 0 0) inertia_xx=0.001 inertia_yy=0.001 inertia_zz=0.001 meshes=talus_l.vtp
      PinJoint ankle_l: parent_body=tibia_l location_in_parent=(0 -0.43 0) orientation_in_parent=(0 3.141593 0)
          location=(0 0 0) orientation=(0 3.141593 0)
        Coordinate ankle_plantarflexion_l: motion_type=rotational default_value=0.2463772 range=(-0.2617994 0.7853982)
            clamped=true
    Body calcn_l: mass=1.25 mass_center=(0.1 0.03 0) inertia_xx=0.0014 inertia_yy=0.0039 inertia_zz=0.0041
        meshes=foot_l.vtp
      WeldJoint subtalar_l: parent_body=talus_l location_in_parent=(-0.04877 -0.04195 -0.00792) location=(0 0 0)
    Body toes_l: mass=0.2166 mass_center=(0.0346 0.006 0.0175) inertia_xx=0.0001 inertia_yy=0.0002 inertia_zz=0.0003
        meshes=bofoot_l.vtp
      WeldJoint toe_flexion_l: parent_body=calcn_l location_in_parent=(0.1788 -0.002 -0.00108) location=(0 0 0)
    Body clavicle_r: mass=0 mass_center=(0 0 0) inertia_xx=0 inertia_yy=0 inertia_zz=0 meshes=clavicle.vtp
      WeldJoint sternoclavicular_r: parent_body=thorax location_in_parent=(0.006325 0.00693 0.025465) location=(0 0 0)
    Body clavicle_l: mass=0 mass_center=(0 0 0) inertia_xx=0 inertia_yy=0 inertia_zz=0 meshes=clavicle_l.vtp
      WeldJoint sternoclavicular_l: parent_body=thorax location_in_parent=(0.006325 0.00693 -0.025465) location=(0 0 0)
    Body scapula_r: mass=0 mass_center=(0 0 0) inertia_xx=0 inertia_yy=0 inertia_zz=0 meshes=scapula.vtp
      WeldJoint acromioclavicular_r: parent_body=clavicle_r location_in_parent=(-0.01433 0.02007 0.135535)
          location=(0 0 0)
    Body scapula_l: mass=0 mass_center=(0 0 0) inertia_xx=0 inertia_yy=0 inertia_zz=0 meshes=scapula_l.vtp
      WeldJoint acromioclavicular_l: parent_body=clavicle_l location_in_parent=(-0.01433 0.02007 -0.135535)
          location=(0 0 0)
    Body humerus_r: mass=1.9241 mass_center=(-0.005 -0.1676 -0.008) inertia_xx=0.0132 inertia_yy=0.0041
        inertia_zz=0.0117 meshes=humerus.vtp
      CustomJoint shoulder_r: parent_body=scapula_r location_in_parent=(-0.00955 -0.034 0.009) location=(0 0 0)
        Coordinate shoulder_flexion_r: motion_type=rotational default_value=1.324419 range=(-3.141593 3.141593)
            clamped=true
        Coordinate shoulder_rotation_r: motion_type=rotational default_value=0 range=(-3.141593 3.141593) clamped=true
            locked=true
        SpatialTransform: axes_held_at_zero=(rotation3 translation1 translation2 translation3)
          TransformAxis rotation1: coordinates=shoulder_flexion_r axis=(0 0 1) LinearFunction(coefficients=1 0)
          TransformAxis rotation2: coordinates=shoulder_rotation_r axis=(0 1 0) LinearFunction(coefficients=1 0)
    Body humerus_l: mass=1.9241 mass_center=(-0.005 -0.1676 0.008) inertia_xx=0.0132 inertia_yy=0.0041
        inertia_zz=0.0117 meshes=humerus_l.vtp
      CustomJoint shoulder_r: parent_body=scapula_l location_in_parent=(-0.00955 -0.034 -0.009) location=(0 0 0)
        Coordinate shoulder_flexion_l: motion_type=rotational default_value=1.324419 range=(-3.141593 3.141593)
            clamped=true
        Coordinate shoulder_rotation_l: motion_type=rotational default_value=0 range=(-3.141593 3.141593) clamped=true
            locked=true
        SpatialTransform: axes_held_at_zero=(rotation3 translation1 translation2 translation3)
          TransformAxis rotation1: coordinates=shoulder_flexion_l axis=(0 0 1) LinearFunction(coefficients=1 0)
          TransformAxis rotation2: coordinates=shoulder_rotation_l axis=(0 -1 0) LinearFunction(coefficients=1 0)
    Body ulna_r: mass=1.1502 mass_center=(0.01 -0.116 0.015) inertia_xx=0.0056 inertia_yy=0.0011 inertia_zz=0.0052
        meshes=ulna.vtp
      PinJoint elbow_r: parent_body=humerus_r location_in_parent=(0.0061 -0.2904 -0.0123) location=(0 0 0)
        Coordinate elbow_flexion_r: motion_type=rotational default_value=1e-9 range=(0 2.268928) clamped=true
            locked=true
    Body ulna_l: mass=1.1502 mass_center=(0.01 -0.116 -0.015) inertia_xx=0.0056 inertia_yy=0.0011 inertia_zz=0.0052
        meshes=ulna_l.vtp
      PinJoint elbow_l: parent_body=humerus_l location_in_parent=(0.0061 -0.2904 0.0123) location=(0 0 0)
        Coordinate elbow_flexion_l: motion_type=rotational default_value=1e-9 range=(0 2.268928) clamped=true
            locked=true
    Body radius_r: mass=0 mass_center=(0 0 0) inertia_xx=0 inertia_yy=0 inertia_zz=0 meshes=radius.vtp
      CustomJoint radioulnar: parent_body=ulna_r location_in_parent=(0.0004 -0.011503 0.019999) location=(0 0 0)
        Coordinate pro_sup_r: motion_type=rotational default_value=1.570796 range=(-1.570796 1.570796) clamped=false
            locked=true
        SpatialTransform: axes_held_at_zero=(rotation2 rotation3 translation1 translation2 translation3)
          TransformAxis rotation1: coordinates=pro_sup_r axis=(-0.01716099 0.9926656 -0.119668)
              LinearFunction(coefficients=1 0)
    Body radius_l: mass=0 mass_center=(0 0 0) inertia_xx=0 inertia_yy=0 inertia_zz=0 meshes=radius_l.vtp
      CustomJoint radioulnar_l: parent_body=ulna_l location_in_parent=(0.0004 -0.011503 -0.019999) location=(0 0 0)
        Coordinate pro_sup_l: motion_type=rotational default_value=1.570796 range=(-1.570796 1.570796) clamped=false
            locked=true
        SpatialTransform: axes_held_at_zero=(rotation2 rotation3 translation1 translation2 translation3)
          TransformAxis rotation1: coordinates=pro_sup_l axis=(0.01716099 -0.9926656 -0.119668)
              LinearFunction(coefficients=1 0)
    Body lunate_r: mass=0.4331 mass_center=(0.01 -0.0636 0) inertia_xx=0.0011 inertia_yy=0.0004513
        inertia_zz=0.00073861 meshes=lunate.vtp
      PinJoint radiocarpal: parent_body=radius_r location_in_parent=(0.018 -0.242 0.025)
          orientation_in_parent=(0 1.570796 0) location=(0 0 0) orientation=(0 1.570796 0)
        Coordinate wrist_flexion_r: motion_type=rotational default_value=-1.570796 range=(-1.570796 1.570796)
            clamped=true locked=true
    Body scaphoid_r: mass=0 mass_center=(0 0 0) inertia_xx=0 inertia_yy=0 inertia_zz=0 meshes=scaphoid.vtp
      WeldJoint lun_scaph_r: parent_body=lunate_r location_in_parent=(0.012345 -0.004464 -0.001254) location=(0 0 0)
    Body pisiform_r: mass=0 mass_center=(0 0 0) inertia_xx=0 inertia_yy=0 inertia_zz=0 meshes=pisiform.vtp
      WeldJoint lun_pis_r: parent_body=lunate_r location_in_parent=(-0.013388 -0.009886 -0.010593) location=(0 0 0)
    Body triquetrum_r: mass=0 mass_center=(0 0 0) inertia_xx=0 inertia_yy=0 inertia_zz=0 meshes=triquetrum.vtp
      WeldJoint lun_triq_r: parent_body=lunate_r location_in_parent=(-0.010784 -0.007499 -0.001289) location=(0 0 0)
    Body capitate_r: mass=0 mass_center=(0 0 0) inertia_xx=0 inertia_yy=0 inertia_zz=0 meshes=capitate.vtp
      WeldJoint proximal_distal_r: parent_body=lunate_r location_in_parent=(0.003992 -0.015054 0.002327)
          location=(0 0 0)
    Body trapezium_r: mass=0 mass_center=(0 0 0) inertia_xx=0 inertia_yy=0 inertia_zz=0 meshes=trapezium.vtp
      WeldJoint cap_trpzm: parent_body=capitate_r location_in_parent=(0.015293 -0.004569 -0.010308) location=(0 0 0)
    Body trapezoid_r: mass=0 mass_center=(0 0 0) inertia_xx=0 inertia_yy=0 inertia_zz=0 meshes=trapezoid.vtp
      WeldJoint cap_trpzd: parent_body=capitate_r location_in_parent=(0.009143 -0.004062 -0.002464) location=(0 0 0)
    Body hamate_r: mass=0 mass_center=(0 0 0) inertia_xx=0 inertia_yy=0 inertia_zz=0 meshes=hamate.vtp
      WeldJoint cap_ham: parent_body=capitate_r location_in_parent=(-0.010969 -0.002495 -0.00075) location=(0 0 0)
    Body firstmc_r: mass=0 mass_center=(0 0 0) inertia_xx=0 inertia_yy=0 inertia_zz=0 meshes=1mc.vtp
      WeldJoint CMC1b: parent_body=trapezium_r location_in_parent=(0.0072 -0.0054 -0.0025)
          orientation_in_parent=(0.1120051 -0.8080464 0.4558226) location=(0 0 0)
    Body secondmc_r: mass=0 mass_center=(0 0 0) inertia_xx=0 inertia_yy=0 inertia_zz=0 meshes=2mc.vtp
      WeldJoint CMC2: parent_body=capitate_r location_in_parent=(0.014685 -0.03762 0.005032) location=(0 0 0)
    Body thirdmc_r: mass=0 mass_center=(0 0 0) inertia_xx=0 inertia_yy=0 inertia_zz=0 meshes=3mc.vtp
      WeldJoint CMC3: parent_body=capitate_r location_in_parent=(0.000477 -0.039239 0.007377) location=(0 0 0)
    Body fourthmc_r: mass=0 mass_center=(0 0 0) inertia_xx=0 inertia_yy=0 inertia_zz=0 meshes=4mc.vtp
      WeldJoint CMC4: parent_body=capitate_r location_in_parent=(-0.012046 -0.040519 0.003513) location=(0 0 0)
    Body fifthmc_r: mass=0 mass_center=(0 0 0) inertia_xx=0 inertia_yy=0 inertia_zz=0 meshes=5mc.vtp
      WeldJoint CMC5: parent_body=capitate_r location_in_parent=(-0.021896 -0.034683 -0.004218) location=(0 0 0)
    Body proximal_thumb_r: mass=0 mass_center=(0 0 0) inertia_xx=0 inertia_yy=0 inertia_zz=0 meshes=thumbprox.vtp
      WeldJoint MCP: parent_body=firstmc_r location_in_parent=(0.0165 -0.0292 -0.0127) location=(0 0 0)
    Body distal_thumb_r: mass=0 mass_center=(0 0 0) inertia_xx=0 inertia_yy=0 inertia_zz=0 meshes=thumbdist.vtp
      WeldJoint IP: parent_body=proximal_thumb_r location_in_parent=(0.014 -0.0259 -0.0101) location=(0 0 0)
    Body 2proxph_r: mass=0 mass_center=(0 0 0) inertia_xx=0 inertia_yy=0 inertia_zz=0 meshes=2proxph.vtp
      WeldJoint 2MCP: parent_body=secondmc_r location_in_parent=(0.003501 -0.028243 0.00362) location=(0 0 0)
    Body 2midph_r: mass=0 mass_center=(0 0 0) inertia_xx=0 inertia_yy=0 inertia_zz=0 meshes=2midph.vtp
      WeldJoint 2prox-midph: parent_body=2proxph_r location_in_parent=(0.007517 -0.041273 0.007326) location=(0 0 0)
    Body 2distph_r: mass=0 mass_center=(0 0 0) inertia_xx=0 inertia_yy=0 inertia_zz=0 meshes=2distph.vtp
      WeldJoint 2mid-distph: parent_body=2midph_r location_in_parent=(0.003333 -0.024888 0.00122) location=(0 0 0)
    Body 3proxph_r: mass=0 mass_center=(0 0 0) inertia_xx=0 inertia_yy=0 inertia_zz=0 meshes=3proxph.vtp
      WeldJoint 3MCP: parent_body=thirdmc_r location_in_parent=(0.00024 -0.02629 0.001778) location=(0 0 0)
    Body 3midph_r: mass=0 mass_center=(0 0 0) inertia_xx=0 inertia_yy=0 inertia_zz=0 meshes=3midph.vtp
      WeldJoint 3prox-midph: parent_body=3proxph_r location_in_parent=(0.00165 -0.044211 0.00623) location=(0 0 0)
    Body 3distph_r: mass=0 mass_center=(0 0 0) inertia_xx=0 inertia_yy=0 inertia_zz=0 meshes=3distph.vtp
      WeldJoint 3mid-distph: parent_body=3midph_r location_in_parent=(0.001365 -0.029047 0.001954) location=(0 0 0)
    Body 4proxph_r: mass=0 mass_center=(0 0 0) inertia_xx=0 inertia_yy=0 inertia_zz=0 meshes=4proxph.vtp
      WeldJoint 4MCP: parent_body=fourthmc_r location_in_parent=(-0.00183 -0.023689 -0.000173) location=(0 0 0)
    Body 4midph_r: mass=0 mass_center=(0 0 0) inertia_xx=0 inertia_yy=0 inertia_zz=0 meshes=4midph.vtp
      WeldJoint 4prox-midph: parent_body=4proxph_r location_in_parent=(-0.003528 -0.040255 0.001345) location=(0 0 0)
    Body 4distph_r: mass=0 mass_center=(0 0 0) inertia_xx=0 inertia_yy=0 inertia_zz=0 meshes=4distph.vtp
      WeldJoint 4mid-distph: parent_body=4midph_r location_in_parent=(-0.002317 -0.024789 0.000563) location=(0 0 0)
    Body 5proxph_r: mass=0 mass_center=(0 0 0) inertia_xx=0 inertia_yy=0 inertia_zz=0 meshes=5proxph.vtp
      WeldJoint 5MCP: parent_body=fifthmc_r location_in_parent=(-0.001597 -0.021431 -0.001496) location=(0 0 0)
    Body 5midph_r: mass=0 mass_center=(0 0 0) inertia_xx=0 inertia_yy=0 inertia_zz=0 meshes=5midph.vtp
      WeldJoint 5prox-midph: parent_body=5proxph_r location_in_parent=(-0.005279 -0.035563 -0.002879) location=(0 0 0)
    Body 5distph_r: mass=0 mass_center=(0 0 0) inertia_xx=0 inertia_yy=0 inertia_zz=0 meshes=5distph.vtp
      WeldJoint 5mid-distph: parent_body=5midph_r location_in_parent=(-0.002871 -0.020677 -0.002243) location=(0 0 0)
    Body lunate_l: mass=0.4331 mass_center=(0.01 -0.0636 0) inertia_xx=0.0011 inertia_yy=0.0004513
        inertia_zz=0.00073861 meshes=lunate_l.vtp
      PinJoint radiocarpal_l: parent_body=radius_l location_in_parent=(0.018 -0.242 -0.025)
          orientation_in_parent=(0 -1.570796 0) location=(0 0 0) orientation=(0 -1.570796 0)
        Coordinate wrist_flexion_l: motion_type=rotational default_value=-1.570796 range=(-1.570796 1.570796)
            clamped=true locked=true
    Body scaphoid_l: mass=0 mass_center=(0 0 0) inertia_xx=0 inertia_yy=0 inertia_zz=0 meshes=scaphoid_l.vtp
      WeldJoint lun_scaph_l: parent_body=lunate_l location_in_parent=(0.012345 -0.004464 0.001254) location=(0 0 0)
    Body pisiform_l: mass=0 mass_center=(0 0 0) inertia_xx=0 inertia_yy=0 inertia_zz=0 meshes=pisiform_l.vtp
      WeldJoint lun_pis_l: parent_body=lunate_l location_in_parent=(-0.013388 -0.009886 0.010593) location=(0 0 0)
    Body triquetrum_l: mass=0 mass_center=(0 0 0) inertia_xx=0 inertia_yy=0 inertia_zz=0 meshes=triquetrum_l.vtp
      WeldJoint lun_triq_l: parent_body=lunate_l location_in_parent=(-0.010784 -0.007499 0.001289) location=(0 0 0)
    Body capitate_l: mass=0 mass_center=(0 0 0) inertia_xx=0 inertia_yy=0 inertia_zz=0 meshes=capitate_l.vtp
      WeldJoint proximal_distal_l: parent_body=lunate_l location_in_parent=(0.003992 -0.015054 -0.002327)
          location=(0 0 0)
    Body trapezium_l: mass=0 mass_center=(0 0 0) inertia_xx=0 inertia_yy=0 inertia_zz=0 meshes=trapezium_l.vtp
      WeldJoint cap_trpzm_l: parent_body=capitate_l location_in_parent=(0.015293 -0.004569 0.010308) location=(0 0 0)
    Body trapezoid_l: mass=0 mass_center=(0 0 0) inertia_xx=0 inertia_yy=0 inertia_zz=0 meshes=trapezoid_l.vtp
      WeldJoint cap_trpzd_l: parent_body=capitate_l location_in_parent=(0.009143 -0.004062 0.002464) location=(0 0 0)
    Body hamate_l: mass=0 mass_center=(0 0 0) inertia_xx=0 inertia_yy=0 inertia_zz=0 meshes=hamate_l.vtp
      WeldJoint cap_ham_l: parent_body=capitate_l location_in_parent=(-0.010969 -0.002495 0.00075) location=(0 0 0)
    Body firstmc_l: mass=0 mass_center=(0 0 0) inertia_xx=0 inertia_yy=0 inertia_zz=0 meshes=1mc_l.vtp
      WeldJoint CMC1b_l: parent_body=trapezium_l location_in_parent=(0.0072 -0.0054 0.0025)
          orientation_in_parent=(-0.1120051 0.8080464 0.4558226) location=(0 0 0)
    Body secondmc_l: mass=0 mass_center=(0 0 0) inertia_xx=0 inertia_yy=0 inertia_zz=0 meshes=2mc_l.vtp
      WeldJoint CMC2_l: parent_body=capitate_l location_in_parent=(0.014685 -0.03762 -0.005032) location=(0 0 0)
    Body thirdmc_l: mass=0 mass_center=(0 0 0) inertia_xx=0 inertia_yy=0 inertia_zz=0 meshes=3mc_l.vtp
      WeldJoint CMC3_l: parent_body=capitate_l location_in_parent=(0.000477 -0.039239 -0.007377) location=(0 0 0)
    Body fourthmc_l: mass=0 mass_center=(0 0 0) inertia_xx=0 inertia_yy=0 inertia_zz=0 meshes=4mc_l.vtp
      WeldJoint CMC4_l: parent_body=capitate_l location_in_parent=(-0.012046 -0.040519 -0.003513) location=(0 0 0)
    Body fifthmc_l: mass=0 mass_center=(0 0 0) inertia_xx=0 inertia_yy=0 inertia_zz=0 meshes=5mc_l.vtp
      WeldJoint CMC5_l: parent_body=capitate_l location_in_parent=(-0.021896 -0.034683 0.004218) location=(0 0 0)
    Body proximal_thumb_l: mass=0 mass_center=(0 0 0) inertia_xx=0 inertia_yy=0 inertia_zz=0 meshes=thumbprox_l.vtp
      WeldJoint MCP_l: parent_body=firstmc_l location_in_parent=(0.0165 -0.0292 0.0127) location=(0 0 0)
    Body distal_thumb_l: mass=0 mass_center=(0 0 0) inertia_xx=0 inertia_yy=0 inertia_zz=0 meshes=thumbdist_l.vtp
      WeldJoint IP_l: parent_body=proximal_thumb_l location_in_parent=(0.014 -0.0259 0.0101) location=(0 0 0)
    Body 2proxph_l: mass=0 mass_center=(0 0 0) inertia_xx=0 inertia_yy=0 inertia_zz=0 meshes=2proxph_l.vtp
      WeldJoint 2MCP_l: parent_body=secondmc_l location_in_parent=(0.003501 -0.028243 -0.00362) location=(0 0 0)
    Body 2midph_l: mass=0 mass_center=(0 0 0) inertia_xx=0 inertia_yy=0 inertia_zz=0 meshes=2midph_l.vtp
      WeldJoint 2prox-midph_l: parent_body=2proxph_l location_in_parent=(0.007517 -0.041273 -0.007326) location=(0 0 0)
    Body 2distph_l: mass=0 mass_center=(0 0 0) inertia_xx=0 inertia_yy=0 inertia_zz=0 meshes=2distph_l.vtp
      WeldJoint 2mid-distph_l: parent_body=2midph_l location_in_parent=(0.003333 -0.024888 -0.00122) location=(0 0 0)
    Body 3proxph_l: mass=0 mass_center=(0 0 0) inertia_xx=0 inertia_yy=0 inertia_zz=0 meshes=3proxph_l.vtp
      WeldJoint 3MCP_l: parent_body=thirdmc_l location_in_parent=(0.00024 -0.02629 -0.001778) location=(0 0 0)
    Body 3midph_l: mass=0 mass_center=(0 0 0) inertia_xx=0 inertia_yy=0 inertia_zz=0 meshes=3midph_l.vtp
      WeldJoint 3prox-midph_l: parent_body=3proxph_l location_in_parent=(0.00165 -0.044211 -0.00623) location=(0 0 0)
    Body 3distph_l: mass=0 mass_center=(0 0 0) inertia_xx=0 inertia_yy=0 inertia_zz=0 meshes=3distph_l.vtp
      WeldJoint 3mid-distph_l: parent_body=3midph_l location_in_parent=(0.001365 -0.029047 -0.001954) location=(0 0 0)
    Body 4proxph_l: mass=0 mass_center=(0 0 0) inertia_xx=0 inertia_yy=0 inertia_zz=0 meshes=4proxph_l.vtp
      WeldJoint 4MCP_l: parent_body=fourthmc_l location_in_parent=(-0.00183 -0.023689 0.000173) location=(0 0 0)
    Body 4midph_l: mass=0 mass_center=(0 0 0) inertia_xx=0 inertia_yy=0 inertia_zz=0 meshes=4midph_l.vtp
      WeldJoint 4prox-midph_l: parent_body=4proxph_l location_in_parent=(-0.003528 -0.040255 -0.001345)
          location=(0 0 0)
    Body 4distph_l: mass=0 mass_center=(0 0 0) inertia_xx=0 inertia_yy=0 inertia_zz=0 meshes=4distph_l.vtp
      WeldJoint 4mid-distph_l: parent_body=4midph_l location_in_parent=(-0.002317 -0.024789 -0.000563) location=(0 0 0)
    Body 5proxph_l: mass=0 mass_center=(0 0 0) inertia_xx=0 inertia_yy=0 inertia_zz=0 meshes=5proxph_l.vtp
      WeldJoint 5MCP_l: parent_body=fifthmc_l location_in_parent=(-0.001597 -0.021431 0.001496) location=(0 0 0)
    Body 5midph_l: mass=0 mass_center=(0 0 0) inertia_xx=0 inertia_yy=0 inertia_zz=0 meshes=5midph_l.vtp
      WeldJoint 5prox-midph_l: parent_body=5proxph_l location_in_parent=(-0.005279 -0.035563 0.002879) location=(0 0 0)
    Body 5distph_l: mass=0 mass_center=(0 0 0) inertia_xx=0 inertia_yy=0 inertia_zz=0 meshes=5distph_l.vtp
      WeldJoint 5mid-distph_l: parent_body=5midph_l location_in_parent=(-0.002871 -0.020677 0.002243) location=(0 0 0)
    Body ForcePlateRightToe: mass=0 mass_center=(0 0 0) inertia_xx=0 inertia_yy=0 inertia_zz=0
      WeldJoint toe_forceSensor_r: parent_body=toes_r location_in_parent=(0.075 0 -0.015) location=(0 0 0)
    Body ForcePlateLeftToe: mass=0 mass_center=(0 0 0) inertia_xx=0 inertia_yy=0 inertia_zz=0
      WeldJoint toe_forceSensor_l: parent_body=toes_l location_in_parent=(0.075 0 0.015) location=(0 0 0)
    Body ForcePlateRightHand: mass=0 mass_center=(0 0 0) inertia_xx=0 inertia_yy=0 inertia_zz=0
      WeldJoint hand_forceSensor_r: parent_body=lunate_r location_in_parent=(0 -0.05 -0.01) location=(0 0 0)
    Body ForcePlateLeftHand: mass=0 mass_center=(0 0 0) inertia_xx=0 inertia_yy=0 inertia_zz=0
      WeldJoint hand_forceSensor_l: parent_body=lunate_l location_in_parent=(0 -0.05 0.01) location=(0 0 0)
  ConstraintSet:
    PointConstraint rightToeOnGround: body_1=ForcePlateRightToe body_2=ground location_body_1=(0 0 0)
        location_body_2=(-0.180233 0 0.0775)
    PointConstraint leftToeOnGround: body_1=ForcePlateLeftToe body_2=ground location_body_1=(0 0 0)
        location_body_2=(-0.180233 0 -0.0775)
    PointConstraint rightHandOnGround: body_1=ForcePlateRightHand body_2=ground location_body_1=(0 0 0)
        location_body_2=(1.22072 0 0.195202)
    PointConstraint leftHandOnGround: body_1=ForcePlateLeftHand body_2=ground location_body_1=(0 0 0)
        location_body_2=(1.22072 0 -0.195202)
  ForceSet:
    Thelen2003Muscle [values shared by the 54 below unless stated]: min_control=0 max_control=1 optimal_force=1
        max_contraction_velocity=10 activation_time_constant=0.01 deactivation_time_constant=0.04
        FmaxTendonStrain=0.033 FmaxMuscleStrain=0.6 KshapeActive=0.5 KshapePassive=4 Af=0.3 Flen=1.8
    Thelen2003Muscle glut_med1_r: max_isometric_force=1119 optimal_fiber_length=0.0535 tendon_slack_length=0.078
        pennation_angle_at_optimal=0.1396263
      PathPoint P1: pelvis (-0.0408 0.0304 0.1209)
      PathPoint P2: femur_r (-0.0218 -0.0117 0.0555)
    Thelen2003Muscle glut_med2_r: max_isometric_force=873 optimal_fiber_length=0.0845 tendon_slack_length=0.053
        pennation_angle_at_optimal=0
      PathPoint P1: pelvis (-0.0855 0.0445 0.0766)
      PathPoint P2: femur_r (-0.0258 -0.0058 0.0527)
    Thelen2003Muscle glut_med3_r: max_isometric_force=1000 optimal_fiber_length=0.0646 tendon_slack_length=0.053
        pennation_angle_at_optimal=0.3316126
      PathPoint P1: pelvis (-0.1223 0.0105 0.0648)
      PathPoint P2: femur_r (-0.0309 -0.0047 0.0518)
    Thelen2003Muscle bifemlh_r: max_isometric_force=2700 optimal_fiber_length=0.109 tendon_slack_length=0.326
        pennation_angle_at_optimal=0
      PathPoint P1: pelvis (-0.12596 -0.10257 0.06944)
      PathPoint P2: tibia_r (-0.0301 -0.036 0.02943)
      PathPoint P3: tibia_r (-0.0234 -0.0563 0.0343)
    Thelen2003Muscle bifemsh_r: max_isometric_force=804 optimal_fiber_length=0.173 tendon_slack_length=0.089
        pennation_angle_at_optimal=0.4014257
      PathPoint P1: femur_r (0.005 -0.2111 0.0234)
      PathPoint P2: tibia_r (-0.0301 -0.036 0.02943)
      PathPoint P3: tibia_r (-0.0234 -0.0563 0.0343)
    Thelen2003Muscle sar_r: max_isometric_force=156 optimal_fiber_length=0.52 tendon_slack_length=0.1
        pennation_angle_at_optimal=0
      PathPoint P1: pelvis (-0.0153 -0.0013 0.1242)
      PathPoint P2: femur_r (-0.003 -0.3568 -0.0421)
      PathPoint P3: tibia_r (-0.0056 -0.0419 -0.0399)
      PathPoint P4: tibia_r (0.006 -0.0589 -0.0383)
      PathPoint P5: tibia_r (0.0243 -0.084 -0.0252)
    Thelen2003Muscle add_mag2_r: max_isometric_force=2343 optimal_fiber_length=0.121 tendon_slack_length=0.12
        pennation_angle_at_optimal=0.05235988
      PathPoint P1: pelvis (-0.0831 -0.1192 0.0308)
      PathPoint P2: femur_r (0.0054 -0.2285 0.0227)
    Thelen2003Muscle tfl_r: max_isometric_force=233 optimal_fiber_length=0.095 tendon_slack_length=0.425
        pennation_angle_at_optimal=0.05235988
      PathPoint P1: pelvis (-0.0311 0.0214 0.1241)
      PathPoint P2: femur_r (0.0294 -0.0995 0.0597)
      PathPoint P3: femur_r (0.0054 -0.4049 0.0357)
      PathPoint P4: tibia_r (0.006 -0.0487 0.0297)
    Thelen2003Muscle pect_r: max_isometric_force=266 optimal_fiber_length=0.1 tendon_slack_length=0.033
        pennation_angle_at_optimal=0
      PathPoint P1: pelvis (-0.0431 -0.0768 0.0451)
      PathPoint P2: femur_r (-0.0122 -0.0822 0.0253)
    Thelen2003Muscle grac_r: max_isometric_force=162 optimal_fiber_length=0.352 tendon_slack_length=0.126
        pennation_angle_at_optimal=0.05235988
      PathPoint P1: pelvis (-0.07401 -0.1187 0.02794)
      ConditionalPathPoint P2: tibia_r (-0.02657 -0.0319 -0.03774) range=(-0.436332 0.174533) coordinate=knee_flexion_r
      PathPoint P3: tibia_r (-0.01943 -0.05153 -0.0358)
      PathPoint P4: tibia_r (0.006 -0.0836 -0.0228)
    Thelen2003Muscle glut_max1_r: max_isometric_force=573 optimal_fiber_length=0.142 tendon_slack_length=0.125
        pennation_angle_at_optimal=0.08726646
      PathPoint P1: pelvis (-0.1195 0.0612 0.07)
      PathPoint P2: pelvis (-0.1291 0.0012 0.0886)
      PathPoint P3: femur_r (-0.0457 -0.0248 0.0392)
      PathPoint P4: femur_r (-0.0277 -0.0566 0.047)
    Thelen2003Muscle glut_max2_r: max_isometric_force=819 optimal_fiber_length=0.147 tendon_slack_length=0.127
        pennation_angle_at_optimal=0
      PathPoint P1: pelvis (-0.1349 0.0176 0.0563)
      PathPoint P2: pelvis (-0.1376 -0.052 0.0914)
      PathPoint P3: femur_r (-0.0426 -0.053 0.0293)
      PathPoint P4: femur_r (-0.0156 -0.1016 0.0419)
    Thelen2003Muscle glut_max3_r: max_isometric_force=552 optimal_fiber_length=0.144 tendon_slack_length=0.145
        pennation_angle_at_optimal=0.08726646
      PathPoint P1: pelvis (-0.1556 -0.0314 0.0058)
      PathPoint P2: pelvis (-0.1529 -0.1052 0.0403)
      PathPoint P3: femur_r (-0.0299 -0.1041 0.0135)
      PathPoint P4: femur_r (-0.006 -0.1419 0.0411)
    Thelen2003Muscle iliacus_r: max_isometric_force=1073 optimal_fiber_length=0.1 tendon_slack_length=0.1
        pennation_angle_at_optimal=0.1221731
      PathPoint P1: pelvis (-0.0674 0.0365 0.0854)
      PathPoint P2: pelvis (-0.0258 -0.055 0.0811)
      ConditionalPathPoint P3: pelvis (-0.0288 -0.0805 0.0816) range=(-1.5708 0.785398) coordinate=hip_flexion_r
      PathPoint P4: femur_r (0.0017 -0.0543 0.0057)
      PathPoint P5: femur_r (-0.0193 -0.0621 0.0129)
    Thelen2003Muscle psoas_r: max_isometric_force=1113 optimal_fiber_length=0.1 tendon_slack_length=0.16
        pennation_angle_at_optimal=0.1396263
      PathPoint P1: pelvis (-0.0647 0.0887 0.0289)
      PathPoint P2: pelvis (-0.0238 -0.057 0.0759)
      ConditionalPathPoint P3: pelvis (-0.0288 -0.0805 0.0816) range=(-1.5708 0.785398) coordinate=hip_flexion_r
      PathPoint P4: femur_r (0.0016 -0.0507 0.0038)
      PathPoint P5: femur_r (-0.0188 -0.0597 0.0104)
    Thelen2003Muscle quad_fem_r: max_isometric_force=381 optimal_fiber_length=0.054 tendon_slack_length=0.024
        pennation_angle_at_optimal=0
      PathPoint P1: pelvis (-0.1143 -0.1151 0.052)
      PathPoint P2: femur_r (-0.0381 -0.0359 0.0366)
    Thelen2003Muscle gem_r: max_isometric_force=164 optimal_fiber_length=0.024 tendon_slack_length=0.039
        pennation_angle_at_optimal=0
      PathPoint P1: pelvis (-0.1133 -0.082 0.0714)
      PathPoint P2: femur_r (-0.0142 -0.0033 0.0443)
    Thelen2003Muscle peri_r: max_isometric_force=444 optimal_fiber_length=0.026 tendon_slack_length=0.115
        pennation_angle_at_optimal=0.1745329
      PathPoint P1: pelvis (-0.1396 0.0003 0.0235)
      PathPoint P2: pelvis (-0.1193 -0.0276 0.0657)
      PathPoint P3: femur_r (-0.0148 -0.0036 0.0437)
    Thelen2003Muscle rect_fem_r: max_isometric_force=1169 optimal_fiber_length=0.114 tendon_slack_length=0.31
        pennation_angle_at_optimal=0.08726646
      PathPoint P1: pelvis (-0.0295 -0.0311 0.0968)
      ConditionalPathPoint P2: femur_r (0.0334 -0.403 0.0019) range=(-2.61799 -1.45997) coordinate=knee_flexion_r
      MovingPathPoint P3: tibia_r (0.0617576 0.020984 0.0014) x_coordinate=knee_flexion_r y_coordinate=knee_flexion_r
          z_coordinate=knee_flexion_r
        x_location: SimmSpline: x=(-2.0944 -1.99997 -1.5708 -1.45752 -1.39626 -1.0472 -0.698132 -0.526391 -0.349066 -0.174533 0 0.00017453 0.00034907 0.0279253 0.0872665 0.174533 2.0944)
            y=(0.0155805 0.0179938 0.0275081 0.0296564 0.0307615 0.0365695 0.0422074 0.0450902 0.048391 0.0534299 0.0617576 0.0617669 0.0617762 0.0633083 0.066994 0.0733035 0.0573481)
        y_location: SimmSpline: x=(-2.0944 -1.99997 -1.5708 -1.45752 -1.39626 -1.0472 -0.698132 -0.526391 -0.349066 -0.174533 0 0.00017453 0.00034907 0.0279253 0.0872665 0.174533 2.0944)
            y=(0.0234116 0.0237613 0.0251141 0.0252795 0.0253146 0.0249184 0.0242373 0.0238447 0.0234197 0.0227644 0.020984 0.0209814 0.0209788 0.0205225 0.0191754 0.0159554 -0.0673774)
        z_location: SimmSpline: x=(-2.0944 0.1745) y=(0.0014 0.0014)
    Thelen2003Muscle vas_int_r: max_isometric_force=5000 optimal_fiber_length=0.107 tendon_slack_length=0.116
        pennation_angle_at_optimal=0.05235988
      PathPoint P1: femur_r (0.029 -0.1924 0.031)
      PathPoint P2: femur_r (0.0335 -0.2084 0.0285)
      ConditionalPathPoint P3: femur_r (0.0343 -0.403 0.0055) range=(-2.61799 -1.42) coordinate=knee_flexion_r
      MovingPathPoint P4: tibia_r (0.0554632 0.0252923 0.0018) x_coordinate=knee_flexion_r y_coordinate=knee_flexion_r
          z_coordinate=knee_flexion_r
        x_location: SimmSpline: x=(-2.0944 -1.99997 -1.5708 -1.45752 -1.39626 -1.0472 -0.698132 -0.526391 -0.349066 -0.174533 0 0.00017453 0.00034907 0.0279253 0.0872665 0.174533 2.0944)
            y=(0.0082733 0.0106866 0.0202042 0.022353 0.0234583 0.0292715 0.0349465 0.037871 0.0412569 0.0465287 0.0554632 0.0554735 0.0554837 0.0571717 0.061272 0.0684368 0.0648818)
        y_location: SimmSpline: x=(-2.0944 -1.99997 -1.5708 -1.45752 -1.39626 -1.0472 -0.698132 -0.526391 -0.349066 -0.174533 0 0.00017453 0.00034907 0.0279253 0.0872665 0.174533 2.0944)
            y=(0.025599 0.0259487 0.0273124 0.0274796 0.0275151 0.0271363 0.0265737 0.0263073 0.0261187 0.0260129 0.0252923 0.0252911 0.0252898 0.0250526 0.0242191 0.0218288 -0.0685706)
        z_location: SimmSpline: x=(-2.0944 2.0944) y=(0.0018 0.0018)
    Thelen2003Muscle med_gas_r: max_isometric_force=2500 optimal_fiber_length=0.09 tendon_slack_length=0.36
        pennation_angle_at_optimal=0.296706
      PathPoint P1: femur_r (-0.019 -0.3929 -0.0235)
      ConditionalPathPoint P2: femur_r (-0.03 -0.4022 -0.0258) range=(-0.785398 0.174533) coordinate=knee_flexion_r
      PathPoint P3: calcn_r (0 0.031 -0.0053)
    Thelen2003Muscle soleus_r: max_isometric_force=4000 optimal_fiber_length=0.08 tendon_slack_length=0.22
        pennation_angle_at_optimal=0.4363323
      PathPoint P1: tibia_r (-0.0024 -0.1533 0.0071)
      PathPoint P2: calcn_r (0 0.031 -0.0053)
    Thelen2003Muscle tib_post_r: max_isometric_force=3600 optimal_fiber_length=0.031 tendon_slack_length=0.31
        pennation_angle_at_optimal=0.2094395
      PathPoint P1: tibia_r (-0.0094 -0.1348 0.0019)
      PathPoint P2: tibia_r (-0.0144 -0.4051 -0.0229)
      PathPoint P3: calcn_r (0.0417 0.0334 -0.0286)
      PathPoint P4: calcn_r (0.0772 0.0159 -0.0281)
    Thelen2003Muscle tib_ant_r: max_isometric_force=3000 optimal_fiber_length=0.098 tendon_slack_length=0.223
        pennation_angle_at_optimal=0.08726646
      PathPoint P1: tibia_r (0.0179 -0.1624 0.0115)
      PathPoint P2: tibia_r (0.0329 -0.3951 -0.0177)
      PathPoint P3: calcn_r (0.1166 0.0178 -0.0305)
    Thelen2003Muscle glut_med1_l: max_isometric_force=1119 optimal_fiber_length=0.0535 tendon_slack_length=0.078
        pennation_angle_at_optimal=0.1396263
      PathPoint P1: pelvis (-0.0408 0.0304 -0.1209)
      PathPoint P2: femur_l (-0.0218 -0.0117 -0.0555)
    Thelen2003Muscle glut_med2_l: max_isometric_force=873 optimal_fiber_length=0.0845 tendon_slack_length=0.053
        pennation_angle_at_optimal=0
      PathPoint P1: pelvis (-0.0855 0.0445 -0.0766)
      PathPoint P2: femur_l (-0.0258 -0.0058 -0.0527)
    Thelen2003Muscle glut_med3_l: max_isometric_force=1000 optimal_fiber_length=0.0646 tendon_slack_length=0.053
        pennation_angle_at_optimal=0.3316126
      PathPoint P1: pelvis (-0.1223 0.0105 -0.0648)
      PathPoint P2: femur_l (-0.0309 -0.0047 -0.0518)
    Thelen2003Muscle bifemlh_l: max_isometric_force=2700 optimal_fiber_length=0.109 tendon_slack_length=0.326
        pennation_angle_at_optimal=0
      PathPoint P1: pelvis (-0.12596 -0.10257 -0.06944)
      PathPoint P2: tibia_l (-0.0301 -0.036 -0.02943)
      PathPoint P3: tibia_l (-0.0234 -0.0563 -0.0343)
    Thelen2003Muscle bifemsh_l: max_isometric_force=804 optimal_fiber_length=0.173 tendon_slack_length=0.089
        pennation_angle_at_optimal=0.4014257
      PathPoint P1: femur_l (0.005 -0.2111 -0.0234)
      PathPoint P2: tibia_l (-0.0301 -0.036 -0.02943)
      PathPoint P3: tibia_l (-0.0234 -0.0563 -0.0343)
    Thelen2003Muscle sar_l: max_isometric_force=156 optimal_fiber_length=0.52 tendon_slack_length=0.1
        pennation_angle_at_optimal=0
      PathPoint P1: pelvis (-0.0153 -0.0013 -0.1242)
      PathPoint P2: femur_l (-0.003 -0.3568 0.0421)
      PathPoint P3: tibia_l (-0.0056 -0.0419 0.0399)
      PathPoint P4: tibia_l (0.006 -0.0589 0.0383)
      PathPoint P5: tibia_l (0.0243 -0.084 0.0252)
    Thelen2003Muscle add_mag2_l: max_isometric_force=2343 optimal_fiber_length=0.121 tendon_slack_length=0.12
        pennation_angle_at_optimal=0.05235988
      PathPoint P1: pelvis (-0.0831 -0.1192 -0.0308)
      PathPoint P2: femur_l (0.0054 -0.2285 -0.0227)
    Thelen2003Muscle tfl_l: max_isometric_force=233 optimal_fiber_length=0.095 tendon_slack_length=0.425
        pennation_angle_at_optimal=0.05235988
      PathPoint P1: pelvis (-0.0311 0.0214 -0.1241)
      PathPoint P2: femur_l (0.0294 -0.0995 -0.0597)
      PathPoint P3: femur_l (0.0054 -0.4049 -0.0357)
      PathPoint P4: tibia_l (0.006 -0.0487 -0.0297)
    Thelen2003Muscle pect_l: max_isometric_force=266 optimal_fiber_length=0.1 tendon_slack_length=0.033
        pennation_angle_at_optimal=0
      PathPoint P1: pelvis (-0.0431 -0.0768 -0.0451)
      PathPoint P2: femur_l (-0.0122 -0.0822 -0.0253)
    Thelen2003Muscle grac_l: max_isometric_force=162 optimal_fiber_length=0.352 tendon_slack_length=0.126
        pennation_angle_at_optimal=0.05235988
      PathPoint P1: pelvis (-0.07401 -0.1187 -0.02794)
      ConditionalPathPoint P2: tibia_l (-0.02657 -0.0319 0.03774) range=(-0.436332 0.174533) coordinate=knee_flexion_l
      PathPoint P3: tibia_l (-0.01943 -0.05153 0.0358)
      PathPoint P4: tibia_l (0.006 -0.0836 0.0228)
    Thelen2003Muscle glut_max1_l: max_isometric_force=573 optimal_fiber_length=0.142 tendon_slack_length=0.125
        pennation_angle_at_optimal=0.08726646
      PathPoint P1: pelvis (-0.1195 0.0612 -0.07)
      PathPoint P2: pelvis (-0.1291 0.0012 -0.0886)
      PathPoint P3: femur_l (-0.0457 -0.0248 -0.0392)
      PathPoint P4: femur_l (-0.0277 -0.0566 -0.047)
    Thelen2003Muscle glut_max2_l: max_isometric_force=819 optimal_fiber_length=0.147 tendon_slack_length=0.127
        pennation_angle_at_optimal=0
      PathPoint P1: pelvis (-0.1349 0.0176 -0.0563)
      PathPoint P2: pelvis (-0.1376 -0.052 -0.0914)
      PathPoint P3: femur_l (-0.0426 -0.053 -0.0293)
      PathPoint P4: femur_l (-0.0156 -0.1016 -0.0419)
    Thelen2003Muscle glut_max3_l: max_isometric_force=552 optimal_fiber_length=0.144 tendon_slack_length=0.145
        pennation_angle_at_optimal=0.08726646
      PathPoint P1: pelvis (-0.1556 -0.0314 -0.0058)
      PathPoint P2: pelvis (-0.1529 -0.1052 -0.0403)
      PathPoint P3: femur_l (-0.0299 -0.1041 -0.0135)
      PathPoint P4: femur_l (-0.006 -0.1419 -0.0411)
    Thelen2003Muscle iliacus_l: max_isometric_force=1073 optimal_fiber_length=0.1 tendon_slack_length=0.1
        pennation_angle_at_optimal=0.1221731
      PathPoint P1: pelvis (-0.0674 0.0365 -0.0854)
      PathPoint P2: pelvis (-0.0258 -0.055 -0.0811)
      ConditionalPathPoint P3: pelvis (-0.0288 -0.0805 -0.0816) range=(-1.5708 0.785398) coordinate=hip_flexion_l
      PathPoint P4: femur_l (0.0017 -0.0543 -0.0057)
      PathPoint P5: femur_l (-0.0193 -0.0621 -0.0129)
    Thelen2003Muscle psoas_l: max_isometric_force=1113 optimal_fiber_length=0.1 tendon_slack_length=0.16
        pennation_angle_at_optimal=0.1396263
      PathPoint P1: pelvis (-0.0647 0.0887 -0.0289)
      PathPoint P2: pelvis (-0.0238 -0.057 -0.0759)
      ConditionalPathPoint P3: pelvis (-0.0288 -0.0805 -0.0816) range=(-1.5708 0.785398) coordinate=hip_flexion_l
      PathPoint P4: femur_l (0.0016 -0.0507 -0.0038)
      PathPoint P5: femur_l (-0.0188 -0.0597 -0.0104)
    Thelen2003Muscle quad_fem_l: max_isometric_force=381 optimal_fiber_length=0.054 tendon_slack_length=0.024
        pennation_angle_at_optimal=0
      PathPoint P1: pelvis (-0.1143 -0.1151 -0.052)
      PathPoint P2: femur_l (-0.0381 -0.0359 -0.0366)
    Thelen2003Muscle gem_l: max_isometric_force=164 optimal_fiber_length=0.024 tendon_slack_length=0.039
        pennation_angle_at_optimal=0
      PathPoint P1: pelvis (-0.1133 -0.082 -0.0714)
      PathPoint P2: femur_l (-0.0142 -0.0033 -0.0443)
    Thelen2003Muscle peri_l: max_isometric_force=444 optimal_fiber_length=0.026 tendon_slack_length=0.115
        pennation_angle_at_optimal=0.1745329
      PathPoint P1: pelvis (-0.1396 0.0003 -0.0235)
      PathPoint P2: pelvis (-0.1193 -0.0276 -0.0657)
      PathPoint P3: femur_l (-0.0148 -0.0036 -0.0437)
    Thelen2003Muscle rect_fem_l: max_isometric_force=1169 optimal_fiber_length=0.114 tendon_slack_length=0.31
        pennation_angle_at_optimal=0.08726646
      PathPoint P1: pelvis (-0.0295 -0.0311 -0.0968)
      ConditionalPathPoint P2: femur_l (0.0334 -0.403 -0.0019) range=(-2.61799 -1.45997) coordinate=knee_flexion_l
      MovingPathPoint P3: tibia_l (0.0617576 0.020984 -0.0014) x_coordinate=knee_flexion_l y_coordinate=knee_flexion_l
          z_coordinate=knee_flexion_l
        x_location: SimmSpline: x=(-2.0944 -1.99997 -1.5708 -1.45752 -1.39626 -1.0472 -0.698132 -0.526391 -0.349066 -0.174533 0 0.00017453 0.00034907 0.0279253 0.0872665 0.174533 2.0944)
            y=(0.0155805 0.0179938 0.0275081 0.0296564 0.0307615 0.0365695 0.0422074 0.0450902 0.048391 0.0534299 0.0617576 0.0617669 0.0617762 0.0633083 0.066994 0.0733035 0.0573481)
        y_location: SimmSpline: x=(-2.0944 -1.99997 -1.5708 -1.45752 -1.39626 -1.0472 -0.698132 -0.526391 -0.349066 -0.174533 0 0.00017453 0.00034907 0.0279253 0.0872665 0.174533 2.0944)
            y=(0.0234116 0.0237613 0.0251141 0.0252795 0.0253146 0.0249184 0.0242373 0.0238447 0.0234197 0.0227644 0.020984 0.0209814 0.0209788 0.0205225 0.0191754 0.0159554 -0.0673774)
        z_location: SimmSpline: x=(-2.0944 0.1745) y=(-0.0014 -0.0014)
    Thelen2003Muscle vas_int_l: max_isometric_force=5000 optimal_fiber_length=0.107 tendon_slack_length=0.116
        pennation_angle_at_optimal=0.05235988
      PathPoint P1: femur_l (0.029 -0.1924 -0.031)
      PathPoint P2: femur_l (0.0335 -0.2084 -0.0285)
      ConditionalPathPoint P3: femur_l (0.0343 -0.403 -0.0055) range=(-2.61799 -1.42) coordinate=knee_flexion_l
      MovingPathPoint P4: tibia_l (0.0554632 0.0252923 -0.0018) x_coordinate=knee_flexion_l y_coordinate=knee_flexion_l
          z_coordinate=knee_flexion_l
        x_location: SimmSpline: x=(-2.0944 -1.99997 -1.5708 -1.45752 -1.39626 -1.0472 -0.698132 -0.526391 -0.349066 -0.174533 0 0.00017453 0.00034907 0.0279253 0.0872665 0.174533 2.0944)
            y=(0.0082733 0.0106866 0.0202042 0.022353 0.0234583 0.0292715 0.0349465 0.037871 0.0412569 0.0465287 0.0554632 0.0554735 0.0554837 0.0571717 0.061272 0.0684368 0.0648818)
        y_location: SimmSpline: x=(-2.0944 -1.99997 -1.5708 -1.45752 -1.39626 -1.0472 -0.698132 -0.526391 -0.349066 -0.174533 0 0.00017453 0.00034907 0.0279253 0.0872665 0.174533 2.0944)
            y=(0.025599 0.0259487 0.0273124 0.0274796 0.0275151 0.0271363 0.0265737 0.0263073 0.0261187 0.0260129 0.0252923 0.0252911 0.0252898 0.0250526 0.0242191 0.0218288 -0.0685706)
        z_location: SimmSpline: x=(-2.0944 2.0944) y=(-0.0018 -0.0018)
    Thelen2003Muscle med_gas_l: max_isometric_force=2500 optimal_fiber_length=0.09 tendon_slack_length=0.36
        pennation_angle_at_optimal=0.296706
      PathPoint P1: femur_l (-0.019 -0.3929 0.0235)
      ConditionalPathPoint P2: femur_l (-0.03 -0.4022 0.0258) range=(-0.785398 0.174533) coordinate=knee_flexion_l
      PathPoint P3: calcn_l (0 0.031 0.0053)
    Thelen2003Muscle soleus_l: max_isometric_force=4000 optimal_fiber_length=0.08 tendon_slack_length=0.22
        pennation_angle_at_optimal=0.4363323
      PathPoint P1: tibia_l (-0.0024 -0.1533 -0.0071)
      PathPoint P2: calcn_l (0 0.031 0.0053)
    Thelen2003Muscle tib_post_l: max_isometric_force=3600 optimal_fiber_length=0.031 tendon_slack_length=0.31
        pennation_angle_at_optimal=0.2094395
      PathPoint P1: tibia_l (-0.0094 -0.1348 -0.0019)
      PathPoint P2: tibia_l (-0.0144 -0.4051 0.0229)
      PathPoint P3: calcn_l (0.0417 0.0334 0.0286)
      PathPoint P4: calcn_l (0.0772 0.0159 0.0281)
    Thelen2003Muscle tib_ant_l: max_isometric_force=3000 optimal_fiber_length=0.098 tendon_slack_length=0.223
        pennation_angle_at_optimal=0.08726646
      PathPoint P1: tibia_l (0.0179 -0.1624 -0.0115)
      PathPoint P2: tibia_l (0.0329 -0.3951 0.0177)
      PathPoint P3: calcn_l (0.1166 0.0178 0.0305)
    Thelen2003Muscle ercspn_r: max_isometric_force=2500 optimal_fiber_length=0.12 tendon_slack_length=0.03
        pennation_angle_at_optimal=0
      PathPoint P1: pelvis (-0.14 0.0439 0.0436)
      PathPoint P2: thorax (-0.0755 -0.2685 0.0241)
    Thelen2003Muscle ercspn_l: max_isometric_force=2500 optimal_fiber_length=0.12 tendon_slack_length=0.03
        pennation_angle_at_optimal=0
      PathPoint P1: pelvis (-0.14 0.0439 -0.0436)
      PathPoint P2: thorax (-0.0755 -0.2685 -0.0241)
    Thelen2003Muscle intobl_r: max_isometric_force=900 optimal_fiber_length=0.1 tendon_slack_length=0.1
        pennation_angle_at_optimal=0
      PathPoint P1: pelvis (-0.04 0.07 0.1157)
      PathPoint P2: thorax (0.0495 -0.2185 0.015)
    Thelen2003Muscle intobl_l: max_isometric_force=900 optimal_fiber_length=0.1 tendon_slack_length=0.1
        pennation_angle_at_optimal=0
      PathPoint P1: pelvis (-0.04 0.07 -0.1157)
      PathPoint P2: thorax (0.0495 -0.2185 -0.015)
    Thelen2003Muscle extobl_r: max_isometric_force=900 optimal_fiber_length=0.12 tendon_slack_length=0.14
        pennation_angle_at_optimal=0
      PathPoint P1: pelvis (-0.03 -0.0636 0.01)
      PathPoint P2: thorax (0.0445 -0.2685 0.11)
    Thelen2003Muscle extobl_l: max_isometric_force=900 optimal_fiber_length=0.12 tendon_slack_length=0.14
        pennation_angle_at_optimal=0
      PathPoint P1: pelvis (-0.03 -0.0636 -0.01)
      PathPoint P2: thorax (0.0445 -0.2685 -0.11)
    Schutte1993Muscle_Deprecated [values shared by the 100 below unless stated]: min_control=0 max_control=1
        optimal_force=1 max_contraction_velocity=0 time_scale=0.1 activation1=0.01 activation2=0.04 damping=0.05
      tendon_force_length_curve: SimmSpline: x=(-10 -0.002 -0.001 0 0.00131 0.00281 0.00431 0.00581 0.00731 0.00881 0.0103 0.0118 0.0123 9.2 9.201 9.202 20)
          y=(0 0 0 0 0.0108 0.0257 0.0435 0.0652 0.0915 0.123 0.161 0.208 0.227 345 345 345 345)
      active_force_length_curve: SimmSpline: x=(-35 0 0.401 0.402 0.4035 0.52725 0.62875 0.71875 0.86125 1.045 1.2175 1.43875 1.61875 1.62 1.621 2.2 35)
          y=(0 0 0 0 0 0.226667 0.636667 0.856667 0.95 0.993333 0.77 0.246667 0 0 0 0 0)
      passive_force_length_curve: SimmSpline: x=(-35 0.998 0.999 1.15 1.25 1.35 1.45 1.55 1.65 1.75 1.7501 1.7502 35)
          y=(0 0 0 0 0.035 0.12 0.26 0.55 1.17 2 2 2 2)
    Schutte1993Muscle_Deprecated DELT1: max_isometric_force=1142.6 optimal_fiber_length=0.0976
        tendon_slack_length=0.093 pennation_angle_at_optimal=0.3839724 [radians]
      PathPoint P1: humerus_r (0.00896 -0.11883 0.00585)
      PathPoint P2: humerus_r (0.01623 -0.11033 0.00412)
      PathPoint P3: scapula_r (0.04347 -0.03252 0.00099)
      PathPoint P4: clavicle_r (-0.014 0.01106 0.08021)
    Schutte1993Muscle_Deprecated DELT2: max_isometric_force=1142.6 optimal_fiber_length=0.1078
        tendon_slack_length=0.1095 pennation_angle_at_optimal=0.2617994
      PathPoint P1: humerus_r (0.00461 -0.13611 0.0056)
      PathPoint P2: humerus_r (-0.00196825 -0.0284805 0.0236478)
      PathPoint P3: scapula_r (0.00129033 -0.00232418 0.0258982)
      PathPoint P4: scapula_r (-0.01078 -0.00034 0.0062)
    Schutte1993Muscle_Deprecated DELT3: max_isometric_force=259.88 optimal_fiber_length=0.1367
        tendon_slack_length=0.038 pennation_angle_at_optimal=0.3141593
      PathPoint P1: scapula_r (-0.05573 0.00122 -0.02512)
      PathPoint P2: scapula_r (-0.061869 -0.0290789 0.0118449)
      PathPoint P3: humerus_r (-0.0164333 0.00200262 0.034774)
      PathPoint P3: humerus_r (0.00206 -0.07602 0.01045)
    Schutte1993Muscle_Deprecated SUPSP: max_isometric_force=487.82 optimal_fiber_length=0.0682
        tendon_slack_length=0.0395 pennation_angle_at_optimal=0.1221731
      PathPoint P1: humerus_r (0.00256 0.01063 0.02593)
      PathPoint P2: scapula_r (-0.0331618 0.00181927 0.0115638)
      PathPoint P3: scapula_r (-0.0480998 0.00663322 -0.0223882)
      PathPoint P3: scapula_r (-0.0447182 -0.0124966 -0.0556267)
    Schutte1993Muscle_Deprecated INFSP: max_isometric_force=1210.84 optimal_fiber_length=0.0755
        tendon_slack_length=0.0308 pennation_angle_at_optimal=0.3228859
      PathPoint P1: humerus_r (-0.00887 0.00484 0.02448)
      PathPoint P2: scapula_r (-0.0557598 -0.0419091 -0.0266673)
      PathPoint P2: scapula_r (-0.0743379 -0.055549 -0.0427627)
    Schutte1993Muscle_Deprecated SUBSC: max_isometric_force=1377.81 optimal_fiber_length=0.0873
        tendon_slack_length=0.033 pennation_angle_at_optimal=0.3490659
      PathPoint P1: humerus_r (0.01403 0.0084 -0.01331)
      PathPoint P2: scapula_r (-0.01831 -0.05223 -0.02457)
      PathPoint P3: scapula_r (-0.0728923 -0.0411757 -0.0661182)
    Schutte1993Muscle_Deprecated TMIN: max_isometric_force=354.25 optimal_fiber_length=0.0741
        tendon_slack_length=0.0713 pennation_angle_at_optimal=0.418879
      PathPoint P1: humerus_r (-0.0011 -0.01264 0.02156)
      PathPoint P2: scapula_r (-0.0188329 -0.0513598 0.0310568)
      PathPoint P2: scapula_r (-0.09473 -0.07991 -0.04737)
      PathPoint P3: scapula_r (-0.09643 -0.08121 -0.05298)
    Schutte1993Muscle_Deprecated TMAJ: max_isometric_force=425.39 optimal_fiber_length=0.1624 tendon_slack_length=0.02
        pennation_angle_at_optimal=0.2792527
      PathPoint P1: humerus_r (0.00998 -0.05419 -0.00568)
      PathPoint P2: scapula_r (-0.10264 -0.10319 -0.05829)
      PathPoint P3: scapula_r (-0.10489 -0.10895 -0.07117)
    Schutte1993Muscle_Deprecated PECM1: max_isometric_force=364.41 optimal_fiber_length=0.1442
        tendon_slack_length=0.0028 pennation_angle_at_optimal=0.296706
      PathPoint P1: humerus_r (0.01169 -0.04191 0.0078)
      PathPoint P2: humerus_r (0.01615 -0.04045 -0.00577)
      PathPoint P3: thorax (0.00958 -0.01509 0.12664)
      PathPoint P4: clavicle_r (0.00321 -0.00013 0.05113)
    Schutte1993Muscle_Deprecated PECM2: max_isometric_force=515.41 optimal_fiber_length=0.1385
        tendon_slack_length=0.089 pennation_angle_at_optimal=0.4363323
      PathPoint P1: humerus_r (0.01274 -0.04289 0.00785)
      PathPoint P2: humerus_r (0.01453 -0.04568 -0.00687)
      PathPoint P3: thorax (0.02018 -0.04165 0.1269)
      PathPoint P4: thorax (0.03091 -0.03922 0.09705)
      PathPoint P5: thorax (0.02769 -0.04498 0.02271)
    Schutte1993Muscle_Deprecated PECM3: max_isometric_force=390.55 optimal_fiber_length=0.1385
        tendon_slack_length=0.132 pennation_angle_at_optimal=0.4363323
      PathPoint P1: humerus_r (0.01269 -0.04375 0.0075)
      PathPoint P2: humerus_r (0.01243 -0.05157 -0.01807)
      PathPoint P3: thorax (0.02984 -0.071 0.1151)
      PathPoint P4: thorax (0.0525 -0.08417 0.08935)
      PathPoint P5: thorax (0.05724 -0.11654 0.03787)
    Schutte1993Muscle_Deprecated LAT1: max_isometric_force=389.1 optimal_fiber_length=0.254 tendon_slack_length=0.12
        pennation_angle_at_optimal=0.4363323
      PathPoint P1: humerus_r (0.0105 -0.03415 -0.00653)
      PathPoint P2: scapula_r (-0.07947 -0.08581 -0.02188)
      PathPoint P3: scapula_r (-0.11215 -0.09779 -0.05322)
      PathPoint P4: thorax (-0.11828 -0.10118 0.03316)
      PathPoint P5: thorax (-0.09578 -0.11724 0.00882)
    Schutte1993Muscle_Deprecated LAT2: max_isometric_force=389.1 optimal_fiber_length=0.2324 tendon_slack_length=0.1765
        pennation_angle_at_optimal=0.3316126
      PathPoint P1: humerus_r (0.00968 -0.04071 -0.00611)
      PathPoint P2: scapula_r (-0.0764 -0.1022 -0.01808)
      PathPoint P3: scapula_r (-0.10054 -0.13969 -0.05258)
      PathPoint P4: thorax (-0.10992 -0.16908 0.02878)
      PathPoint P5: thorax (-0.07186 -0.18818 0.00815)
    Schutte1993Muscle_Deprecated LAT3: max_isometric_force=281.66 optimal_fiber_length=0.2789
        tendon_slack_length=0.1403 pennation_angle_at_optimal=0.3665191
      PathPoint P1: humerus_r (0.01208 -0.03922 -0.00416)
      PathPoint P2: scapula_r (-0.05678 -0.13303 -0.0213)
      PathPoint P3: scapula_r (-0.09449 -0.17553 -0.04606)
      PathPoint P4: thorax (-0.11157 -0.19387 0.05532)
      PathPoint P5: thorax (-0.07117 -0.24858 0.00907)
    Schutte1993Muscle_Deprecated CORB: max_isometric_force=242.46 optimal_fiber_length=0.0932 tendon_slack_length=0.097
        pennation_angle_at_optimal=0
      PathPoint P1: scapula_r (0.0125 -0.04127 -0.02652)
      PathPoint P2: scapula_r (0.0069957 -0.0593962 -0.00909817)
      PathPoint P3: humerus_r (0.00743 -0.15048 -0.00782)
    Schutte1993Muscle_Deprecated TRIlong: max_isometric_force=798.52 optimal_fiber_length=0.134
        tendon_slack_length=0.143 pennation_angle_at_optimal=0.2094395
      PathPoint P1: scapula_r (-0.04565 -0.04073 -0.01377)
      PathPoint P2: humerus_r (-0.02714 -0.11441 -0.00664)
      PathPoint P3: humerus_r (-0.03184 -0.22637 -0.01217)
      PathPoint P4: humerus_r (-0.01743 -0.26757 -0.01208)
      PathPoint P5: ulna_r (-0.0219 0.01046 -0.00078)
    Schutte1993Muscle_Deprecated TRIlat: max_isometric_force=624.3 optimal_fiber_length=0.1138
        tendon_slack_length=0.098 pennation_angle_at_optimal=0.1570796
      PathPoint P1: humerus_r (-0.00599 -0.12646 0.00428)
      PathPoint P2: humerus_r (-0.02344 -0.14528 0.00928)
      PathPoint P3: humerus_r (-0.03184 -0.22637 -0.01217)
      PathPoint P4: humerus_r (-0.01743 -0.26757 -0.01208)
      PathPoint P5: ulna_r (-0.0219 0.01046 -0.00078)
    Schutte1993Muscle_Deprecated TRImed: max_isometric_force=624.3 optimal_fiber_length=0.1138
        tendon_slack_length=0.0908 pennation_angle_at_optimal=0.1570796
      PathPoint P1: humerus_r (-0.00838 -0.13695 -0.00906)
      PathPoint P2: humerus_r (-0.02601 -0.15139 -0.0108)
      PathPoint P3: humerus_r (-0.03184 -0.22637 -0.01217)
      PathPoint P4: humerus_r (-0.01743 -0.26757 -0.01208)
      PathPoint P5: ulna_r (-0.0219 0.01046 -0.00078)
    Schutte1993Muscle_Deprecated ANC: max_isometric_force=350 optimal_fiber_length=0.027 tendon_slack_length=0.018
        pennation_angle_at_optimal=0
      PathPoint P1: humerus_r (-0.00744 -0.28359 0.00979)
      PathPoint P2: ulna_r (-0.02532 -0.00124 0.006)
    Schutte1993Muscle_Deprecated SUP: max_isometric_force=476 optimal_fiber_length=0.033 tendon_slack_length=0.028
        pennation_angle_at_optimal=0
      PathPoint P1: radius_r (0.00996 -0.06096 0.00075)
      PathPoint P2: radius_r (0.01201 -0.0517 -0.00107)
      PathPoint P3: ulna_r (-0.0136 -0.03384 0.02013)
    Schutte1993Muscle_Deprecated BIClong: max_isometric_force=624.3 optimal_fiber_length=0.1157
        tendon_slack_length=0.2723 pennation_angle_at_optimal=0
      PathPoint P1: scapula_r (-0.03123 -0.02353 -0.01305)
      PathPoint P2: scapula_r (-0.02094 -0.01309 -0.00461)
      PathPoint P3: humerus_r (0.02131 0.01793 0.01028)
      PathPoint P4: humerus_r (0.02378 -0.00511 0.01201)
      PathPoint P5: humerus_r (0.01345 -0.02827 0.00136)
      PathPoint P6: humerus_r (0.01068 -0.07736 -0.00165)
      PathPoint P7: humerus_r (0.01703 -0.12125 0.00024)
      PathPoint P8: humerus_r (0.0228 -0.1754 -0.0063)
      ConditionalPathPoint P10: radius_r (-0.00078793 0.0271875 0.00657355) range=(-0.638791 1.5708)
          coordinate=pro_sup_r
      PathPoint P10: radius_r (-0.00504894 0.0063601 0.0118441)
      PathPoint P11: radius_r (-0.002 -0.0375 -0.002)
    Schutte1993Muscle_Deprecated BICshort: max_isometric_force=435.56 optimal_fiber_length=0.1321
        tendon_slack_length=0.1923 pennation_angle_at_optimal=0
      PathPoint P1: scapula_r (0.01268 -0.03931 -0.02625)
      PathPoint P2: scapula_r (0.0142026 -0.0613587 -0.00610476)
      PathPoint P3: humerus_r (0.01117 -0.07576 -0.01101)
      PathPoint P4: humerus_r (0.01703 -0.12125 -0.01079)
      PathPoint P5: humerus_r (0.0228 -0.1754 -0.0063)
      ConditionalPathPoint P7: radius_r (-0.00079 0.02719 0.00657) range=(-0.638791 1.5708) coordinate=pro_sup_r
      PathPoint P7: radius_r (-0.00505 0.00636 0.01184)
      PathPoint P8: radius_r (-0.002 -0.0375 -0.002)
    Schutte1993Muscle_Deprecated BRA: max_isometric_force=987.26 optimal_fiber_length=0.0858 tendon_slack_length=0.0535
        pennation_angle_at_optimal=0
      PathPoint P1: humerus_r (0.0068 -0.1739 -0.0036)
      ConditionalPathPoint P2: humerus_r (0.01894 -0.28559 -0.01105) range=(0 0.813149) coordinate=elbow_flexion_r
      ConditionalPathPoint P3: ulna_r (0.00498 -0.01463 0.00128) range=(0 0.813149) coordinate=elbow_flexion_r
      PathPoint P4: ulna_r (-0.0032 -0.0239 0.0009)
    Schutte1993Muscle_Deprecated BRD: max_isometric_force=261.33 optimal_fiber_length=0.1726 tendon_slack_length=0.133
        pennation_angle_at_optimal=0
      PathPoint P1: humerus_r (-0.0098 -0.19963 0.00223)
      PathPoint P2: radius_r (0.00840477 0.00410938 0.0142373)
      PathPoint P2: radius_r (0.03577 -0.12742 0.02315)
      PathPoint P3: radius_r (0.0419 -0.221 0.0224)
    Schutte1993Muscle_Deprecated ECRL: max_isometric_force=304.89 optimal_fiber_length=0.081 tendon_slack_length=0.224
        pennation_angle_at_optimal=0
      PathPoint P1: humerus_r (-0.0073 -0.2609 0.0091)
      PathPoint P2: radius_r (0.0341535 0.0374661 0.00757558)
      PathPoint P2: radius_r (0.03195 -0.13463 0.02779)
      PathPoint P3: radius_r (0.04243 -0.23684 0.0362)
      PathPoint P4: secondmc_r (0.00249 0.0164 0.0008)
    Schutte1993Muscle_Deprecated ECRB: max_isometric_force=100.52 optimal_fiber_length=0.0585
        tendon_slack_length=0.2223 pennation_angle_at_optimal=0.1553343
      PathPoint P1: humerus_r (0.01349 -0.29048 0.01698)
      PathPoint P2: radius_r (0.02905 -0.13086 0.02385)
      PathPoint P3: radius_r (0.03549 -0.22805 0.03937)
      PathPoint P4: thirdmc_r (0.00452 0.02788 0.00112)
    Schutte1993Muscle_Deprecated ECU: max_isometric_force=93.17 optimal_fiber_length=0.0622 tendon_slack_length=0.2285
        pennation_angle_at_optimal=0.06108652
      PathPoint P1: humerus_r (0.00083 -0.28955 0.0188)
      PathPoint P2: ulna_r (-0.01391 -0.03201 0.02947)
      PathPoint P3: ulna_r (-0.01705 -0.05428 0.02868)
      PathPoint P4: ulna_r (-0.01793 -0.09573 0.03278)
      PathPoint P5: radius_r (-0.01421 -0.22696 0.03481)
      PathPoint P6: fifthmc_r (-0.00061 0.02067 0.00294)
    Schutte1993Muscle_Deprecated FCR: max_isometric_force=73.96 optimal_fiber_length=0.0628 tendon_slack_length=0.244
        pennation_angle_at_optimal=0.05410521
      PathPoint P1: humerus_r (0.00758 -0.27806 -0.03705)
      PathPoint P2: radius_r (0.0211 -0.21943 0.00127)
      PathPoint P3: secondmc_r (-0.01 0.04 -0.025)
      PathPoint P3: secondmc_r (-0.00345 0.01918 -0.00921)
    Schutte1993Muscle_Deprecated FCU: max_isometric_force=128.93 optimal_fiber_length=0.0509 tendon_slack_length=0.265
        pennation_angle_at_optimal=0.2111848
      PathPoint P1: humerus_r (0.00219 -0.2774 -0.0388)
      PathPoint P2: radius_r (0.0512714 0.013596 -0.00279215)
      PathPoint P3: radius_r (0.00120683 -0.263511 0.0262687)
      PathPoint P4: fifthmc_r (0.00154 0.01703 -0.0033)
    Schutte1993Muscle_Deprecated PL: max_isometric_force=26.72 optimal_fiber_length=0.0638 tendon_slack_length=0.2694
        pennation_angle_at_optimal=0.06981317
      PathPoint P1: humerus_r (0.00457 -0.27519 -0.03865)
      PathPoint P2: radius_r (0.02531 -0.23915 -0.00276)
      PathPoint P3: capitate_r (0.00917 -0.01898 -0.01754)
      PathPoint P4: thirdmc_r (0.00179 0.00828 -0.00245)
    Schutte1993Muscle_Deprecated PT: max_isometric_force=566.22 optimal_fiber_length=0.0492 tendon_slack_length=0.098
        pennation_angle_at_optimal=0.1745329
      PathPoint P1: humerus_r (0.0036 -0.2759 -0.0365)
      PathPoint P2: ulna_r (0.00846 -0.03373 -0.01432)
      PathPoint P3: ulna_r (0.00464 -0.00026 -0.00214)
      ConditionalPathPoint P4: radius_r (0.0236 -0.0934 0.0094) range=(-1.5708 0.509636) coordinate=pro_sup_r
      PathPoint P5: radius_r (0.0254 -0.1088 0.0198)
    Schutte1993Muscle_Deprecated PQ: max_isometric_force=75.48 optimal_fiber_length=0.0282 tendon_slack_length=0.005
        pennation_angle_at_optimal=0.1745329
      PathPoint P1: radius_r (0.03245 -0.19998 0.01962)
      PathPoint P2: ulna_r (0.00193 -0.20972 0.03632)
    Schutte1993Muscle_Deprecated FDSL: max_isometric_force=16.55 optimal_fiber_length=0.0515 tendon_slack_length=0.3383
        pennation_angle_at_optimal=0.08726646
      PathPoint P1: humerus_r (0.00421 -0.27598 -0.03864)
      PathPoint P2: radius_r (0.01377 -0.18718 0.00205)
      PathPoint P3: capitate_r (0.01 0.02 -0.005)
      PathPoint P3: capitate_r (-0.00235 -0.01393 -0.01376)
      PathPoint P4: fourthmc_r (-0.00294 0.00846 -0.01213)
      PathPoint P5: fifthmc_r (-0.00032 -0.01968 -0.00757)
      PathPoint P6: 5proxph_r (-0.00323 -0.03568 -0.00417)
      PathPoint P7: 5midph_r (-0.0026 -0.01983 -0.0035)
    Schutte1993Muscle_Deprecated FDSR: max_isometric_force=57.9 optimal_fiber_length=0.0736 tendon_slack_length=0.328
        pennation_angle_at_optimal=0.06981317
      PathPoint P1: humerus_r (0.00479 -0.2788 -0.03731)
      PathPoint P2: radius_r (0.01571 -0.18666 0.00267)
      PathPoint P3: capitate_r (0.00563593 0.0249574 -0.00659547)
      PathPoint P3: capitate_r (-0.00082 -0.01344 -0.01359)
      PathPoint P4: thirdmc_r (-0.00914 0.00544 -0.01085)
      PathPoint P5: fourthmc_r (-0.0029 -0.02334 -0.00767)
      PathPoint P6: 4proxph_r (-0.00172 -0.03947 -0.00102)
      PathPoint P7: 4midph_r (-2e-5 -0.02501 0.00029)
    Schutte1993Muscle_Deprecated FDSM: max_isometric_force=91.03 optimal_fiber_length=0.0749 tendon_slack_length=0.295
        pennation_angle_at_optimal=0.1221731
      PathPoint P1: ulna_r (-0.00669 -0.02713 -0.00191)
      PathPoint P2: radius_r (0.01899 -0.18706 0.00424)
      PathPoint P3: capitate_r (0.0106408 0.0232774 -0.0113463)
      PathPoint P3: capitate_r (0.0068 -0.01377 -0.01399)
      PathPoint P4: thirdmc_r (0.00128 0.00639 -0.00952)
      PathPoint P5: thirdmc_r (0.00263 -0.02478 -0.00183)
      PathPoint P6: 3proxph_r (0.00252 -0.04307 0.00417)
      PathPoint P7: 3midph_r (0.00155 -0.02773 0.00067)
    Schutte1993Muscle_Deprecated FDSI: max_isometric_force=61.24 optimal_fiber_length=0.0835 tendon_slack_length=0.275
        pennation_angle_at_optimal=0.1047198
      PathPoint P1: ulna_r (-0.00676 -0.02819 -0.00137)
      PathPoint P2: radius_r (0.02145 -0.18623 0.00552)
      PathPoint P3: capitate_r (0.015 0.02328 -0.02328)
      PathPoint P3: capitate_r (0.00889 -0.01366 -0.01387)
      PathPoint P4: secondmc_r (-0.00407 -0.00025 -0.00479)
      PathPoint P5: secondmc_r (0.00304 -0.02206 -0.00579)
      PathPoint P6: 2proxph_r (0.00427 -0.03367 0.00444)
      PathPoint P7: 2midph_r (0.00228 -0.02088 -0.00029)
    Schutte1993Muscle_Deprecated FDPL: max_isometric_force=79.65 optimal_fiber_length=0.0749 tendon_slack_length=0.2819
        pennation_angle_at_optimal=0.1396263
      PathPoint P1: ulna_r (-0.00628 -0.03214 0.00254)
      PathPoint P2: radius_r (0.01409 -0.18516 0.00861)
      PathPoint P3: capitate_r (-0.00257 0.025 -0.005)
      PathPoint P3: capitate_r (-0.00088 -0.01027 -0.01188)
      PathPoint P4: fourthmc_r (-0.00686 0.0089 -0.00619)
      PathPoint P5: fifthmc_r (-0.00185 -0.01878 -0.00706)
      PathPoint P6: 5proxph_r (-0.0049 -0.03465 -0.00598)
      PathPoint P7: 5distph_r (-0.00032 -0.00433 -0.00165)
    Schutte1993Muscle_Deprecated FDPR: max_isometric_force=64.08 optimal_fiber_length=0.0798 tendon_slack_length=0.282
        pennation_angle_at_optimal=0.1221731
      PathPoint P1: ulna_r (-0.00502 -0.03374 0.00273)
      PathPoint P2: radius_r (0.0158 -0.18629 0.00803)
      PathPoint P3: capitate_r (-0.00257 0.025 -0.005)
      PathPoint P3: capitate_r (0.00106 -0.01177 -0.01184)
      PathPoint P4: thirdmc_r (-0.0104 0.00473 -0.00804)
      PathPoint P5: fourthmc_r (-0.00289 -0.02297 -0.00609)
      PathPoint P6: 4proxph_r (-0.00304 -0.04002 -0.00075)
      PathPoint P7: 4distph_r (0.0001 -0.0066 -0.00066)
    Schutte1993Muscle_Deprecated FDPM: max_isometric_force=81.65 optimal_fiber_length=0.0835 tendon_slack_length=0.293
        pennation_angle_at_optimal=0.1047198
      PathPoint P1: ulna_r (-0.00522 -0.03327 0.0021)
      PathPoint P2: radius_r (0.01906 -0.18644 0.00785)
      PathPoint P3: capitate_r (0.000209 0.025 -0.005)
      PathPoint P3: capitate_r (0.00335 -0.0128 -0.01144)
      PathPoint P4: thirdmc_r (-0.00128 0.00609 -0.00838)
      PathPoint P5: thirdmc_r (0.00034 -0.02347 -0.00303)
      PathPoint P6: 3proxph_r (0.00102 -0.04333 0.00294)
      PathPoint P7: 3distph_r (0.00023 -0.00505 -0.00226)
    Schutte1993Muscle_Deprecated FDPI: max_isometric_force=68.27 optimal_fiber_length=0.0749 tendon_slack_length=0.2935
        pennation_angle_at_optimal=0.1221731
      PathPoint P1: ulna_r (-0.00647 -0.03176 0.0028)
      PathPoint P2: radius_r (0.0208 -0.1856 0.00915)
      PathPoint P3: capitate_r (0.003884 0.025 -0.005)
      PathPoint P3: capitate_r (0.00896 -0.01168 -0.01212)
      PathPoint P4: secondmc_r (-0.00432 0.00663 -0.00248)
      PathPoint P5: secondmc_r (0.0042 -0.02262 -0.00499)
      PathPoint P6: 2proxph_r (0.00581 -0.03555 0.00306)
      PathPoint P7: 2distph_r (0.00046 -0.0046 -0.00301)
    Schutte1993Muscle_Deprecated EDCL: max_isometric_force=13.11 optimal_fiber_length=0.065 tendon_slack_length=0.2965
        pennation_angle_at_optimal=0.03490659
      PathPoint P1: humerus_r (-0.0004 -0.28831 0.0187)
      PathPoint P2: radius_r (0.0013 -0.03888 0.01405)
      PathPoint P3: radius_r (0.00993 -0.22304 0.03618)
      PathPoint P4: fifthmc_r (-0.00478 -0.01915 0.00447)
      PathPoint P5: 5proxph_r (-0.00716 -0.03302 -0.00089)
      PathPoint P6: 5distph_r (-0.00142 0.00068 0.00115)
    Schutte1993Muscle_Deprecated EDCR: max_isometric_force=34.04 optimal_fiber_length=0.0626 tendon_slack_length=0.327
        pennation_angle_at_optimal=0.05235988
      PathPoint P1: humerus_r (-0.00156 -0.28936 0.01782)
      PathPoint P2: radius_r (0.0026 -0.03991 0.01552)
      PathPoint P3: radius_r (0.00882 -0.22366 0.04284)
      PathPoint P4: fourthmc_r (-0.00338 -0.0233 0.00513)
      PathPoint P5: 4proxph_r (-0.00546 -0.03868 0.00413)
      PathPoint P6: 4distph_r (-0.00171 -0.00375 0.00241)
    Schutte1993Muscle_Deprecated EDCM: max_isometric_force=35.32 optimal_fiber_length=0.0724 tendon_slack_length=0.335
        pennation_angle_at_optimal=0.05235988
      PathPoint P1: humerus_r (0.00051 -0.28984 0.01949)
      PathPoint P2: radius_r (0.00316 -0.03948 0.01528)
      PathPoint P3: radius_r (0.0144 -0.22323 0.04223)
      PathPoint P4: thirdmc_r (0.00131 -0.02342 0.00764)
      PathPoint P5: 3proxph_r (0.00179 -0.04239 0.01003)
      PathPoint P6: 3distph_r (0.00077 -0.01111 0.00201)
    Schutte1993Muscle_Deprecated EDCI: max_isometric_force=18.26 optimal_fiber_length=0.07 tendon_slack_length=0.322
        pennation_angle_at_optimal=0.05235988
      PathPoint P1: humerus_r (0.00065 -0.28898 0.01869)
      PathPoint P2: radius_r (0.00228 -0.03918 0.01483)
      PathPoint P3: radius_r (0.01533 -0.22314 0.04196)
      PathPoint P4: secondmc_r (0.00474 -0.02656 0.01293)
      PathPoint P5: 2proxph_r (0.00192 -0.01101 0.01021)
      PathPoint P6: 2proxph_r (0.00771 -0.04191 0.01399)
      PathPoint P7: 2midph_r (0.00123 -0.00941 0.00581)
      PathPoint P8: 2midph_r (0.0026 -0.01959 0.00363)
      PathPoint P9: 2distph_r (0.00025 -0.0037 0.00228)
    Schutte1993Muscle_Deprecated EDM: max_isometric_force=25.25 optimal_fiber_length=0.0675 tendon_slack_length=0.322
        pennation_angle_at_optimal=0.05235988
      PathPoint P1: humerus_r (0.00089 -0.28919 0.01847)
      PathPoint P2: ulna_r (-0.00977 -0.03907 0.03085)
      PathPoint P3: ulna_r (-0.00755 -0.08267 0.03646)
      PathPoint P4: radius_r (0.00454 -0.22641 0.03678)
      PathPoint P5: fifthmc_r (0.00131 0.02436 0.00794)
      PathPoint P6: fifthmc_r (-0.00537 -0.01848 0.00316)
      PathPoint P7: 5proxph_r (-0.0054 -0.03237 0.00015)
      PathPoint P8: 5distph_r (-0.00226 -0.00334 0.00062)
    Schutte1993Muscle_Deprecated EIP: max_isometric_force=21.7 optimal_fiber_length=0.0589 tendon_slack_length=0.186
        pennation_angle_at_optimal=0.1047198
      PathPoint P1: ulna_r (-0.00394 -0.16652 0.03682)
      PathPoint P2: ulna_r (0.00171 -0.17469 0.04049)
      PathPoint P3: radius_r (0.01076 -0.22783 0.03664)
      PathPoint P4: secondmc_r (-0.01081 0.01528 0.00681)
      PathPoint P5: secondmc_r (0.00441 -0.02602 0.01285)
      PathPoint P6: 2proxph_r (0.00171 -0.01033 0.00947)
      PathPoint P7: 2proxph_r (0.00714 -0.04133 0.01413)
      PathPoint P8: 2midph_r (0.00115 -0.00899 0.00597)
      PathPoint P9: 2midph_r (0.00294 -0.02043 0.00377)
      PathPoint P10: 2distph_r (0.00264 -0.01233 0.00266)
    Schutte1993Muscle_Deprecated EPL: max_isometric_force=39.46 optimal_fiber_length=0.054 tendon_slack_length=0.2205
        pennation_angle_at_optimal=0.1047198
      PathPoint P1: ulna_r (-0.01412 -0.09706 0.02952)
      PathPoint P2: radius_r (0.00124 -0.13668 0.0227)
      PathPoint P3: radius_r (0.02702 -0.21872 0.03828)
      PathPoint P4: radius_r (0.03382 -0.22754 0.04607)
      PathPoint P5: radius_r (0.04234 -0.23771 0.04173)
      PathPoint P6: capitate_r (0.02428 0.00014 0.00608)
      PathPoint P7: trapezium_r (0.00809 -0.0046 0.00992)
      PathPoint P8: firstmc_r (0.00656 -0.0043 0.00792)
      PathPoint P9: firstmc_r (0.02165 -0.0242 -0.00533)
      PathPoint P10: proximal_thumb_r (0.01147 -0.00362 0.00156)
      PathPoint P11: proximal_thumb_r (0.01921 -0.0265 -0.01038)
      PathPoint P12: distal_thumb_r (0.00543 -0.00714 -0.00464)
    Schutte1993Muscle_Deprecated EPB: max_isometric_force=14.2 optimal_fiber_length=0.0675 tendon_slack_length=0.1155
        pennation_angle_at_optimal=0.1256637
      PathPoint P1: radius_r (0.01924 -0.14695 0.02114)
      PathPoint P2: radius_r (0.02276 -0.15857 0.02665)
      PathPoint P3: radius_r (0.03831 -0.19722 0.03834)
      PathPoint P4: radius_r (0.05235 -0.23611 0.02699)
      PathPoint P5: capitate_r (0.03123 0.00256 -0.00327)
      PathPoint P6: trapezium_r (0.01443 -0.00337 -0.00405)
      PathPoint P7: firstmc_r (0.02173 -0.02303 -0.01141)
      PathPoint P8: proximal_thumb_r (0.00927 -0.00618 -0.00557)
    Schutte1993Muscle_Deprecated FPL: max_isometric_force=77.2 optimal_fiber_length=0.0552 tendon_slack_length=0.1938
        pennation_angle_at_optimal=0.1221731
      PathPoint P1: radius_r (0.00971 -0.09458 0.01769)
      PathPoint P2: radius_r (0.01658 -0.13525 0.01915)
      PathPoint P3: radius_r (0.01869 -0.17932 0.01988)
      PathPoint P4: radius_r (0.038 -0.23171 0.0158)
      PathPoint P5: capitate_r (0.01869 0.00882 -0.01547)
      PathPoint P6: capitate_r (0.01244 -0.02207 -0.02089)
      PathPoint P7: firstmc_r (-0.00608 -0.01624 -0.0094)
      PathPoint P8: firstmc_r (0.00208 -0.02297 -0.00956)
      PathPoint P9: proximal_thumb_r (-0.0045 -0.01842 -0.00508)
      PathPoint P10: proximal_thumb_r (0.0059 -0.02602 -0.01114)
      PathPoint P11: distal_thumb_r (0.00242 -0.01127 -0.00412)
    Schutte1993Muscle_Deprecated APL: max_isometric_force=59.53 optimal_fiber_length=0.0713 tendon_slack_length=0.1295
        pennation_angle_at_optimal=0.1308997
      PathPoint P1: radius_r (0.01154 -0.09477 0.01681)
      PathPoint P2: radius_r (0.0303 -0.1397 0.03507)
      PathPoint P3: radius_r (0.03993 -0.16072 0.034)
      PathPoint P4: radius_r (0.04397 -0.17845 0.03134)
      PathPoint P5: radius_r (0.05505 -0.23084 0.02368)
      PathPoint P6: capitate_r (0.03385 0.00634 -0.00745)
      PathPoint P7: trapezium_r (0.01058 0.00662 -0.00619)
      PathPoint P8: firstmc_r (0.00629 0.00323 -0.00589)
      PathPoint P9: firstmc_r (0.00827 -0.00586 -0.00604)
    Schutte1993Muscle_Deprecated DELT1_l: max_isometric_force=1142.6 optimal_fiber_length=0.0976
        tendon_slack_length=0.093 pennation_angle_at_optimal=0.3839724
      PathPoint P1: humerus_l (0.00896 -0.11883 -0.00585)
      PathPoint P2: humerus_l (0.01623 -0.11033 -0.00412)
      PathPoint P3: scapula_l (0.04347 -0.03252 -0.00099)
      PathPoint P4: clavicle_l (-0.014 0.01106 -0.08021)
    Schutte1993Muscle_Deprecated DELT2_l: max_isometric_force=1142.6 optimal_fiber_length=0.1078
        tendon_slack_length=0.1095 pennation_angle_at_optimal=0.2617994
      PathPoint P1: humerus_l (0.00461 -0.13611 -0.0056)
      PathPoint P2: humerus_l (-0.00197 -0.02848 -0.02365)
      PathPoint P3: scapula_l (0.00129 -0.00232 -0.0259)
      PathPoint P4: scapula_l (-0.01078 -0.00034 -0.0062)
    Schutte1993Muscle_Deprecated DELT3_l: max_isometric_force=259.88 optimal_fiber_length=0.1367
        tendon_slack_length=0.038 pennation_angle_at_optimal=0.3141593
      PathPoint P1: scapula_l (-0.05573 0.00122 0.02512)
      PathPoint P2: scapula_l (-0.06187 -0.02908 -0.01184)
      PathPoint P3: humerus_l (-0.01643 0.002 -0.03477)
      PathPoint P3: humerus_l (0.00206 -0.07602 -0.01045)
    Schutte1993Muscle_Deprecated SUPSP_l: max_isometric_force=487.82 optimal_fiber_length=0.0682
        tendon_slack_length=0.0395 pennation_angle_at_optimal=0.1221731
      PathPoint P1: humerus_l (0.00256 0.01063 -0.02593)
      PathPoint P2: scapula_l (-0.03316 0.00182 -0.01156)
      PathPoint P3: scapula_l (-0.0481 0.00663 0.02239)
      PathPoint P3: scapula_l (-0.04472 -0.0125 0.05563)
    Schutte1993Muscle_Deprecated INFSP_l: max_isometric_force=1210.84 optimal_fiber_length=0.0755
        tendon_slack_length=0.0308 pennation_angle_at_optimal=0.3228859
      PathPoint P1: humerus_l (-0.00887 0.00484 -0.02448)
      PathPoint P2: scapula_l (-0.05576 -0.04191 0.02667)
      PathPoint P2: scapula_l (-0.07434 -0.05555 0.04276)
    Schutte1993Muscle_Deprecated SUBSC_l: max_isometric_force=1377.81 optimal_fiber_length=0.0873
        tendon_slack_length=0.033 pennation_angle_at_optimal=0.3490659
      PathPoint P1: humerus_l (0.01403 0.0084 0.01331)
      PathPoint P2: scapula_l (-0.01831 -0.05223 0.02457)
      PathPoint P3: scapula_l (-0.07289 -0.04118 0.06612)
    Schutte1993Muscle_Deprecated TMIN_l: max_isometric_force=354.25 optimal_fiber_length=0.0741
        tendon_slack_length=0.0713 pennation_angle_at_optimal=0.418879
      PathPoint P1: humerus_l (-0.0011 -0.01264 -0.02156)
      PathPoint P2: scapula_l (-0.01883 -0.0136 -0.03106)
      PathPoint P2: scapula_l (-0.09473 -0.07991 0.04737)
      PathPoint P3: scapula_l (-0.09643 -0.08121 0.05298)
    Schutte1993Muscle_Deprecated TMAJ_l: max_isometric_force=425.39 optimal_fiber_length=0.1624
        tendon_slack_length=0.02 pennation_angle_at_optimal=0.2792527
      PathPoint P1: humerus_l (0.00998 -0.05419 0.00568)
      PathPoint P2: scapula_l (-0.10264 -0.10319 0.05829)
      PathPoint P3: scapula_l (-0.10489 -0.10895 0.07117)
    Schutte1993Muscle_Deprecated PECM1_l: max_isometric_force=364.41 optimal_fiber_length=0.1442
        tendon_slack_length=0.0028 pennation_angle_at_optimal=0.296706
      PathPoint P1: humerus_l (0.01169 -0.04191 -0.0078)
      PathPoint P2: humerus_l (0.01615 -0.04045 0.00577)
      PathPoint P3: thorax (0.00958 -0.01509 -0.12664)
      PathPoint P4: clavicle_l (0.00321 -0.00013 -0.05113)
    Schutte1993Muscle_Deprecated PECM2_l: max_isometric_force=515.41 optimal_fiber_length=0.1385
        tendon_slack_length=0.089 pennation_angle_at_optimal=0.4363323
      PathPoint P1: humerus_l (0.01274 -0.04289 -0.00785)
      PathPoint P2: humerus_l (0.01453 -0.04568 0.00687)
      PathPoint P3: thorax (0.02018 -0.04165 -0.1269)
      PathPoint P4: thorax (0.03091 -0.03922 -0.09705)
      PathPoint P5: thorax (0.02769 -0.04498 -0.02271)
    Schutte1993Muscle_Deprecated PECM3_l: max_isometric_force=390.55 optimal_fiber_length=0.1385
        tendon_slack_length=0.132 pennation_angle_at_optimal=0.4363323
      PathPoint P1: humerus_l (0.01269 -0.04375 -0.0075)
      PathPoint P2: humerus_l (0.01243 -0.05157 0.01807)
      PathPoint P3: thorax (0.02984 -0.071 -0.1151)
      PathPoint P4: thorax (0.0525 -0.08417 -0.08935)
      PathPoint P5: thorax (0.05724 -0.11654 -0.03787)
    Schutte1993Muscle_Deprecated LAT1_l: max_isometric_force=389.1 optimal_fiber_length=0.254 tendon_slack_length=0.12
        pennation_angle_at_optimal=0.4363323
      PathPoint P1: humerus_l (0.0105 -0.03415 0.00653)
      PathPoint P2: scapula_l (-0.07947 -0.08581 0.02188)
      PathPoint P3: scapula_l (-0.11215 -0.09779 0.05322)
      PathPoint P4: thorax (-0.11828 -0.10118 -0.03316)
      PathPoint P5: thorax (-0.09578 -0.11724 -0.00882)
    Schutte1993Muscle_Deprecated LAT2_l: max_isometric_force=389.1 optimal_fiber_length=0.2324
        tendon_slack_length=0.1765 pennation_angle_at_optimal=0.3316126
      PathPoint P1: humerus_l (0.00968 -0.04071 0.00611)
      PathPoint P2: scapula_l (-0.0764 -0.1022 0.01808)
      PathPoint P3: scapula_l (-0.10054 -0.13969 0.05258)
      PathPoint P4: thorax (-0.10992 -0.16908 -0.02878)
      PathPoint P5: thorax (-0.07186 -0.18818 -0.00815)
    Schutte1993Muscle_Deprecated LAT3_l: max_isometric_force=281.66 optimal_fiber_length=0.2789
        tendon_slack_length=0.1403 pennation_angle_at_optimal=0.3665191
      PathPoint P1: humerus_l (0.01208 -0.03922 0.00416)
      PathPoint P2: scapula_l (-0.05678 -0.13303 0.0213)
      PathPoint P3: scapula_l (-0.09449 -0.17553 0.04606)
      PathPoint P4: thorax (-0.11157 -0.19387 -0.05532)
      PathPoint P5: thorax (-0.07117 -0.24858 -0.00907)
    Schutte1993Muscle_Deprecated CORB_l: max_isometric_force=242.46 optimal_fiber_length=0.0932
        tendon_slack_length=0.097 pennation_angle_at_optimal=0
      PathPoint P1: scapula_l (0.0125 -0.04127 0.02652)
      PathPoint P2: scapula_l (0.007 -0.0594 0.0091)
      PathPoint P3: humerus_l (0.00743 -0.15048 0.00782)
    Schutte1993Muscle_Deprecated TRIlong_l: max_isometric_force=798.52 optimal_fiber_length=0.134
        tendon_slack_length=0.143 pennation_angle_at_optimal=0.2094395
      PathPoint P1: scapula_l (-0.04565 -0.04073 0.01377)
      PathPoint P2: humerus_l (-0.02714 -0.11441 0.00664)
      PathPoint P3: humerus_l (-0.03184 -0.22637 0.01217)
      PathPoint P4: humerus_l (-0.01743 -0.26757 0.01208)
      PathPoint P5: ulna_l (-0.0219 0.01046 0.00078)
    Schutte1993Muscle_Deprecated TRIlat_l: max_isometric_force=624.3 optimal_fiber_length=0.1138
        tendon_slack_length=0.098 pennation_angle_at_optimal=0.1570796
      PathPoint P1: humerus_l (-0.00599 -0.12646 -0.00428)
      PathPoint P2: humerus_l (-0.02344 -0.14528 -0.00928)
      PathPoint P3: humerus_l (-0.03184 -0.22637 0.01217)
      PathPoint P4: humerus_l (-0.01743 -0.26757 0.01208)
      PathPoint P5: ulna_l (-0.0219 0.01046 0.00078)
    Schutte1993Muscle_Deprecated TRImed_l: max_isometric_force=624.3 optimal_fiber_length=0.1138
        tendon_slack_length=0.0908 pennation_angle_at_optimal=0.1570796
      PathPoint P1: humerus_l (-0.00838 -0.13695 0.00906)
      PathPoint P2: humerus_l (-0.02601 -0.15139 0.0108)
      PathPoint P3: humerus_l (-0.03184 -0.22637 0.01217)
      PathPoint P4: humerus_l (-0.01743 -0.26757 0.01208)
      PathPoint P5: ulna_l (-0.0219 0.01046 0.00078)
    Schutte1993Muscle_Deprecated ANC_l: max_isometric_force=350 optimal_fiber_length=0.027 tendon_slack_length=0.018
        pennation_angle_at_optimal=0
      PathPoint P1: humerus_l (-0.00744 -0.28359 -0.00979)
      PathPoint P2: ulna_l (-0.02532 -0.00124 -0.006)
    Schutte1993Muscle_Deprecated SUP_l: max_isometric_force=476 optimal_fiber_length=0.033 tendon_slack_length=0.028
        pennation_angle_at_optimal=0
      PathPoint P1: radius_l (0.00996 -0.06096 -0.00075)
      PathPoint P2: radius_l (0.01201 -0.0517 0.00107)
      PathPoint P3: ulna_l (-0.0136 -0.03384 -0.02013)
    Schutte1993Muscle_Deprecated BIClong_l: max_isometric_force=624.3 optimal_fiber_length=0.1157
        tendon_slack_length=0.2723 pennation_angle_at_optimal=0
      PathPoint P1: scapula_l (-0.03123 -0.02353 0.01305)
      PathPoint P2: scapula_l (-0.02094 -0.01309 0.00461)
      PathPoint P3: humerus_l (0.02131 0.01793 -0.01028)
      PathPoint P4: humerus_l (0.02378 -0.00511 -0.01201)
      PathPoint P5: humerus_l (0.01345 -0.02827 -0.00136)
      PathPoint P6: humerus_l (0.01068 -0.07736 0.00165)
      PathPoint P7: humerus_l (0.01703 -0.12125 -0.00024)
      PathPoint P8: humerus_l (0.0228 -0.1754 0.0063)
      ConditionalPathPoint P10: radius_l (-0.00079 0.02719 -0.00657) range=(-0.638791 1.5708) coordinate=pro_sup_l
      PathPoint P10: radius_l (-0.00505 0.00636 -0.01184)
      PathPoint P11: radius_l (-0.002 -0.0375 0.002)
    Schutte1993Muscle_Deprecated BICshort_l: max_isometric_force=435.56 optimal_fiber_length=0.1321
        tendon_slack_length=0.1923 pennation_angle_at_optimal=0
      PathPoint P1: scapula_l (0.01268 -0.03931 0.02625)
      PathPoint P2: scapula_l (0.0142 -0.06136 -0.0061)
      PathPoint P3: humerus_l (0.01117 -0.07576 0.01101)
      PathPoint P4: humerus_l (0.01703 -0.12125 0.01079)
      PathPoint P5: humerus_l (0.0228 -0.1754 0.0063)
      ConditionalPathPoint P7: radius_l (-0.00079 0.02719 -0.00657) range=(-0.638791 1.5708) coordinate=pro_sup_l
      PathPoint P7: radius_l (-0.00505 0.00636 -0.01184)
      PathPoint P8: radius_l (-0.002 -0.0375 0.002)
    Schutte1993Muscle_Deprecated BRA_l: max_isometric_force=987.26 optimal_fiber_length=0.0858
        tendon_slack_length=0.0535 pennation_angle_at_optimal=0
      PathPoint P1: humerus_l (0.0068 -0.1739 0.0036)
      ConditionalPathPoint P2: humerus_l (0.01894 -0.28559 0.01105) range=(0 0.813149) coordinate=elbow_flexion_l
      ConditionalPathPoint P3: ulna_l (0.00498 -0.01463 -0.00128) range=(0 0.813149) coordinate=elbow_flexion_l
      PathPoint P4: ulna_l (-0.0032 -0.0239 -0.0009)
    Schutte1993Muscle_Deprecated BRD_l: max_isometric_force=261.33 optimal_fiber_length=0.1726
        tendon_slack_length=0.133 pennation_angle_at_optimal=0
      PathPoint P1: humerus_l (-0.0098 -0.19963 -0.00223)
      PathPoint P2: radius_l (0.0084 0.0041 -0.01424)
      PathPoint P2: radius_l (0.03577 -0.12742 -0.02315)
      PathPoint P3: radius_l (0.0419 -0.221 -0.0224)
    Schutte1993Muscle_Deprecated ECRL_l: max_isometric_force=304.89 optimal_fiber_length=0.081
        tendon_slack_length=0.224 pennation_angle_at_optimal=0
      PathPoint P1: humerus_l (-0.0073 -0.2609 -0.0091)
      PathPoint P2: radius_l (0.03415 0.03747 -0.00758)
      PathPoint P2: radius_l (0.03195 -0.13463 -0.02779)
      PathPoint P3: radius_l (0.04243 -0.23684 -0.0362)
      PathPoint P4: secondmc_l (0.00249 0.0164 -0.0008)
    Schutte1993Muscle_Deprecated ECRB_l: max_isometric_force=100.52 optimal_fiber_length=0.0585
        tendon_slack_length=0.2223 pennation_angle_at_optimal=0.1553343
      PathPoint P1: humerus_l (0.01349 -0.29048 -0.01698)
      PathPoint P2: radius_l (0.02905 -0.13086 -0.02385)
      PathPoint P3: radius_l (0.03549 -0.22805 -0.03937)
      PathPoint P4: thirdmc_l (0.00452 0.02788 -0.00112)
    Schutte1993Muscle_Deprecated ECU_l: max_isometric_force=93.17 optimal_fiber_length=0.0622
        tendon_slack_length=0.2285 pennation_angle_at_optimal=0.06108652
      PathPoint P1: humerus_l (0.00083 -0.28955 -0.0188)
      PathPoint P2: ulna_l (-0.01391 -0.03201 -0.02947)
      PathPoint P3: ulna_l (-0.01705 -0.05428 -0.02868)
      PathPoint P4: ulna_l (-0.01793 -0.09573 -0.03278)
      PathPoint P5: radius_l (-0.01421 -0.22696 -0.03481)
      PathPoint P6: fifthmc_l (-0.00061 0.02067 -0.00294)
    Schutte1993Muscle_Deprecated FCR_l: max_isometric_force=73.96 optimal_fiber_length=0.0628 tendon_slack_length=0.244
        pennation_angle_at_optimal=0.05410521
      PathPoint P1: humerus_l (0.00758 -0.27806 0.03705)
      PathPoint P2: radius_l (0.0211 -0.21943 -0.00127)
      PathPoint P3: secondmc_l (-0.01 0.04 0.025)
      PathPoint P3: secondmc_l (-0.00345 0.01918 0.00921)
    Schutte1993Muscle_Deprecated FCU_l: max_isometric_force=128.93 optimal_fiber_length=0.0509
        tendon_slack_length=0.265 pennation_angle_at_optimal=0.2111848
      PathPoint P1: humerus_l (0.00219 -0.2774 0.0388)
      PathPoint P2: radius_l (0.05127 0.0136 0.00279)
      PathPoint P3: radius_l (0.00121 -0.26351 -0.02627)
      PathPoint P4: fifthmc_l (0.00154 0.01703 0.0033)
    Schutte1993Muscle_Deprecated PL_l: max_isometric_force=26.72 optimal_fiber_length=0.0638 tendon_slack_length=0.2694
        pennation_angle_at_optimal=0.06981317
      PathPoint P1: humerus_l (0.00457 -0.27519 0.03865)
      PathPoint P2: radius_l (0.02531 -0.23915 0.00276)
      PathPoint P3: capitate_l (0.00917 -0.01898 0.01754)
      PathPoint P4: thirdmc_l (0.00179 0.00828 0.00245)
    Schutte1993Muscle_Deprecated PT_l: max_isometric_force=566.22 optimal_fiber_length=0.0492 tendon_slack_length=0.098
        pennation_angle_at_optimal=0.1745329
      PathPoint P1: humerus_l (0.0036 -0.2759 0.0365)
      PathPoint P2: ulna_l (0.00846 -0.03373 0.01432)
      PathPoint P3: ulna_l (0.00464 -0.00026 0.00214)
      ConditionalPathPoint P4: radius_l (0.0236 -0.0934 -0.0094) range=(-1.5708 0.509636) coordinate=pro_sup_l
      PathPoint P5: radius_l (0.0254 -0.1088 -0.0198)
    Schutte1993Muscle_Deprecated PQ_l: max_isometric_force=75.48 optimal_fiber_length=0.0282 tendon_slack_length=0.005
        pennation_angle_at_optimal=0.1745329
      PathPoint P1: radius_l (0.03245 -0.19998 -0.01962)
      PathPoint P2: ulna_l (0.00193 -0.20972 -0.03632)
    Schutte1993Muscle_Deprecated FDSL_l: max_isometric_force=16.55 optimal_fiber_length=0.0515
        tendon_slack_length=0.3383 pennation_angle_at_optimal=0.08726646
      PathPoint P1: humerus_l (0.00421 -0.27598 0.03864)
      PathPoint P2: radius_l (0.01377 -0.18718 -0.00205)
      PathPoint P3: capitate_l (-0.00235 -0.01393 0.01376)
      PathPoint P4: fourthmc_l (-0.00294 0.00846 0.01213)
      PathPoint P5: fifthmc_l (-0.00032 -0.01968 0.00757)
      PathPoint P6: 5proxph_l (-0.00323 -0.03568 0.00417)
      PathPoint P7: 5midph_l (-0.0026 -0.01983 0.0035)
    Schutte1993Muscle_Deprecated FDSR_l: max_isometric_force=57.9 optimal_fiber_length=0.0736 tendon_slack_length=0.328
        pennation_angle_at_optimal=0.06981317
      PathPoint P1: humerus_l (0.00479 -0.2788 0.03731)
      PathPoint P2: radius_l (0.01571 -0.18666 -0.00267)
      PathPoint P3: capitate_l (0.00564 0.02496 0.0066)
      PathPoint P3: capitate_l (-0.00082 -0.01344 0.01359)
      PathPoint P4: thirdmc_l (-0.00914 0.00544 0.01085)
      PathPoint P5: fourthmc_l (-0.0029 -0.02334 0.00767)
      PathPoint P6: 4proxph_l (-0.00172 -0.03947 0.00102)
      PathPoint P7: 4midph_l (-2e-5 -0.02501 -0.00029)
    Schutte1993Muscle_Deprecated FDSM_l: max_isometric_force=91.03 optimal_fiber_length=0.0749
        tendon_slack_length=0.295 pennation_angle_at_optimal=0.1221731
      PathPoint P1: ulna_l (-0.00669 -0.02713 0.00191)
      PathPoint P2: radius_l (0.01899 -0.18706 -0.00424)
      PathPoint P3: capitate_l (0.01064 0.02328 0.01135)
      PathPoint P3: capitate_l (0.0068 -0.01377 0.01399)
      PathPoint P4: thirdmc_l (0.00128 0.00639 0.00952)
      PathPoint P5: thirdmc_l (0.00263 -0.02478 0.00183)
      PathPoint P6: 3proxph_l (0.00252 -0.04307 -0.00417)
      PathPoint P7: 3midph_l (0.00155 -0.02773 -0.00067)
    Schutte1993Muscle_Deprecated FDSI_l: max_isometric_force=61.24 optimal_fiber_length=0.0835
        tendon_slack_length=0.275 pennation_angle_at_optimal=0.1047198
      PathPoint P1: ulna_l (-0.00676 -0.02819 0.00137)
      PathPoint P2: radius_l (0.02145 -0.18623 -0.00552)
      PathPoint P3: capitate_l (0.015 0.02328 0.02328)
      PathPoint P3: capitate_l (0.00889 -0.01366 0.01387)
      PathPoint P4: secondmc_l (-0.00407 -0.00025 0.00479)
      PathPoint P5: secondmc_l (0.00304 -0.02206 0.00579)
      PathPoint P6: 2proxph_l (0.00427 -0.03367 -0.00444)
      PathPoint P7: 2midph_l (0.00228 -0.02088 0.00029)
    Schutte1993Muscle_Deprecated FDPL_l: max_isometric_force=79.65 optimal_fiber_length=0.0749
        tendon_slack_length=0.2819 pennation_angle_at_optimal=0.1396263
      PathPoint P1: ulna_l (-0.00628 -0.03214 -0.00254)
      PathPoint P2: radius_l (0.01409 -0.18516 -0.00861)
      PathPoint P3: capitate_l (-0.00257 0.025 0.005)
      PathPoint P3: capitate_l (-0.00088 -0.01027 0.01188)
      PathPoint P4: fourthmc_l (-0.00686 0.0089 0.00619)
      PathPoint P5: fifthmc_l (-0.00185 -0.01878 0.00706)
      PathPoint P6: 5proxph_l (-0.0049 -0.03465 0.00598)
      PathPoint P7: 5distph_l (-0.00032 -0.00433 0.00165)
    Schutte1993Muscle_Deprecated FDPR_l: max_isometric_force=64.08 optimal_fiber_length=0.0798
        tendon_slack_length=0.282 pennation_angle_at_optimal=0.1221731
      PathPoint P1: ulna_l (-0.00502 -0.03374 -0.00273)
      PathPoint P2: radius_l (0.0158 -0.18629 -0.00803)
      PathPoint P3: capitate_l (-0.00257 0.025 0.005)
      PathPoint P3: capitate_l (0.00106 -0.01177 0.01184)
      PathPoint P4: thirdmc_l (-0.0104 0.00473 0.00804)
      PathPoint P5: fourthmc_l (-0.00289 -0.02297 0.00609)
      PathPoint P6: 4proxph_l (-0.00304 -0.04002 0.00075)
      PathPoint P7: 4distph_l (0.0001 -0.0066 0.00066)
    Schutte1993Muscle_Deprecated FDPM_l: max_isometric_force=81.65 optimal_fiber_length=0.0835
        tendon_slack_length=0.293 pennation_angle_at_optimal=0.1047198
      PathPoint P1: ulna_l (-0.00522 -0.03327 -0.0021)
      PathPoint P2: radius_l (0.01906 -0.18644 -0.00785)
      PathPoint P3: capitate_l (0.000209 0.025 0.005)
      PathPoint P3: capitate_l (0.00335 -0.0128 0.01144)
      PathPoint P4: thirdmc_l (-0.00128 0.00609 0.00838)
      PathPoint P5: thirdmc_l (0.00034 -0.02347 0.00303)
      PathPoint P6: 3proxph_l (0.00102 -0.04333 -0.00294)
      PathPoint P7: 3distph_l (0.00023 -0.00505 0.00226)
    Schutte1993Muscle_Deprecated FDPI_l: max_isometric_force=68.27 optimal_fiber_length=0.0749
        tendon_slack_length=0.2935 pennation_angle_at_optimal=0.1221731
      PathPoint P1: ulna_l (-0.00647 -0.03176 -0.0028)
      PathPoint P2: radius_l (0.0208 -0.1856 -0.00915)
      PathPoint P3: capitate_l (0.003884 0.025 0.005)
      PathPoint P3: capitate_l (0.00896 -0.01168 0.01212)
      PathPoint P4: secondmc_l (-0.00432 0.00663 0.00248)
      PathPoint P5: secondmc_l (0.0042 -0.02262 0.00499)
      PathPoint P6: 2proxph_l (0.00581 -0.03555 -0.00306)
      PathPoint P7: 2distph_l (0.00046 -0.0046 0.00301)
    Schutte1993Muscle_Deprecated EDCL_l: max_isometric_force=13.11 optimal_fiber_length=0.065
        tendon_slack_length=0.2965 pennation_angle_at_optimal=0.03490659
      PathPoint P1: humerus_l (-0.0004 -0.28831 -0.0187)
      PathPoint P2: radius_l (0.0013 -0.03888 -0.01405)
      PathPoint P3: radius_l (0.00993 -0.22304 -0.03618)
      PathPoint P4: fifthmc_l (-0.00478 -0.01915 -0.00447)
      PathPoint P5: 5proxph_l (-0.00716 -0.03302 0.00089)
      PathPoint P6: 5distph_l (-0.00142 0.00068 -0.00115)
    Schutte1993Muscle_Deprecated EDCR_l: max_isometric_force=34.04 optimal_fiber_length=0.0626
        tendon_slack_length=0.327 pennation_angle_at_optimal=0.05235988
      PathPoint P1: humerus_l (-0.00156 -0.28936 -0.01782)
      PathPoint P2: radius_l (0.0026 -0.03991 -0.01552)
      PathPoint P3: radius_l (0.00882 -0.22366 -0.04284)
      PathPoint P4: fourthmc_l (-0.00338 -0.0233 -0.00513)
      PathPoint P5: 4proxph_l (-0.00546 -0.03868 -0.00413)
      PathPoint P6: 4distph_l (-0.00171 -0.00375 -0.00241)
    Schutte1993Muscle_Deprecated EDCM_l: max_isometric_force=35.32 optimal_fiber_length=0.0724
        tendon_slack_length=0.335 pennation_angle_at_optimal=0.05235988
      PathPoint P1: humerus_l (0.00051 -0.28984 -0.01949)
      PathPoint P2: radius_l (0.00316 -0.03948 -0.01528)
      PathPoint P3: radius_l (0.0144 -0.22323 -0.04223)
      PathPoint P4: thirdmc_l (0.00131 -0.02342 -0.00764)
      PathPoint P5: 3proxph_l (0.00179 -0.04239 -0.01003)
      PathPoint P6: 3distph_l (0.00077 -0.01111 -0.00201)
    Schutte1993Muscle_Deprecated EDCI_l: max_isometric_force=18.26 optimal_fiber_length=0.07 tendon_slack_length=0.322
        pennation_angle_at_optimal=0.05235988
      PathPoint P1: humerus_l (0.00065 -0.28898 -0.01869)
      PathPoint P2: radius_l (0.00228 -0.03918 -0.01483)
      PathPoint P3: radius_l (0.01533 -0.22314 -0.04196)
      PathPoint P4: secondmc_l (0.00474 -0.02656 -0.01293)
      PathPoint P5: 2proxph_l (0.00192 -0.01101 -0.01021)
      PathPoint P6: 2proxph_l (0.00771 -0.04191 -0.01399)
      PathPoint P7: 2midph_l (0.00123 -0.00941 -0.00581)
      PathPoint P8: 2midph_l (0.0026 -0.01959 -0.00363)
      PathPoint P9: 2distph_l (0.00025 -0.0037 -0.00228)
    Schutte1993Muscle_Deprecated EDM_l: max_isometric_force=25.25 optimal_fiber_length=0.0675 tendon_slack_length=0.322
        pennation_angle_at_optimal=0.05235988
      PathPoint P1: humerus_l (0.00089 -0.28919 -0.01847)
      PathPoint P2: ulna_l (-0.00977 -0.03907 -0.03085)
      PathPoint P3: ulna_l (-0.00755 -0.08267 -0.03646)
      PathPoint P4: radius_l (0.00454 -0.22641 -0.03678)
      PathPoint P5: fifthmc_l (0.00131 0.02436 -0.00794)
      PathPoint P6: fifthmc_l (-0.00537 -0.01848 -0.00316)
      PathPoint P7: 5proxph_l (-0.0054 -0.03237 -0.00015)
      PathPoint P8: 5distph_l (-0.00226 -0.00334 -0.00062)
    Schutte1993Muscle_Deprecated EIP_l: max_isometric_force=21.7 optimal_fiber_length=0.0589 tendon_slack_length=0.186
        pennation_angle_at_optimal=0.1047198
      PathPoint P1: ulna_l (-0.00394 -0.16652 -0.03682)
      PathPoint P2: ulna_l (0.00171 -0.17469 -0.04049)
      PathPoint P3: radius_l (0.01076 -0.22783 -0.03664)
      PathPoint P4: secondmc_l (-0.01081 0.01528 -0.00681)
      PathPoint P5: secondmc_l (0.00441 -0.02602 -0.01285)
      PathPoint P6: 2proxph_l (0.00171 -0.01033 -0.00947)
      PathPoint P7: 2proxph_l (0.00714 -0.04133 -0.01413)
      PathPoint P8: 2midph_l (0.00115 -0.00899 -0.00597)
      PathPoint P9: 2midph_l (0.00294 -0.02043 -0.00377)
      PathPoint P10: 2distph_l (0.00264 -0.01233 -0.00266)
    Schutte1993Muscle_Deprecated EPL_l: max_isometric_force=39.46 optimal_fiber_length=0.054 tendon_slack_length=0.2205
        pennation_angle_at_optimal=0.1047198
      PathPoint P1: ulna_l (-0.01412 -0.09706 -0.02952)
      PathPoint P2: radius_l (0.00124 -0.13668 -0.0227)
      PathPoint P3: radius_l (0.02702 -0.21872 -0.03828)
      PathPoint P4: radius_l (0.03382 -0.22754 -0.04607)
      PathPoint P5: radius_l (0.04234 -0.23771 -0.04173)
      PathPoint P6: capitate_l (0.02428 0.00014 -0.00608)
      PathPoint P7: trapezium_l (0.00809 -0.0046 -0.00992)
      PathPoint P8: firstmc_l (0.00656 -0.0043 -0.00792)
      PathPoint P9: firstmc_l (0.02165 -0.0242 0.00533)
      PathPoint P10: proximal_thumb_l (0.01147 -0.00362 -0.00156)
      PathPoint P11: proximal_thumb_l (0.01921 -0.0265 0.01038)
      PathPoint P12: distal_thumb_l (0.00543 -0.00714 0.00464)
    Schutte1993Muscle_Deprecated EPB_l: max_isometric_force=14.2 optimal_fiber_length=0.0675 tendon_slack_length=0.1155
        pennation_angle_at_optimal=0.1256637
      PathPoint P1: radius_l (0.01924 -0.14695 -0.02114)
      PathPoint P2: radius_l (0.02276 -0.15857 -0.02665)
      PathPoint P3: radius_l (0.03831 -0.19722 -0.03834)
      PathPoint P4: radius_l (0.05235 -0.23611 -0.02699)
      PathPoint P5: capitate_l (0.03123 0.00256 0.00327)
      PathPoint P6: trapezium_l (0.01443 -0.00337 0.00405)
      PathPoint P7: firstmc_l (0.02173 -0.02303 0.01141)
      PathPoint P8: proximal_thumb_l (0.00927 -0.00618 0.00557)
    Schutte1993Muscle_Deprecated FPL_l: max_isometric_force=77.2 optimal_fiber_length=0.0552 tendon_slack_length=0.1938
        pennation_angle_at_optimal=0.1221731
      PathPoint P1: radius_l (0.00971 -0.09458 -0.01769)
      PathPoint P2: radius_l (0.01658 -0.13525 -0.01915)
      PathPoint P3: radius_l (0.01869 -0.17932 -0.01988)
      PathPoint P4: radius_l (0.038 -0.23171 -0.0158)
      PathPoint P5: capitate_l (0.01869 0.00882 0.01547)
      PathPoint P6: capitate_l (0.01244 -0.02207 0.02089)
      PathPoint P7: firstmc_l (-0.00608 -0.01624 0.0094)
      PathPoint P8: firstmc_l (0.00208 -0.02297 0.00956)
      PathPoint P9: proximal_thumb_l (-0.0045 -0.01842 0.00508)
      PathPoint P10: proximal_thumb_l (0.0059 -0.02602 0.01114)
      PathPoint P11: distal_thumb_l (0.00242 -0.01127 0.00412)
    Schutte1993Muscle_Deprecated APL_l: max_isometric_force=59.53 optimal_fiber_length=0.0713
        tendon_slack_length=0.1295 pennation_angle_at_optimal=0.1308997
      PathPoint P1: radius_l (0.01154 -0.09477 -0.01681)
      PathPoint P2: radius_l (0.0303 -0.1397 -0.03507)
      PathPoint P3: radius_l (0.03993 -0.16072 -0.034)
      PathPoint P4: radius_l (0.04397 -0.17845 -0.03134)
      PathPoint P5: radius_l (0.05505 -0.23084 -0.02368)
      PathPoint P6: capitate_l (0.03385 0.00634 0.00745)
      PathPoint P7: trapezium_l (0.01058 0.00662 0.00619)
      PathPoint P8: firstmc_l (0.00629 0.00323 0.00589)
      PathPoint P9: firstmc_l (0.00827 -0.00586 0.00604)
    ObjectGroup R_hip_abd: members=(glut_max1_r glut_med1_r glut_med2_r glut_med3_r peri_r sar_r tfl_r)
    ObjectGroup R_hip_flex: members=(glut_med1_r grac_r iliacus_r pect_r psoas_r rect_fem_r sar_r tfl_r)
    ObjectGroup R_hip_inrot: members=(glut_med1_r iliacus_r psoas_r tfl_r)
    ObjectGroup R_hip_exrot: members=(gem_r glut_med3_r peri_r quad_fem_r)
    ObjectGroup R_hip_ext: members=(add_mag2_r bifemlh_r glut_max1_r glut_max2_r glut_max3_r glut_med3_r)
    ObjectGroup R_hip_add: members=(add_mag2_r bifemlh_r grac_r pect_r)
    ObjectGroup R_knee_bend: members=(bifemlh_r bifemsh_r grac_r med_gas_r sar_r)
    ObjectGroup R_knee_ext: members=(rect_fem_r vas_int_r)
    ObjectGroup R_ankle_pf: members=(med_gas_r soleus_r tib_post_r)
    ObjectGroup R_inverter: members=(tib_ant_r tib_post_r)
    ObjectGroup R_ankle_df: members=tib_ant_r
    ObjectGroup L_hip_abd: members=(glut_max1_l glut_med1_l glut_med2_l glut_med3_l peri_l sar_l tfl_l)
    ObjectGroup L_hip_flex: members=(glut_med1_l grac_l iliacus_l pect_l psoas_l rect_fem_l sar_l tfl_l)
    ObjectGroup L_hip_inrot: members=(glut_med1_l iliacus_l psoas_l tfl_l)
    ObjectGroup L_hip_exrot: members=(gem_l glut_med3_l peri_l quad_fem_l)
    ObjectGroup L_hip_ext: members=(add_mag2_l bifemlh_l glut_max1_l glut_max2_l glut_max3_l glut_med3_l)
    ObjectGroup L_hip_add: members=(add_mag2_l bifemlh_l grac_l pect_l)
    ObjectGroup L_knee_bend: members=(bifemlh_l bifemsh_l grac_l med_gas_l sar_l)
    ObjectGroup L_knee_ext: members=(rect_fem_l vas_int_l)
    ObjectGroup L_ankle_pf: members=(med_gas_l soleus_l tib_post_l)
    ObjectGroup L_inverter: members=(tib_ant_l tib_post_l)
    ObjectGroup L_ankle_df: members=tib_ant_l
    ObjectGroup back_ext: members=(ercspn_l ercspn_r)
    ObjectGroup back_rlb: members=(ercspn_r extobl_r intobl_r)
    ObjectGroup back_introt: members=(ercspn_r extobl_l intobl_r)
    ObjectGroup back_llb: members=(ercspn_l extobl_l intobl_l)
    ObjectGroup back_extrot: members=(ercspn_l extobl_r intobl_l)
    ObjectGroup back_flex: members=(extobl_l extobl_r intobl_l intobl_r)
    ObjectGroup shoulder: members=(CORB DELT1 DELT2 DELT3 INFSP LAT1 LAT2 LAT3 PECM1 PECM2 PECM3 SUBSC SUPSP TMAJ TMIN)
    ObjectGroup elbow: members=(ANC BIClong BICshort BRA BRD ECRL PT TRIlat TRIlong TRImed)
    ObjectGroup forearm: members=(APL ECRB ECU EDCI EDCL EDCM EDCR EDM EIP EPB EPL FCR FCU FDPI FDPL FDPM FDPR FDSI FDSL FDSM FDSR FPL PL PQ PT SUP)
    ObjectGroup extensor: members=(ECRB ECU EDCI EDCL EDCM EDCR EDM EIP EPL)
    ObjectGroup radial: members=(APL ECRB EDCI EDCM EIP EPB EPL FCR FDPI FDSI FDSM FPL PL)
    ObjectGroup wrist: members=(ECRB ECU FCR FCU)
    ObjectGroup ulnar: members=(ECU EDCL EDCR EDM FCU FDPL FDPM FDPR FDSL FDSR)
    ObjectGroup flexor: members=(APL EPB FCR FCU FDPI FDPL FDPM FDPR FDSI FDSL FDSM FDSR FPL PL)
    ObjectGroup hand: members=(APL EDCI EDCL EDCM EDCR EDM EIP EPB EPL FDPI FDPL FDPM FDPR FDSI FDSL FDSM FDSR FPL PL)
    ObjectGroup thumb: members=(APL EPB EPL FPL)
    ObjectGroup shoulder_l: members=(CORB_l DELT1_l DELT2_l DELT3_l INFSP_l LAT1_l LAT2_l LAT3_l PECM1_l PECM2_l PECM3_l SUBSC_l SUPSP_l TMAJ_l TMIN_l)
    ObjectGroup elbow_l: members=(ANC_l BIClong_l BICshort_l BRA_l BRD_l ECRL_l PT_l TRIlat_l TRIlong_l TRImed_l)
    ObjectGroup forearm_l: members=(APL_l ECRB_l ECU_l EDCI_l EDCL_l EDCM_l EDCR_l EDM_l EIP_l EPB_l EPL_l FCR_l FCU_l FDPI_l FDPL_l FDPM_l FDPR_l FDSI_l FDSL_l FDSM_l FDSR_l FPL_l PL_l PQ_l PT_l SUP_l)
    ObjectGroup extensor_l: members=(ECRB_l ECU_l EDCI_l EDCL_l EDCM_l EDCR_l EDM_l EIP_l EPL_l)
    ObjectGroup radial_l: members=(APL_l ECRB_l EDCI_l EDCM_l EIP_l EPB_l EPL_l FCR_l FDPI_l FDSI_l FDSM_l FPL_l PL_l)
    ObjectGroup wrist_l: members=(ECRB_l ECU_l FCR_l FCU_l)
    ObjectGroup ulnar_l: members=(ECU_l EDCL_l EDCR_l EDM_l FCU_l FDPL_l FDPM_l FDPR_l FDSL_l FDSR_l)
    ObjectGroup flexor_l: members=(APL_l EPB_l FCR_l FCU_l FDPI_l FDPL_l FDPM_l FDPR_l FDSI_l FDSL_l FDSM_l FDSR_l FPL_l PL_l)
    ObjectGroup hand_l: members=(APL_l EDCI_l EDCL_l EDCM_l EDCR_l EDM_l EIP_l EPB_l EPL_l FDPI_l FDPL_l FDPM_l FDPR_l FDSI_l FDSL_l FDSM_l FDSR_l FPL_l PL_l)
    ObjectGroup thumb_l: members=(APL_l EPB_l EPL_l FPL_l)
  MarkerSet:
    Marker ToeTipR: toes_r (0.075 0 -0.015)
    Marker ToeTipL: toes_l (0.075 0 0.015)
    Marker HandCenterR: lunate_r (0 -0.05 -0.01)
    Marker HandCenterL: lunate_l (0 -0.05 0.01)
