# OpenSim document version 20200
Model TestShoulderModel:
  credits: Ricardo Matias, Ajay Seth
  publications: List of publications related to model...
  length_units: meters
  force_units: N
  gravity: 0 -9.80665 0
  defaults: Thelen2003Muscle default: min_control=0.01 max_control=1 max_isometric_force=546
      optimal_fiber_length=0.0535 tendon_slack_length=0.078 pennation_angle=0 activation_time_constant=0.01
      deactivation_time_constant=0.04 Vmax=10 Vmax0=5 FmaxTendonStrain=0.033 FmaxMuscleStrain=0.6 KshapeActive=0.5
      KshapePassive=4 damping=0.05 Af=0.3 Flen=1.8
  ForceSet:
    Ligament ACLigament: resting_length=0.024 pcsa_force=100
      PathPoint ACligament-P1: clavicle (-0.02462 0.02129 0.1155)
      PathPoint ACligament-P2: scapula (-0.00829 0.00046 -0.00548)
      force_length_curve: NaturalCubicSpline: x=(-10 -0.002 -0.001 0 0.00131 0.00281 0.00431 0.00581 0.00731 0.00881 0.0103 0.0118 0.0123 9.2 9.201 9.202 20)
          y=(0 0 0 0 0.0108 0.0257 0.0435 0.0652 0.0915 0.123 0.161 0.208 0.227 345 345 345 345)
    Thelen2003Muscle [values shared by the 96 below unless stated]: min_control=0.01 max_control=1 pennation_angle=0
        activation_time_constant=0.01 deactivation_time_constant=0.04 Vmax=10 Vmax0=5 FmaxTendonStrain=0.033
        FmaxMuscleStrain=0.6 KshapeActive=0.5 KshapePassive=4 damping=0.05 Af=0.3 Flen=1.8
    Thelen2003Muscle TrapeziusScapula1: max_isometric_force=165.2 optimal_fiber_length=0.1446 tendon_slack_length=0.009
      PathPoint P1: thorax (-0.07575 0.03325 -0.00793)
      PathPoint P2: scapula (-0.03824 0.00797 -0.01178)
      PathWrap: wrap_object=Thorax method=hybrid
    Thelen2003Muscle TrapeziusScapula2: max_isometric_force=235.2 optimal_fiber_length=0.1127 tendon_slack_length=0.027
      PathPoint P1: thorax (-0.07652 0.03078 -0.00798)
      PathPoint P2: scapula (-0.05175 0.00689 -0.02445)
      PathWrap: wrap_object=Thorax method=hybrid
    Thelen2003Muscle TrapeziusScapula3: max_isometric_force=278.6 optimal_fiber_length=0.107 tendon_slack_length=0.054
      PathPoint P1: thorax (-0.07839 0.02393 -0.00465)
      PathPoint P2: scapula (-0.0619 0.00197 -0.04442)
      PathWrap: wrap_object=Thorax method=hybrid
    Thelen2003Muscle TrapeziusScapula4: max_isometric_force=193.2 optimal_fiber_length=0.0952 tendon_slack_length=0.053
      PathPoint P1: thorax (-0.08078 0.01928 -0.00434)
      PathPoint P2: scapula (-0.06709 -0.00038 -0.05604)
      PathWrap: wrap_object=Thorax method=hybrid
    Thelen2003Muscle TrapeziusScapula5: max_isometric_force=170.8 optimal_fiber_length=0.0924 tendon_slack_length=0.035
      PathPoint P1: thorax (-0.0831 0.00991 -0.00428)
      PathPoint P2: scapula (-0.06636 -0.00088 -0.0647)
      PathWrap: wrap_object=Thorax method=hybrid
    Thelen2003Muscle TrapeziusScapula6: max_isometric_force=141.4 optimal_fiber_length=0.0893 tendon_slack_length=0.033
      PathPoint P1: thorax (-0.09024 -0.01245 -0.0068)
      PathPoint P2: scapula (-0.06973 -0.00372 -0.05366)
      PathWrap: wrap_object=Thorax method=hybrid
    Thelen2003Muscle TrapeziusScapula7: max_isometric_force=135.8 optimal_fiber_length=0.0868 tendon_slack_length=0.036
      PathPoint P1: thorax (-0.09715 -0.04089 -0.00571)
      PathPoint P2: scapula (-0.06636 -0.00088 -0.0647)
      PathWrap: wrap_object=Thorax method=hybrid
    Thelen2003Muscle TrapeziusScapula8: max_isometric_force=193.2 optimal_fiber_length=0.077 tendon_slack_length=0.048
      PathPoint P1: thorax (-0.10006 -0.06502 -0.00171)
      PathPoint P2: scapula (-0.07108 -0.00356 -0.06083)
      PathWrap: wrap_object=Thorax method=hybrid
    Thelen2003Muscle TrapeziusScapula9: max_isometric_force=172.2 optimal_fiber_length=0.1011 tendon_slack_length=0.034
      PathPoint P1: thorax (-0.10052 -0.10422 -0.00085)
      PathPoint P2: scapula (-0.0741 -0.00589 -0.08033)
      PathWrap: wrap_object=Thorax method=hybrid
    Thelen2003Muscle TrapeziusScapula10: max_isometric_force=113.4 optimal_fiber_length=0.1264
        tendon_slack_length=0.025
      PathPoint P1: thorax (-0.10162 -0.13457 0.00115)
      PathPoint P2: scapula (-0.07572 -0.00945 -0.07389)
      PathWrap: wrap_object=Thorax method=hybrid
    Thelen2003Muscle TrapeziusScapula11: max_isometric_force=128.8 optimal_fiber_length=0.1355
        tendon_slack_length=0.027
      PathPoint P1: thorax (-0.09736 -0.1597 0.00324)
      PathPoint P2: scapula (-0.07473 -0.00927 -0.06712)
      PathWrap: wrap_object=Thorax method=hybrid
    Thelen2003Muscle TrapeziusClavicle1: max_isometric_force=135.8 optimal_fiber_length=0.1547
        tendon_slack_length=0.047
      PathPoint P1: thorax (-0.06682 0.13828 0.00048)
      PathPoint P2: scapula (-0.01735 0.00765 -0.05004)
      PathWrap: wrap_object=Thorax method=hybrid
    Thelen2003Muscle TrapeziusClavicle2: max_isometric_force=65.8 optimal_fiber_length=0.168 tendon_slack_length=0.042
      PathPoint P1: thorax (-0.06791 0.07713 0.00478)
      PathPoint P2: scapula (-0.02153 0.01027 -0.02687)
      PathWrap: wrap_object=Thorax method=hybrid
    Thelen2003Muscle SerratusAnterior1: max_isometric_force=85.4 optimal_fiber_length=0.1635 tendon_slack_length=0.025
      PathPoint P1: scapula (-0.1063 -0.11725 -0.0893)
      PathPoint P2: thorax (-0.0240605 -0.1721778 0.1354761)
      PathWrap: wrap_object=Thorax method=hybrid
    Thelen2003Muscle SerratusAnterior2: max_isometric_force=154 optimal_fiber_length=0.1667 tendon_slack_length=0.009
      PathPoint P1: scapula (-0.10352 -0.11112 -0.09357)
      PathPoint P2: thorax (-0.01524942 -0.1522158 0.1376987)
      PathWrap: wrap_object=Thorax method=hybrid
    Thelen2003Muscle SerratusAnterior3: max_isometric_force=147 optimal_fiber_length=0.1622 tendon_slack_length=0.007
      PathPoint P1: scapula (-0.10435 -0.11898 -0.09064)
      PathPoint P2: thorax (-0.00439072 -0.1242419 0.1366048)
      PathWrap: wrap_object=Thorax method=hybrid
    Thelen2003Muscle SerratusAnterior4: max_isometric_force=154 optimal_fiber_length=0.1189 tendon_slack_length=0.01
      PathPoint P1: scapula (-0.10176 -0.11434 -0.08962)
      PathPoint P2: thorax (-0.00038133 -0.09868684 0.1312089)
      PathWrap: wrap_object=Thorax method=hybrid
    Thelen2003Muscle SerratusAnterior5: max_isometric_force=89.6 optimal_fiber_length=0.1259 tendon_slack_length=0.011
      PathPoint P1: scapula (-0.10073 -0.10932 -0.09138)
      PathPoint P2: thorax (-0.00424096 -0.07279929 0.1268098)
      PathWrap: wrap_object=Thorax method=hybrid
    Thelen2003Muscle SerratusAnterior6: max_isometric_force=135.8 optimal_fiber_length=0.112 tendon_slack_length=0.01
      PathPoint P1: scapula (-0.10018 -0.10488 -0.08852)
      PathPoint P2: thorax (-0.02159 -0.04033 0.11046)
      PathWrap: wrap_object=Thorax method=hybrid
    Thelen2003Muscle SerratusAnterior7: max_isometric_force=65.8 optimal_fiber_length=0.1133 tendon_slack_length=0.009
      PathPoint P1: scapula (-0.09367 -0.06399 -0.09741)
      PathPoint P2: thorax (-0.02045959 -0.04564531 0.1187105)
      PathWrap: wrap_object=Thorax method=hybrid
    Thelen2003Muscle SerratusAnterior8: max_isometric_force=106.4 optimal_fiber_length=0.0845 tendon_slack_length=0.012
      PathPoint P1: scapula (-0.08698 -0.0375 -0.10019)
      PathPoint P2: thorax (-0.02524143 -0.0252953 0.1103666)
      PathWrap: wrap_object=Thorax method=hybrid
    Thelen2003Muscle SerratusAnterior9: max_isometric_force=110.6 optimal_fiber_length=0.08 tendon_slack_length=0.014
      PathPoint P1: scapula (-0.07608 -0.01087 -0.10327)
      PathPoint P2: thorax (-0.03306724 -0.00233246 0.09428507)
      PathWrap: wrap_object=Thorax method=hybrid
    Thelen2003Muscle SerratusAnterior10: max_isometric_force=88.2 optimal_fiber_length=0.066 tendon_slack_length=0.023
      PathPoint P1: scapula (-0.06696 0.00161 -0.09518)
      PathPoint P2: thorax (-0.03608724 0.00115754 0.09078507)
      PathWrap: wrap_object=Thorax method=hybrid
    Thelen2003Muscle SerratusAnterior11: max_isometric_force=32.2 optimal_fiber_length=0.0835 tendon_slack_length=0.005
      PathPoint P1: scapula (-0.06087 0.00419 -0.09274)
      PathPoint P2: thorax (-0.03306724 -0.00233246 0.09428507)
      PathWrap: wrap_object=Thorax method=hybrid
    Thelen2003Muscle SerratusAnterior12: max_isometric_force=156.8 optimal_fiber_length=0.0845 tendon_slack_length=0.01
      PathPoint P1: scapula (-0.04851 0.009 -0.08467)
      PathPoint P2: thorax (-0.02815724 -0.00603246 0.09669507)
      PathWrap: wrap_object=Thorax method=hybrid
    Thelen2003Muscle Rhomboideus1: max_isometric_force=71.4 optimal_fiber_length=0.0986 tendon_slack_length=0.021
      PathPoint P1: thorax (-0.0733 0.04018 -0.00204)
      PathPoint P2: scapula (-0.08267 -0.02291 -0.10177)
      PathWrap: wrap_object=Thorax method=hybrid
    Thelen2003Muscle Rhomboideus2: max_isometric_force=128.8 optimal_fiber_length=0.1077 tendon_slack_length=0.066
      PathPoint P1: thorax (-0.07801 0.02965 -0.00118)
      PathPoint P2: scapula (-0.10317 -0.08678 -0.09993)
      PathWrap: wrap_object=Thorax method=hybrid
    Thelen2003Muscle Rhomboideus3: max_isometric_force=198.8 optimal_fiber_length=0.1259 tendon_slack_length=0.032
      PathPoint P1: thorax (-0.08469 0.00913 0.00052)
      PathPoint P2: scapula (-0.10501 -0.09164 -0.10029)
      PathWrap: wrap_object=Thorax method=hybrid
    Thelen2003Muscle Rhomboideus4: max_isometric_force=114.8 optimal_fiber_length=0.1267 tendon_slack_length=0.031
      PathPoint P1: thorax (-0.09066 -0.00927 -0.00051)
      PathPoint P2: scapula (-0.10731 -0.10247 -0.09847)
      PathWrap: wrap_object=Thorax method=hybrid
    Thelen2003Muscle Rhomboideus5: max_isometric_force=93.8 optimal_fiber_length=0.117 tendon_slack_length=0.04
      PathPoint P1: thorax (-0.09736 -0.03208 0.00148)
      PathPoint P2: scapula (-0.10805 -0.11342 -0.09683)
      PathWrap: wrap_object=Thorax method=hybrid
    Thelen2003Muscle LevatorScapulae1: max_isometric_force=134.4 optimal_fiber_length=0.1578 tendon_slack_length=0.019
      PathPoint P1: thorax (-0.03481 0.12106 0.03108)
      PathPoint P2: scapula (-0.07801 -0.00808 -0.10292)
      PathWrap: wrap_object=Thorax method=hybrid
    Thelen2003Muscle LevatorScapulae2: max_isometric_force=145.6 optimal_fiber_length=0.1302 tendon_slack_length=0.018
      PathPoint P1: thorax (-0.03789 0.10127 0.02215)
      PathPoint P2: scapula (-0.06924 0.00225 -0.10055)
      PathWrap: wrap_object=Thorax method=hybrid
    Thelen2003Muscle Coracobrachialis1: max_isometric_force=281.4 optimal_fiber_length=0.066 tendon_slack_length=0.092
      PathPoint P1: thorax (0.00135 -0.01426 0.13126)
      PathPoint P2: humerus (-0.00152 -0.10972 -0.00825)
    Thelen2003Muscle Coracobrachialis2: max_isometric_force=207.2 optimal_fiber_length=0.0683 tendon_slack_length=0.104
      PathPoint P1: thorax (0.00169 -0.01595 0.12828)
      PathPoint P2: humerus (-0.00231 -0.12549 -0.00933)
    Thelen2003Muscle Coracobrachialis3: max_isometric_force=159.6 optimal_fiber_length=0.0727 tendon_slack_length=0.113
      PathPoint P1: thorax (0.00205 -0.01478 0.12988)
      PathPoint P2: humerus (-0.00073 -0.1157 -0.00877)
    Thelen2003Muscle DeltoideusClavicle1: max_isometric_force=179.2 optimal_fiber_length=0.0836
        tendon_slack_length=0.072 pennation_angle=0.08726646
      PathPoint P1: clavicle (-0.02201685 0.01980061 0.1135747)
      MovingPathPoint default: clavicle (0.009769 0.0017268 0.12662) x_coordinate=shoulder_elv
          y_coordinate=shoulder_elv z_coordinate=shoulder_elv
        x_location: NaturalCubicSpline: x=(0 3.141593) y=(0.009769 -0.022017)
        y_location: NaturalCubicSpline: x=(0 3.141593) y=(0.0017268 0.019801)
        z_location: NaturalCubicSpline: x=(0 3.141593) y=(0.12662 0.11357)
      PathPoint P2: humerus (-0.00163 -0.08693 0.01038)
      PathWrap: wrap_object=hhead method=hybrid
    Thelen2003Muscle DeltoideusClavicle2: max_isometric_force=224 optimal_fiber_length=0.094 tendon_slack_length=0.088
        pennation_angle=0.08726646
      PathPoint P1: clavicle (-0.02225037 0.01472137 0.08649147)
      MovingPathPoint default: clavicle (-0.0076254 0.011036 0.10531) x_coordinate=shoulder_elv
          y_coordinate=shoulder_elv z_coordinate=shoulder_elv
        x_location: NaturalCubicSpline: x=(0 3.141593) y=(-0.0076254 -0.02225)
        y_location: NaturalCubicSpline: x=(0 3.141593) y=(0.011036 0.014721)
        z_location: NaturalCubicSpline: x=(0 3.141593) y=(0.10531 0.086491)
      PathPoint P2: humerus (0.00276 -0.11408 0.00358)
      PathWrap: wrap_object=hhead method=hybrid
    Thelen2003Muscle DeltoideusClavicle3: max_isometric_force=147 optimal_fiber_length=0.0824 tendon_slack_length=0.073
        pennation_angle=0.08726646
      PathPoint P1: clavicle (-0.02503425 0.01900551 0.09784184)
      MovingPathPoint default: clavicle (0.0038708 0.0084456 0.12934) x_coordinate=shoulder_elv
          y_coordinate=shoulder_elv z_coordinate=shoulder_elv
        x_location: NaturalCubicSpline: x=(0 3.141593) y=(0.0038708 -0.025034)
        y_location: NaturalCubicSpline: x=(0 3.141593) y=(0.0084456 0.019006)
        z_location: NaturalCubicSpline: x=(0 3.141593) y=(0.12934 0.097842)
      PathPoint P2: humerus (-0.00135 -0.09415 0.00845)
      PathWrap: wrap_object=hhead method=hybrid
    Thelen2003Muscle DeltoideusClavicle4: max_isometric_force=156.8 optimal_fiber_length=0.0991
        tendon_slack_length=0.078 pennation_angle=0.08726646
      PathPoint P1: clavicle (-0.02947617 0.01557189 0.08910831)
      MovingPathPoint default: clavicle (-0.0040933 0.0095863 0.11502) x_coordinate=shoulder_elv
          y_coordinate=shoulder_elv z_coordinate=shoulder_elv
        x_location: NaturalCubicSpline: x=(0 3.141593) y=(-0.0040933 -0.029476)
        y_location: NaturalCubicSpline: x=(0 3.141593) y=(0.0095863 0.015572)
        z_location: NaturalCubicSpline: x=(0 3.141593) y=(0.11502 0.089108)
      PathPoint P2: humerus (0.00236 -0.1114 0.00364)
      PathWrap: wrap_object=hhead method=hybrid
    Thelen2003Muscle DeltoideusScapula1: max_isometric_force=404.6 optimal_fiber_length=0.1128 tendon_slack_length=0.08
        pennation_angle=0.08726646
      PathPoint P1: scapula (-0.07487 -0.01348 -0.06723)
      MovingPathPoint default: scapula (-0.083166 -0.022621 0.010092) x_coordinate=shoulder_elv
          y_coordinate=shoulder_elv z_coordinate=shoulder_elv
        x_location: NaturalCubicSpline: x=(0 3.141593) y=(-0.083166 -0.07487)
        y_location: NaturalCubicSpline: x=(0 3.141593) y=(-0.022621 -0.01348)
        z_location: NaturalCubicSpline: x=(0 3.141593) y=(0.010092 -0.06723)
      PathPoint P2: humerus (0.00282 -0.09837 0.00858)
      PathWrap: wrap_object=hhead method=hybrid
    Thelen2003Muscle DeltoideusScapula2: max_isometric_force=295.4 optimal_fiber_length=0.0949
        tendon_slack_length=0.076 pennation_angle=0.08726646
      PathPoint P1: scapula (-0.06212 -0.0028 -0.03745)
      MovingPathPoint default: scapula (-0.06644 -0.014263 0.020449) x_coordinate=shoulder_elv
          y_coordinate=shoulder_elv z_coordinate=shoulder_elv
        x_location: NaturalCubicSpline: x=(0 3.141593) y=(-0.06644 -0.06212)
        y_location: NaturalCubicSpline: x=(0 3.141593) y=(-0.014263 -0.0028)
        z_location: NaturalCubicSpline: x=(0 3.141593) y=(0.020449 -0.03745)
      PathPoint P2: humerus (0.00164 -0.08481 0.00874)
      PathWrap: wrap_object=hhead method=hybrid
    Thelen2003Muscle DeltoideusScapula3: max_isometric_force=624.4 optimal_fiber_length=0.0833
        tendon_slack_length=0.062 pennation_angle=0.08726646
      PathPoint P1: scapula (-0.05092265 -0.00071243 -0.00962623)
      MovingPathPoint default: scapula (-0.049655 -0.011416 0.036289) x_coordinate=shoulder_elv
          y_coordinate=shoulder_elv z_coordinate=shoulder_elv
        x_location: NaturalCubicSpline: x=(0 3.141593) y=(-0.049655 -0.050923)
        y_location: NaturalCubicSpline: x=(0 3.141593) y=(-0.011416 -0.00071243)
        z_location: NaturalCubicSpline: x=(0 3.141593) y=(0.036289 -0.0096262)
      PathPoint P2: humerus (0.00233 -0.08763 0.00958)
      PathWrap: wrap_object=hhead method=hybrid
    Thelen2003Muscle DeltoideusScapula4: max_isometric_force=163.8 optimal_fiber_length=0.0666 tendon_slack_length=0.05
        pennation_angle=0.08726646
      PathPoint P1: scapula (-0.03937183 0.00232298 0.00532931)
      MovingPathPoint default: scapula (-0.034523 -0.0092845 0.048291) x_coordinate=shoulder_elv
          y_coordinate=shoulder_elv z_coordinate=shoulder_elv
        x_location: NaturalCubicSpline: x=(0 3.141593) y=(-0.034523 -0.039372)
        y_location: NaturalCubicSpline: x=(0 3.141593) y=(-0.0092845 0.002323)
        z_location: NaturalCubicSpline: x=(0 3.141593) y=(0.048291 0.0053293)
      PathPoint P2: humerus (0.00175 -0.07367 0.00863)
      PathWrap: wrap_object=hhead method=hybrid
    Thelen2003Muscle DeltoideusScapula5: max_isometric_force=168 optimal_fiber_length=0.0656 tendon_slack_length=0.045
        pennation_angle=0.08726646
      PathPoint P1: scapula (-0.02697713 -0.00049514 0.01162113)
      MovingPathPoint default: scapula (-0.014387 -0.0071805 0.054699) x_coordinate=shoulder_elv
          y_coordinate=shoulder_elv z_coordinate=shoulder_elv
        x_location: NaturalCubicSpline: x=(0 3.141593) y=(-0.014387 -0.026977)
        y_location: NaturalCubicSpline: x=(0 3.141593) y=(-0.0071805 -0.00049514)
        z_location: NaturalCubicSpline: x=(0 3.141593) y=(0.054699 0.011621)
      PathPoint P2: humerus (0.00226 -0.06815 0.00777)
      PathWrap: wrap_object=hhead method=hybrid
    Thelen2003Muscle DeltoideusScapula6: max_isometric_force=399 optimal_fiber_length=0.0767 tendon_slack_length=0.067
        pennation_angle=0.08726646
      PathPoint P1: scapula (-0.01798644 -0.00032345 0.01083463)
      MovingPathPoint default: scapula (0.003308 -0.010914 0.046702) x_coordinate=shoulder_elv
          y_coordinate=shoulder_elv z_coordinate=shoulder_elv
        x_location: NaturalCubicSpline: x=(0 3.141593) y=(0.003308 -0.017986)
        y_location: NaturalCubicSpline: x=(0 3.141593) y=(-0.010914 -0.00032345)
        z_location: NaturalCubicSpline: x=(0 3.141593) y=(0.046702 0.010835)
      PathPoint P2: humerus (0.00073 -0.09906 0.00973)
      PathWrap: wrap_object=hhead method=hybrid
    Thelen2003Muscle DeltoideusScapula7: max_isometric_force=208.6 optimal_fiber_length=0.0754
        tendon_slack_length=0.082 pennation_angle=0.08726646
      PathPoint P1: scapula (-0.03558 -0.00355 0.01321)
      MovingPathPoint default: scapula (-0.02482 -0.00831 0.05376) x_coordinate=shoulder_elv y_coordinate=shoulder_elv
          z_coordinate=shoulder_elv
        x_location: NaturalCubicSpline: x=(0 3.141593) y=(-0.02482 -0.03558)
        y_location: NaturalCubicSpline: x=(0 3.141593) y=(-0.00831 -0.00355)
        z_location: NaturalCubicSpline: x=(0 3.141593) y=(0.05376 0.01321)
      PathPoint P2: humerus (0.00022 -0.1132 0.00561)
      PathWrap: wrap_object=hhead method=hybrid
    Thelen2003Muscle DeltoideusScapula8: max_isometric_force=301 optimal_fiber_length=0.071 tendon_slack_length=0.065
        pennation_angle=0.08726646
      PathPoint P1: scapula (-0.0237248 0.00051611 0.01216289)
      MovingPathPoint default: scapula (-0.0044424 -0.0070507 0.052187) x_coordinate=shoulder_elv
          y_coordinate=shoulder_elv z_coordinate=shoulder_elv
        x_location: NaturalCubicSpline: x=(0 3.141593) y=(-0.0044424 -0.023725)
        y_location: NaturalCubicSpline: x=(0 3.141593) y=(-0.0070507 0.00051611)
        z_location: NaturalCubicSpline: x=(0 3.141593) y=(0.052187 0.012163)
      PathPoint P2: humerus (0.00278 -0.09715 0.00909)
      PathWrap: wrap_object=hhead method=hybrid
    Thelen2003Muscle DeltoideusScapula9: max_isometric_force=400.4 optimal_fiber_length=0.0732
        tendon_slack_length=0.071 pennation_angle=0.08726646
      PathPoint P1: scapula (-0.00696141 0.00099114 0.00922411)
      MovingPathPoint default: scapula (0.020026 -0.011607 0.032939) x_coordinate=shoulder_elv
          y_coordinate=shoulder_elv z_coordinate=shoulder_elv
        x_location: NaturalCubicSpline: x=(0 3.141593) y=(0.020026 -0.0069614)
        y_location: NaturalCubicSpline: x=(0 3.141593) y=(-0.011607 0.00099114)
        z_location: NaturalCubicSpline: x=(0 3.141593) y=(0.032939 0.0092241)
      PathPoint P2: humerus (0.00235 -0.10592 0.00526)
      PathWrap: wrap_object=hhead method=hybrid
    Thelen2003Muscle DeltoideusScapula10: max_isometric_force=623 optimal_fiber_length=0.0748 tendon_slack_length=0.064
        pennation_angle=0.08726646
      PathPoint P1: scapula (-0.01535 -0.00196 0.01028)
      MovingPathPoint default: scapula (0.014346 -0.010627 0.042603) x_coordinate=shoulder_elv
          y_coordinate=shoulder_elv z_coordinate=shoulder_elv
        x_location: NaturalCubicSpline: x=(0 3.141593) y=(0.014346 -0.01535)
        y_location: NaturalCubicSpline: x=(0 3.141593) y=(-0.010627 -0.00196)
        z_location: NaturalCubicSpline: x=(0 3.141593) y=(0.042603 0.01028)
      PathPoint P2: humerus (0.00181 -0.09982 0.00857)
      PathWrap: wrap_object=hhead method=hybrid
    Thelen2003Muscle DeltoideusScapula11: max_isometric_force=334.6 optimal_fiber_length=0.0737
        tendon_slack_length=0.048 pennation_angle=0.08726646
      PathPoint P1: scapula (-0.00057743 -0.00313989 0.00288404)
      MovingPathPoint default: scapula (0.024923 -0.014065 0.0211) x_coordinate=shoulder_elv y_coordinate=shoulder_elv
          z_coordinate=shoulder_elv
        x_location: NaturalCubicSpline: x=(0 3.141593) y=(0.024923 -0.00057743)
        y_location: NaturalCubicSpline: x=(0 3.141593) y=(-0.014065 -0.0031399)
        z_location: NaturalCubicSpline: x=(0 3.141593) y=(0.0211 0.002884)
      PathPoint P2: humerus (-0.0007 -0.08619 0.01082)
      PathWrap: wrap_object=hhead method=hybrid
    Thelen2003Muscle LatissimusDorsi1: max_isometric_force=78.4 optimal_fiber_length=0.2343 tendon_slack_length=0.09
      PathPoint P1: thorax (-0.10088 -0.11663 0.00171)
      PathPoint P2: thorax (-0.1154975 -0.1163865 0.02880132)
      MovingPathPoint default: thorax (-0.1225645 -0.09861471 0.1010162) x_coordinate=shoulder_elv
          y_coordinate=shoulder_elv z_coordinate=shoulder_elv
        x_location: NaturalCubicSpline: x=(0 3.141593) y=(-0.1225645 -0.1237748)
        y_location: NaturalCubicSpline: x=(0 3.141593) y=(-0.09861471 -0.1067693)
        z_location: NaturalCubicSpline: x=(0 3.141593) y=(0.1010162 0.1149715)
      MovingPathPoint default: thorax (-0.09279 -0.08329 0.13581) x_coordinate=shoulder_elv y_coordinate=shoulder_elv
          z_coordinate=shoulder_elv
        x_location: NaturalCubicSpline: x=(0 3.141593) y=(-0.09279 -0.09435726)
        y_location: NaturalCubicSpline: x=(0 3.141593) y=(-0.08329 -0.084707)
        z_location: NaturalCubicSpline: x=(0 3.141593) y=(0.13581 0.1445569)
      PathPoint P5: humerus (0.00831187 -0.03842359 -0.0035034)
      PathPoint P2: humerus (0.01120621 -0.03487206 0.00207434)
      PathWrap: wrap_object=Thorax method=hybrid
      PathWrap: wrap_object=TeresMajor method=hybrid
    Thelen2003Muscle LatissimusDorsi2: max_isometric_force=123.2 optimal_fiber_length=0.2857 tendon_slack_length=0.083
      PathPoint P1: thorax (-0.09748 -0.17378 0.002)
      PathPoint P2: thorax (-0.1145169 -0.1695011 0.0264554)
      MovingPathPoint default: thorax (-0.1119108 -0.128632 0.1079229) x_coordinate=shoulder_elv
          y_coordinate=shoulder_elv z_coordinate=shoulder_elv
        x_location: NaturalCubicSpline: x=(0 3.141593) y=(-0.1119108 -0.1138336)
        y_location: NaturalCubicSpline: x=(0 3.141593) y=(-0.128632 -0.1330451)
        z_location: NaturalCubicSpline: x=(0 3.141593) y=(0.1079229 0.1203243)
      MovingPathPoint default: thorax (-0.08177063 -0.0975918 0.137583) x_coordinate=shoulder_elv
          y_coordinate=shoulder_elv z_coordinate=shoulder_elv
        x_location: NaturalCubicSpline: x=(0 3.141593) y=(-0.08177063 -0.08333789)
        y_location: NaturalCubicSpline: x=(0 3.141593) y=(-0.0975918 -0.0990088)
        z_location: NaturalCubicSpline: x=(0 3.141593) y=(0.137583 0.1463299)
      PathPoint P5: humerus (0.00503997 -0.03542672 -0.00416906)
      PathPoint P2: humerus (0.01035288 -0.03405195 0.00286561)
      PathWrap: wrap_object=Thorax method=hybrid
      PathWrap: wrap_object=TeresMajor method=hybrid
    Thelen2003Muscle LatissimusDorsi3: max_isometric_force=180.6 optimal_fiber_length=0.2951 tendon_slack_length=0.105
      PathPoint P1: thorax (-0.09082 -0.21745 -0.00156)
      PathPoint P2: thorax (-0.1076773 -0.2054398 0.02623341)
      MovingPathPoint default: thorax (-0.1038891 -0.1475853 0.1136473) x_coordinate=shoulder_elv
          y_coordinate=shoulder_elv z_coordinate=shoulder_elv
        x_location: NaturalCubicSpline: x=(0 3.141593) y=(-0.1038891 -0.1017608)
        y_location: NaturalCubicSpline: x=(0 3.141593) y=(-0.1475853 -0.1496044)
        z_location: NaturalCubicSpline: x=(0 3.141593) y=(0.1136473 0.1225659)
      MovingPathPoint default: thorax (-0.07622185 -0.1103509 0.1400237) x_coordinate=shoulder_elv
          y_coordinate=shoulder_elv z_coordinate=shoulder_elv
        x_location: NaturalCubicSpline: x=(0 3.141593) y=(-0.07622185 -0.07778911)
        y_location: NaturalCubicSpline: x=(0 3.141593) y=(-0.1103509 -0.1117679)
        z_location: NaturalCubicSpline: x=(0 3.141593) y=(0.1400237 0.1487706)
      PathPoint P5: humerus (0.00494798 -0.03934016 -0.00301327)
      PathPoint P2: humerus (0.01035288 -0.03405195 0.00286561)
      PathWrap: wrap_object=Thorax method=hybrid
      PathWrap: wrap_object=TeresMajor method=hybrid
    Thelen2003Muscle LatissimusDorsi4: max_isometric_force=134.4 optimal_fiber_length=0.3206 tendon_slack_length=0.12
      PathPoint P1: thorax (-0.08351 -0.26501 0.00565)
      PathPoint P2: thorax (-0.0969122 -0.2410861 0.0347683)
      MovingPathPoint default: thorax (-0.09464959 -0.1677073 0.1149537) x_coordinate=shoulder_elv
          y_coordinate=shoulder_elv z_coordinate=shoulder_elv
        x_location: NaturalCubicSpline: x=(0 3.141593) y=(-0.09464959 -0.09252128)
        y_location: NaturalCubicSpline: x=(0 3.141593) y=(-0.1677073 -0.1697263)
        z_location: NaturalCubicSpline: x=(0 3.141593) y=(0.1149537 0.1238723)
      MovingPathPoint default: thorax (-0.06931084 -0.1217712 0.1441957) x_coordinate=shoulder_elv
          y_coordinate=shoulder_elv z_coordinate=shoulder_elv
        x_location: NaturalCubicSpline: x=(0 3.141593) y=(-0.06931084 -0.0708781)
        y_location: NaturalCubicSpline: x=(0 3.141593) y=(-0.1217712 -0.1231882)
        z_location: NaturalCubicSpline: x=(0 3.141593) y=(0.1441957 0.1529426)
      PathPoint P5: humerus (0.00724074 -0.0364754 -0.00149823)
      PathPoint P2: humerus (0.01037288 -0.02765195 0.00233561)
      PathWrap: wrap_object=Thorax method=hybrid
      PathWrap: wrap_object=TeresMajor method=hybrid
    Thelen2003Muscle LatissimusDorsi5: max_isometric_force=123.2 optimal_fiber_length=0.3129 tendon_slack_length=0.072
      PathPoint P1: thorax (-0.06895 -0.26228 0.0645)
      PathPoint P2: thorax (-0.06991375 -0.1857456 0.1241647)
      MovingPathPoint default: thorax (-0.05474412 -0.1315042 0.1436677) x_coordinate=shoulder_elv
          y_coordinate=shoulder_elv z_coordinate=shoulder_elv
        x_location: NaturalCubicSpline: x=(0 3.141593) y=(-0.05474412 -0.05708149)
        y_location: NaturalCubicSpline: x=(0 3.141593) y=(-0.1315042 -0.1317176)
        z_location: NaturalCubicSpline: x=(0 3.141593) y=(0.1436677 0.1526665)
      PathPoint P4: humerus (0.00850452 -0.03178517 0.00026576)
      PathPoint P2: humerus (0.01037288 -0.02765195 0.00233561)
      PathWrap: wrap_object=Thorax method=hybrid
      PathWrap: wrap_object=TeresMajor method=hybrid
    Thelen2003Muscle LatissimusDorsi6: max_isometric_force=147 optimal_fiber_length=0.3402 tendon_slack_length=0.059
      PathPoint P1: thorax (-0.06274 -0.25482 0.09061)
      PathPoint P2: thorax (-0.05148711 -0.1926001 0.1295536)
      MovingPathPoint default: thorax (-0.04125798 -0.1466379 0.1462154) x_coordinate=shoulder_elv
          y_coordinate=shoulder_elv z_coordinate=shoulder_elv
        x_location: NaturalCubicSpline: x=(0 3.141593) y=(-0.04125798 -0.03257685)
        y_location: NaturalCubicSpline: x=(0 3.141593) y=(-0.1466379 -0.1394789)
        z_location: NaturalCubicSpline: x=(0 3.141593) y=(0.1462154 0.1496659)
      PathPoint P4: humerus (0.00772063 -0.03361827 -0.0004324)
      PathPoint P2: humerus (0.01035288 -0.03405195 0.00286561)
      PathWrap: wrap_object=Thorax method=hybrid
      PathWrap: wrap_object=TeresMajor method=hybrid
    Thelen2003Muscle PectoralisMajorClavicle1: max_isometric_force=250.6 optimal_fiber_length=0.1363
        tendon_slack_length=0.017
      PathPoint P1: scapula (0.0189 -0.0236 -0.09975)
      PathPoint P2: humerus (0.00714259 -0.03170377 0.00397452)
      PathWrap: wrap_object=Thorax method=hybrid
      PathWrap: wrap_object=TeresMajor method=hybrid
    Thelen2003Muscle PectoralisMajorClavicle2: max_isometric_force=158.2 optimal_fiber_length=0.1091
        tendon_slack_length=0.014
      PathPoint P1: scapula (0.01574 -0.01797 -0.08313)
      PathPoint P2: humerus (0.00519256 -0.0255564 0.00374063)
      PathWrap: wrap_object=Thorax method=hybrid
      PathWrap: wrap_object=TeresMajor method=hybrid
    Thelen2003Muscle PectoralisMajorThorax1: max_isometric_force=175 optimal_fiber_length=0.1884
        tendon_slack_length=0.036
      PathPoint P1: thorax (0.06567984 -0.1373216 0.04255624)
      PathPoint P2: humerus (0.00676648 -0.0523813 0.0060871)
      PathWrap: wrap_object=Thorax method=hybrid
      PathWrap: wrap_object=TeresMajor method=hybrid
    Thelen2003Muscle PectoralisMajorThorax2: max_isometric_force=165.2 optimal_fiber_length=0.183
        tendon_slack_length=0.043
      PathPoint P1: thorax (0.05320527 -0.1156552 0.0247376)
      PathPoint P2: humerus (0.00517699 -0.04977777 0.00554372)
      PathWrap: wrap_object=Thorax method=hybrid
      PathWrap: wrap_object=TeresMajor method=hybrid
    Thelen2003Muscle PectoralisMajorThorax3: max_isometric_force=231 optimal_fiber_length=0.1853
        tendon_slack_length=0.053
      PathPoint P1: thorax (0.04590077 -0.08505931 0.01490978)
      PathPoint P2: humerus (0.00581888 -0.04735226 0.00615758)
      PathWrap: wrap_object=Thorax method=hybrid
      PathWrap: wrap_object=TeresMajor method=hybrid
    Thelen2003Muscle PectoralisMajorThorax4: max_isometric_force=219.8 optimal_fiber_length=0.1833
        tendon_slack_length=0.028
      PathPoint P1: thorax (0.03558162 -0.05842802 0.00841721)
      PathPoint P2: humerus (0.00645919 -0.04088735 0.00413354)
      PathWrap: wrap_object=Thorax method=hybrid
      PathWrap: wrap_object=TeresMajor method=hybrid
    Thelen2003Muscle PectoralisMajorThorax5: max_isometric_force=186.2 optimal_fiber_length=0.15
        tendon_slack_length=0.026
      PathPoint P1: thorax (0.01954 -0.03223 0.01381)
      PathPoint P2: humerus (0.00508 -0.0345128 0.00381286)
      PathWrap: wrap_object=Thorax method=hybrid
      PathWrap: wrap_object=TeresMajor method=hybrid
    Thelen2003Muscle PectoralisMajorThorax6: max_isometric_force=277.2 optimal_fiber_length=0.1449
        tendon_slack_length=0.036
      PathPoint P1: thorax (0.01013 -0.01675 0.02155)
      PathPoint P2: humerus (0.00621784 -0.03108291 0.00400744)
      PathWrap: wrap_object=Thorax method=hybrid
      PathWrap: wrap_object=TeresMajor method=hybrid
    Thelen2003Muscle TeresMajor1: max_isometric_force=231 optimal_fiber_length=0.1411 tendon_slack_length=0.006
      PathPoint P1: scapula (-0.10312 -0.10988 -0.06834)
      PathPoint P2: humerus (0.00847 -0.05319 -0.00208)
      PathWrap: wrap_object=hhead method=hybrid
      PathWrap: wrap_object=TeresMajor method=hybrid
    Thelen2003Muscle TeresMajor2: max_isometric_force=119 optimal_fiber_length=0.1595 tendon_slack_length=0.012
      PathPoint P1: scapula (-0.10563 -0.11698 -0.07542)
      PathPoint P2: humerus (0.00929 -0.06023 -0.00085)
      PathWrap: wrap_object=hhead method=hybrid
      PathWrap: wrap_object=TeresMajor method=hybrid
    Thelen2003Muscle TeresMajor3: max_isometric_force=280 optimal_fiber_length=0.1526 tendon_slack_length=0.015
      PathPoint P1: scapula (-0.09985 -0.095 -0.06168)
      PathPoint P2: humerus (0.00884 -0.05741 -0.00108)
      PathWrap: wrap_object=hhead method=hybrid
      PathWrap: wrap_object=TeresMajor method=hybrid
    Thelen2003Muscle TeresMajor4: max_isometric_force=221.2 optimal_fiber_length=0.1093 tendon_slack_length=0.034
      PathPoint P1: scapula (-0.10049 -0.10033 -0.06195)
      PathPoint P2: humerus (0.0094 -0.04891 -0.00193)
      PathWrap: wrap_object=hhead method=hybrid
      PathWrap: wrap_object=TeresMajor method=hybrid
    Thelen2003Muscle Infraspinatus1: max_isometric_force=380.8 optimal_fiber_length=0.0633 tendon_slack_length=0.048
      PathPoint P1: scapula (-0.086 -0.05465 -0.06851)
      PathPoint P2: humerus (-0.00257 0.00349 0.02491)
      PathWrap: wrap_object=hhead method=hybrid
      PathWrap: wrap_object=Infra method=hybrid
    Thelen2003Muscle Infraspinatus2: max_isometric_force=385 optimal_fiber_length=0.0719 tendon_slack_length=0.107
      PathPoint P1: scapula (-0.10796 -0.09662 -0.0924)
      PathPoint P2: humerus (-0.00065 0.00869 0.02173)
      PathWrap: wrap_object=hhead method=hybrid
      PathWrap: wrap_object=Infra method=hybrid
    Thelen2003Muscle Infraspinatus3: max_isometric_force=271.6 optimal_fiber_length=0.0677 tendon_slack_length=0.084
      PathPoint P1: scapula (-0.09907 -0.08085 -0.08129)
      PathPoint P2: humerus (-0.00065 0.00869 0.02173)
      PathWrap: wrap_object=hhead method=hybrid
      PathWrap: wrap_object=Infra method=hybrid
    Thelen2003Muscle Infraspinatus4: max_isometric_force=289.8 optimal_fiber_length=0.0693 tendon_slack_length=0.071
      PathPoint P1: scapula (-0.09237 -0.05118 -0.08662)
      PathPoint P2: humerus (-0.00066 0.01201 0.02019)
      PathWrap: wrap_object=hhead method=hybrid
      PathWrap: wrap_object=Infra method=hybrid
    Thelen2003Muscle Infraspinatus5: max_isometric_force=422.8 optimal_fiber_length=0.0698 tendon_slack_length=0.06
      PathPoint P1: scapula (-0.08343 -0.03227 -0.08691)
      PathPoint P2: humerus (-0.00066 0.01201 0.02019)
      PathWrap: wrap_object=hhead method=hybrid
      PathWrap: wrap_object=Infra method=hybrid
    Thelen2003Muscle Infraspinatus6: max_isometric_force=254.8 optimal_fiber_length=0.0753 tendon_slack_length=0.035
      PathPoint P1: scapula (-0.0747 -0.01255 -0.06496)
      PathPoint P2: humerus (-0.0009 0.00588 0.02305)
      PathWrap: wrap_object=hhead method=hybrid
      PathWrap: wrap_object=Infra method=hybrid
    Thelen2003Muscle PectoralisMinor1: max_isometric_force=65.8 optimal_fiber_length=0.0765 tendon_slack_length=0.051
      PathPoint P1: thorax (0.02975 -0.05908 0.0623)
      PathPoint P2: scapula (0.0094 -0.03564 -0.03268)
      PathWrap: wrap_object=Thorax method=hybrid
    Thelen2003Muscle PectoralisMinor2: max_isometric_force=149.8 optimal_fiber_length=0.1086 tendon_slack_length=0.041
      PathPoint P1: thorax (0.02782 -0.05796 0.07101)
      PathPoint P2: scapula (0.0103 -0.03659 -0.03122)
      PathWrap: wrap_object=Thorax method=hybrid
    Thelen2003Muscle PectoralisMinor3: max_isometric_force=149.8 optimal_fiber_length=0.1075 tendon_slack_length=0.029
      PathPoint P1: thorax (0.04417 -0.10719 0.08664)
      PathPoint P2: scapula (0.01133 -0.03692 -0.03161)
      PathWrap: wrap_object=Thorax method=hybrid
    Thelen2003Muscle PectoralisMinor4: max_isometric_force=64.4 optimal_fiber_length=0.1381 tendon_slack_length=0.026
      PathPoint P1: thorax (0.03978 -0.08651 0.07516)
      PathPoint P2: scapula (0.01115 -0.03957 -0.02909)
      PathWrap: wrap_object=Thorax method=hybrid
    Thelen2003Muscle TeresMinor1: max_isometric_force=170.8 optimal_fiber_length=0.0501 tendon_slack_length=0.049
      PathPoint P1: scapula (-0.07032 -0.07238 -0.03934)
      PathPoint P2: humerus (-0.01141 -0.00725 0.01212)
      PathWrap: wrap_object=hhead method=hybrid
    Thelen2003Muscle TeresMinor2: max_isometric_force=273 optimal_fiber_length=0.055 tendon_slack_length=0.051
      PathPoint P1: scapula (-0.07874 -0.07428 -0.0458)
      PathPoint P2: humerus (-0.01236 -0.00808 0.01326)
      PathWrap: wrap_object=hhead method=hybrid
    Thelen2003Muscle TeresMinor3: max_isometric_force=252 optimal_fiber_length=0.0506 tendon_slack_length=0.018
      PathPoint P1: scapula (-0.05734 -0.04889 -0.02702)
      PathPoint P2: humerus (-0.0112 -0.00727 0.01215)
      PathWrap: wrap_object=hhead method=hybrid
    Thelen2003Muscle Subscapularis1: max_isometric_force=61.6 optimal_fiber_length=0.0556 tendon_slack_length=0.028
      PathPoint P1: scapula (-0.05949 -0.02889 -0.06461)
      PathPoint P2: humerus (0.01892 0.00597 0.00094)
      PathWrap: wrap_object=Subscapuralis method=hybrid
      PathWrap: wrap_object=hhead method=hybrid
    Thelen2003Muscle Subscapularis2: max_isometric_force=109.2 optimal_fiber_length=0.0649 tendon_slack_length=0.044
      PathPoint P1: scapula (-0.05863 -0.01006 -0.07953)
      PathPoint P2: humerus (0.01904 0.00039 0.00124)
      PathWrap: wrap_object=Subscapuralis method=hybrid
      PathWrap: wrap_object=hhead method=hybrid
    Thelen2003Muscle Subscapularis3: max_isometric_force=369.6 optimal_fiber_length=0.0676 tendon_slack_length=0.059
        pennation_angle=0.08726646
      PathPoint P1: scapula (-0.07879 -0.03127 -0.0903)
      PathPoint P2: humerus (0.0193 0.00396 0.00146)
      PathWrap: wrap_object=Subscapuralis method=hybrid
      PathWrap: wrap_object=hhead method=hybrid
    Thelen2003Muscle Subscapularis4: max_isometric_force=383.6 optimal_fiber_length=0.0744 tendon_slack_length=0.055
        pennation_angle=0.08726646
      PathPoint P1: scapula (-0.08357 -0.05491 -0.07477)
      PathPoint P2: humerus (0.01795 -0.00554 0.00052)
      PathWrap: wrap_object=Subscapuralis method=hybrid
      PathWrap: wrap_object=hhead method=hybrid
    Thelen2003Muscle Subscapularis5: max_isometric_force=159.6 optimal_fiber_length=0.0797 tendon_slack_length=0.066
      PathPoint P1: scapula (-0.08149 -0.06719 -0.06879)
      PathPoint P2: humerus (0.01936 -0.00285 0.00169)
      PathWrap: wrap_object=Subscapuralis method=hybrid
      PathWrap: wrap_object=hhead method=hybrid
    Thelen2003Muscle Subscapularis6: max_isometric_force=208.6 optimal_fiber_length=0.0762 tendon_slack_length=0.077
      PathPoint P1: scapula (-0.09739 -0.08738 -0.0802)
      PathPoint P2: humerus (0.01749 -0.01037 0.00079)
      PathWrap: wrap_object=Subscapuralis method=hybrid
      PathWrap: wrap_object=hhead method=hybrid
    Thelen2003Muscle Subscapularis7: max_isometric_force=226.8 optimal_fiber_length=0.082 tendon_slack_length=0.079
      PathPoint P1: scapula (-0.09469 -0.10212 -0.07511)
      PathPoint P2: humerus (0.0159 -0.00739 -0.00127)
      PathWrap: wrap_object=Subscapuralis method=hybrid
      PathWrap: wrap_object=hhead method=hybrid
    Thelen2003Muscle Subscapularis8: max_isometric_force=85.4 optimal_fiber_length=0.0765 tendon_slack_length=0.04
      PathPoint P1: scapula (-0.07182 -0.07419 -0.05305)
      PathPoint P2: humerus (0.01581 -0.00587 -0.00198)
      PathWrap: wrap_object=Subscapuralis method=hybrid
      PathWrap: wrap_object=hhead method=hybrid
    Thelen2003Muscle Subscapularis9: max_isometric_force=310.8 optimal_fiber_length=0.0721 tendon_slack_length=0.059
      PathPoint P1: scapula (-0.09507 -0.09765 -0.0854)
      PathPoint P2: humerus (0.0169 -0.01095 0.0013)
      PathWrap: wrap_object=Subscapuralis method=hybrid
      PathWrap: wrap_object=hhead method=hybrid
    Thelen2003Muscle Subscapularis10: max_isometric_force=65.8 optimal_fiber_length=0.0676 tendon_slack_length=0.01
      PathPoint P1: scapula (-0.07126 -0.04969 -0.08974)
      PathPoint P2: humerus (0.01721 -0.00775 -0.00002)
      PathWrap: wrap_object=Subscapuralis method=hybrid
      PathWrap: wrap_object=hhead method=hybrid
    Thelen2003Muscle Subscapularis11: max_isometric_force=22.4 optimal_fiber_length=0.0543 tendon_slack_length=0.01
      PathPoint P1: scapula (-0.05093 -0.05443 -0.02873)
      PathPoint P2: humerus (0.01353 -0.02212 -0.00301)
      PathWrap: wrap_object=hhead method=hybrid
    Thelen2003Muscle Supraspinatus1: max_isometric_force=168 optimal_fiber_length=0.0541 tendon_slack_length=0.017
      PathPoint P1: scapula (-0.05606 -0.01096 -0.05304)
      PathPoint P2: humerus (0.00539 0.01378 0.01867)
      PathWrap: wrap_object=hhead method=hybrid
    Thelen2003Muscle Supraspinatus2: max_isometric_force=158.2 optimal_fiber_length=0.0591 tendon_slack_length=0.025
      PathPoint P1: scapula (-0.06053 -0.00138 -0.04947)
      PathPoint P2: humerus (0.00493 0.01379 0.01895)
      PathWrap: wrap_object=hhead method=hybrid
    Thelen2003Muscle Supraspinatus3: max_isometric_force=361.2 optimal_fiber_length=0.0564 tendon_slack_length=0.052
      PathPoint P1: scapula (-0.06207 -0.00027 -0.0883)
      PathPoint P2: humerus (0.00888 0.01413 0.01719)
      PathWrap: wrap_object=hhead method=hybrid
    Thelen2003Muscle Supraspinatus4: max_isometric_force=182 optimal_fiber_length=0.0554 tendon_slack_length=0.031
      PathPoint P1: scapula (-0.046046 -0.00098346 -0.074621)
      PathPoint P2: humerus (0.00217858 0.02030124 0.00651209)
      PathWrap: wrap_object=Thorax method=hybrid
      PathWrap: wrap_object=hhead method=hybrid
    ObjectGroup Scapulothoracic: members=(TrapeziusScapula1 TrapeziusScapula10 TrapeziusScapula11 TrapeziusScapula2 TrapeziusScapula3 TrapeziusScapula4 TrapeziusScapula5 TrapeziusScapula6 TrapeziusScapula7 TrapeziusScapula8 TrapeziusScapula9 SerratusAnterior1 SerratusAnterior2 SerratusAnterior3 SerratusAnterior4 SerratusAnterior5 SerratusAnterior6 SerratusAnterior7 SerratusAnterior8 SerratusAnterior9 SerratusAnterior10 SerratusAnterior11 SerratusAnterior12 Rhomboideus1 Rhomboideus2 Rhomboideus3 Rhomboideus4 Rhomboideus5 LevatorScapulae1 LevatorScapulae2 PectoralisMinor1 PectoralisMinor2 PectoralisMinor3 PectoralisMinor4)
    ObjectGroup Rotator Cuff: members=(TeresMajor1 TeresMajor2 TeresMajor3 TeresMajor4 Infraspinatus1 Infraspinatus2 Infraspinatus3 Infraspinatus4 Infraspinatus5 Infraspinatus6 TeresMinor1 TeresMinor2 TeresMinor3 Subscapularis1 Subscapularis2 Subscapularis3 Subscapularis4 Subscapularis5 Subscapularis6 Subscapularis7 Subscapularis8 Subscapularis9 Subscapularis10 Subscapularis11 Supraspinatus1 Supraspinatus2 Supraspinatus3 Supraspinatus4)
    ObjectGroup ThoracoHumeral: members=(LatissimusDorsi1 LatissimusDorsi2 LatissimusDorsi3 LatissimusDorsi4 LatissimusDorsi5 LatissimusDorsi6 PectoralisMajorClavicle1 PectoralisMajorClavicle2 PectoralisMajorThorax1 PectoralisMajorThorax2 PectoralisMajorThorax3 PectoralisMajorThorax4 PectoralisMajorThorax5 PectoralisMajorThorax6)
    ObjectGroup ScapuloHumeral: members=(TeresMajor1 TeresMajor2 TeresMajor3 TeresMajor4 Infraspinatus1 Infraspinatus2 Infraspinatus3 Infraspinatus4 Infraspinatus5 Infraspinatus6 TeresMinor1 TeresMinor2 TeresMinor3 Subscapularis1 Subscapularis2 Subscapularis3 Subscapularis4 Subscapularis5 Subscapularis6 Subscapularis7 Subscapularis8 Subscapularis9 Subscapularis10 Subscapularis11 Supraspinatus1 Supraspinatus2 Supraspinatus3 Supraspinatus4 DeltoideusClavicle1 DeltoideusClavicle2 DeltoideusClavicle3 DeltoideusClavicle4 DeltoideusScapula1 DeltoideusScapula2 DeltoideusScapula3 DeltoideusScapula4 DeltoideusScapula5 DeltoideusScapula6 DeltoideusScapula7 DeltoideusScapula8 DeltoideusScapula9 DeltoideusScapula10 DeltoideusScapula11)
  BodySet:
    Body ground: mass=0 mass_center=(0 0 0) inertia_xx=0 inertia_yy=0 inertia_zz=0
    Body thorax: mass=43.06 mass_center=(0 -0.1467 0) inertia_xx=129.841 inertia_yy=55.245 inertia_zz=129.841
        meshes=(thorax.vtp groundspine.vtp)
      CustomJoint ground_thorax: parent_body=ground location_in_parent=(0 0 0) location=(0 0 0)
        Coordinate ground_thorax_r3: motion_type=rotational default_value=0 initial_value=0 range=(-3.141593 3.141593)
            clamped=false locked=true
        SpatialTransform: axes_held_at_zero=(rotation2 rotation3 translation1 translation2 translation3)
          TransformAxis rotation1: coordinates=ground_thorax_r3 axis=(0 0 1) LinearFunction(coefficients=1 0)
      WrapEllipsoid Thorax: xyz_body_rotation=(-0.01692969 -0.03769911 0.1685988) translation=(-0.0185 -0.1467 0.0653)
          quadrant=all dimensions=(0.083 0.16 0.07)
      WrapEllipsoid EllipsoidSurface: translation=(-0.02 -0.0173 0.0609) quadrant=all dimensions=(0.07 0.15 0.07)
    Body clavicle: mass=0.156 mass_center=(-0.02172 0.01007 0.06704) inertia_xx=0.00243 inertia_yy=0.00263
        inertia_zz=0.00064 meshes=clavicle.vtp
      CustomJoint sternoclavicular: parent_body=thorax location_in_parent=(0.006325 0.00693 0.025465) location=(0 0 0)
        Coordinate clav_prot: motion_type=rotational default_value=0 initial_value=0 range=(-0.5235988 0.5235988)
            clamped=true
        Coordinate clav_elev: motion_type=rotational default_value=0 initial_value=0 range=(-0.2617994 0.2617994)
            clamped=true
        Coordinate clav_rot: motion_type=rotational default_value=0 initial_value=0 range=(-0.541052 0.541052)
            clamped=true
        SpatialTransform: axes_held_at_zero=(translation1 translation2 translation3)
          TransformAxis rotation1: coordinates=clav_prot axis=(0.0153 0.9892987 -0.1451)
              LinearFunction(coefficients=1 0)
          TransformAxis rotation2: coordinates=clav_elev axis=(-0.9944725 0 -0.104997) LinearFunction(coefficients=1 0)
          TransformAxis rotation3: coordinates=clav_rot axis=(-0.103812 0.145416 0.9839092)
              LinearFunction(coefficients=1 0)
    Body scapula: mass=0.704 mass_center=(-0.04612 -0.0319 -0.04565) inertia_xx=0.007 inertia_yy=0.007 inertia_zz=0.007
        meshes=scapula.vtp
      EllipsoidJoint scapulothoracic: parent_body=ground location_in_parent=(-0.02 -0.0173 0.0609)
          orientation_in_parent=(0 -0.87 0) location=(-0.05982 -0.03904 -0.056) orientation=(0 -0.87 -0.6)
          radii_x_y_z=(0.07 0.15 0.07)
        Coordinate r_scapula_up_down: motion_type=rotational default_value=-0.026 initial_value=-0.026
            range=(-1.570796 1.570796) clamped=true
        Coordinate r_scapula_med_lat: motion_type=rotational default_value=0.05 initial_value=0.05
            range=(-1.570796 1.570796) clamped=true
        Coordinate r_scapula_rot: motion_type=rotational default_value=-0.571 initial_value=-0.571
            range=(-1.570796 1.570796) clamped=true
      WrapTorus Subscapuralis: xyz_body_rotation=(-0.07871435 -0.3139847 0.07330383)
          translation=(-0.0068 -0.0766 -0.0389) quadrant=all inner_radius=0.003 outer_radius=0.035
      WrapTorus Infra: translation=(-0.0657 -0.0253 -0.0059) quadrant=all inner_radius=0.004 outer_radius=0.025
    Body humerus: mass=2.052 mass_center=(0.00537 -0.11493 -0.00261) inertia_xx=1.32 inertia_yy=0.199 inertia_zz=1.32
        meshes=humerus.vtp
      CustomJoint GlenoHumeral: parent_body=scapula location_in_parent=(-0.00955 -0.034 0.009) location=(0 0 0)
        Coordinate elv_angle: motion_type=rotational default_value=0 initial_value=0 range=(-3.141593 3.141593)
            clamped=false
        Coordinate shoulder_elv: motion_type=rotational default_value=0 default_speed_value=1 initial_value=0
            range=(0 3.141593) clamped=true
        Coordinate shoulder_rot: motion_type=rotational default_value=0.7853982 initial_value=0
            range=(-1.570796 1.570796) clamped=true
        SpatialTransform: axes_held_at_zero=(translation1 translation2 translation3)
          TransformAxis rotation1: coordinates=elv_angle axis=(0 1 0) LinearFunction(coefficients=1 0)
          TransformAxis rotation2: coordinates=shoulder_elv axis=(-0.9982614 0.0023 0.05889802)
              LinearFunction(coefficients=1 0)
          TransformAxis rotation3: coordinates=shoulder_rot axis=(0.0048 0.9990892 0.04240001)
              LinearFunction(coefficients=1 0)
      WrapEllipsoid hhead: xyz_body_rotation=(-0.3047345 0.4244641 0.1551598) translation=(0.0015 0.0042 0.0056)
          quadrant=all dimensions=(0.015 0.015 0.015)
      WrapCylinder TeresMajor: xyz_body_rotation=(-1.525941 -0.03159046 -0.691674) translation=(0.0025 -0.0508 -0.0008)
          quadrant=all radius=0.005 length=0.1
  MarkerSet:
    Marker HumerusMassCenter: humerus (0.00537 -0.11493 -0.00261)
    Marker ScapulaMassCenter: scapula (-0.04612 -0.0319 -0.04565)
    Marker ClavicleMassCenter: clavicle (-0.02172 0.01007 0.06704)
    Marker ScapulaThoracicContactPt: scapula (-0.06982 -0.02904 -0.0619)
    Marker ij: thorax (0 0 0)
    Marker c7: thorax (-0.0831 0.03263 0.00003)
    Marker centijc7: thorax (-0.0415 0.0163 0)
    Marker centpxt8: thorax (-0.0207 -0.1601 0.0004)
    Marker t8: thorax (-0.1027364 -0.1539214 -0.00028584)
    Marker ac: scapula (-0.01809925 0.00110611 -0.01879684)
    Marker ai: scapula (-0.1047394 -0.1195809 -0.08347959)
    Marker ts: scapula (-0.08112044 -0.01083594 -0.09798607)
    Marker acc: clavicle (-0.05367 0.01883 0.13832)
    Marker sc: clavicle (0 0 0)
    Marker gu: humerus (0 0 0)
    Marker EpL: humerus (0.0024117 -0.2856004 0.01593105)
    Marker EpM: humerus (-0.00092048 -0.2827567 -0.03551847)
    Marker centelbow: humerus (0.0009 -0.2842 -0.0097)
    Marker px: thorax (0.0613915 -0.1662247 0.00101018)
    Marker aa: scapula (-0.03888861 -0.00199308 0.00172002)
    Marker ijc: clavicle (-0.006325 -0.00693 -0.025465)
