# OpenSim document version 30506
Model BuiltinGeometry:
  Ground:
    Brick brick_: scale_factors=(1 1 1) half_lengths=(0.5 0.01 0.5)
      connectors: frame=../
    Brick brick_: scale_factors=(5 1 1) half_lengths=(0.05 0.05 0.05)
      connectors: frame=../../LeftAnchor
    Brick brick_: scale_factors=(5 1 1) half_lengths=(0.05 0.05 0.05)
      connectors: frame=../../RightAnchor
    Cylinder cylinder_: radius=0.2 half_height=0.3
      connectors: frame=../../CylAnchor
    Ellipsoid ellipsoid_: radii=(0.2 0.7 0.5)
      connectors: frame=../../EllipsoidAnchor
  BodySet:
    Body block: mass=20 [kg] mass_center=(0 0 0) inertia=(0.1333333 0.1333333 0.1333333 0 0 0)
      Sphere sphere_: radius=0.1
        connectors: frame=../
  FrameSet:
    PhysicalOffsetFrame LeftAnchor: translation=(0 0.05 0.35)
      connectors: parent=../ground
    PhysicalOffsetFrame RightAnchor: translation=(0 0.05 -0.35)
      connectors: parent=../ground
    PhysicalOffsetFrame CylAnchor: translation=(-0.2 0 0)
      connectors: parent=../ground
    PhysicalOffsetFrame EllipsoidAnchor: translation=(-0.6 0.6 0)
      connectors: parent=../ground
  JointSet:
    FreeJoint blockToGround:
      connectors: parent_frame=./ground_offset child_frame=../block
      Coordinate blockToGround_xRotation: range=(-1.570796 1.570796)
      Coordinate blockToGround_yRotation: range=(-1.570796 1.570796)
      Coordinate blockToGround_zRotation: range=(-1.570796 1.570796)
      Coordinate blockToGround_xTranslation: default_value=0.2 range=(-1 1)
      Coordinate blockToGround_yTranslation: default_value=-0.00196133 range=(-1 1)
      Coordinate blockToGround_zTranslation: range=(-1 1)
      PhysicalOffsetFrame ground_offset: translation=(0 0.05 0)
        connectors: parent=../../ground
  ControllerSet:
    PrescribedController prescribedcontroller_: actuator_list=(muscle1 muscle2)
      FunctionSet ControlFunctions: LinearFunction(coefficients=-0.333333 1) LinearFunction(coefficients=0.316667 0.05)
  ConstraintSet:
    ConstantDistanceConstraint constantdistanceconstraint_: location_body_1=(0 0.05 0) location_body_2=(0 0 0)
        constant_distance=0.2
      connectors: body_1=../ground body_2=../block
  ForceSet:
    Thelen2003Muscle muscle1: min_control=0 max_control=1 max_isometric_force=1000 optimal_fiber_length=0.25
        tendon_slack_length=0.1 pennation_angle_at_optimal=0 [radians] default_activation=1 default_fiber_length=0.25
      PathPoint point1: (0 0.05 -0.35)
        connectors: parent_frame=../../../ground
      PathPoint point2: (0 0 -0.05)
        connectors: parent_frame=../../../block
    Thelen2003Muscle muscle2: min_control=0 max_control=1 max_isometric_force=1000 optimal_fiber_length=0.25
        tendon_slack_length=0.1 pennation_angle_at_optimal=0 default_activation=0.05 default_fiber_length=0.25
      PathPoint point1: (0 0.05 0.35)
        connectors: parent_frame=../../../ground
      PathPoint point2: (0 0 0.05)
        connectors: parent_frame=../../../block
    PrescribedForce:
      connectors: frame=../block
      FunctionSet forceFunctions: PiecewiseLinearFunction(x=0 3, y=0 588.399) Constant(value=0) Constant(value=0)
      FunctionSet pointFunctions: Constant(value=0) Constant(value=0) Constant(value=0)
  ContactGeometrySet:
    ContactHalfSpace floor: location=(0 0 0) orientation=(0 0 -1.570796)
      connectors: frame=../ground
    ContactMesh blockMesh: location=(0 0 0) filename=blockMesh.obj
      connectors: frame=block
