# OpenSim document version 30517
Model EF_Mesh_to_Mesh:
  gravity: 0 -9.8065 0
  Ground
  BodySet:
    Body ball: mass=1 [kg] mass_center=(0 0 0) inertia=(1 1 1 0 0 0)
  JointSet:
    FreeJoint free: socket_parent_frame=ground_offset socket_child_frame=ball_offset
      Coordinate free_coord_0
      Coordinate free_coord_1
      Coordinate free_coord_2
      Coordinate free_coord_3
      Coordinate free_coord_4
      Coordinate free_coord_5
      PhysicalOffsetFrame ground_offset: socket_parent=../../../ground translation=(0 0 0) [meters]
      PhysicalOffsetFrame ball_offset: socket_parent=../../../bodyset/ball translation=(0 0 0)
  ForceSet:
    ElasticFoundationForce contact1:
      ContactParametersSet contact_parameters:
        ContactParameters: geometry=(ball1 ball2) stiffness=5000000 dissipation=0.001 static_friction=0
            dynamic_friction=0 viscous_friction=0
  ContactGeometrySet:
    ContactMesh ball1: socket_frame=../../ground location=(1 2 0) filename=sphere.vtp
    ContactMesh ball2: socket_frame=../../bodyset/ball location=(1 1 0) filename=sphere.vtp
    ContactSphere ball3: socket_frame=../../bodyset/ball location=(0 1 0) radius=0.25
    ContactHalfSpace plane: socket_frame=../../ground location=(0 0 0) orientation=(0 0 0.5)
