Model Muscle Editor Test Model:
  angle_units: radians
  force_units: N
  length_units: m
  defaults: Schutte1993Muscle defaultmuscle: pennation_angle=0 max_contraction_velocity=10 muscle_model=4
      time_scale=0.1 mass=0.00286 damping=0.1 activation1=7.667 activation2=1.459854
    tendon_force_length_curve: natCubicSpline: x=(-1 -0.002 -0.001 0 0.00131 0.00281 0.00431 0.00581 0.00731 0.00881 0.0103 0.0118 0.0123 9.2 9.201 9.202 12)
        y=(0 0 0 0 0.0108 0.0257 0.0435 0.0652 0.0915 0.123 0.161 0.208 0.227 345 345 345 345)
    active_force_length_curve: natCubicSpline: x=(0 0.401 0.402 0.4035 0.52725 0.62875 0.71875 0.86125 1.045 1.2175 1.43875 1.61875 1.62 1.621 2)
        y=(0 0 0 0 0.226667 0.636667 0.856667 0.95 0.993333 0.77 0.246667 0 0 0 0)
    passive_force_length_curve: natCubicSpline: x=(0.8 0.998 0.999 1 1.1 1.2 1.3 1.4 1.5 1.6 1.601 1.602 2)
        y=(0 0 0 0 0.035 0.12 0.26 0.55 1.17 2 2 2 2)
    force_velocity_curve: natCubicSpline: x=(-1.001 -1 -0.95 -0.9 -0.85 -0.8 -0.75 -0.7 -0.65 -0.6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)
        y=(0 0 0.010417 0.021739 0.034091 0.047619 0.0625 0.078947 0.097222 0.117647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)
  ActuatorSet:
    ObjectGroup right: members=(TFL_r add_brev_r add_long_r add_mag1_r add_mag2_r add_mag3_r bi_fem_lh_r bi_fem_sh_r ext_dig_r ext_hal_r flex_dig_r flex_hal_r gas_lat_r gas_med_r gemellus_r glut_max1_r glut_max2_r glut_max3_r glut_med1_r glut_med2_r glut_med3_r glut_min1_r glut_min2_r glut_min3_r gracilis_r iliacus_r pat_lig_r pectineus_r per_brev_r per_long_r per_tert_r piri_r psoas_r quad_fem_r rectus_fem_r sartorius_r semimem_r semiten_r soleus_r test_muscle tib_ant_r tib_post_r vas_int_r vas_lat_r vas_med_r)
    ObjectGroup leg_r: members=(TFL_r add_brev_r add_long_r add_mag1_r add_mag2_r add_mag3_r bi_fem_lh_r bi_fem_sh_r ext_dig_r ext_hal_r flex_dig_r flex_hal_r gas_lat_r gas_med_r gemellus_r glut_max1_r glut_max2_r glut_max3_r glut_med1_r glut_med2_r glut_med3_r glut_min1_r glut_min2_r glut_min3_r gracilis_r iliacus_r pat_lig_r pectineus_r per_brev_r per_long_r per_tert_r piri_r psoas_r quad_fem_r rectus_fem_r sartorius_r semimem_r semiten_r soleus_r test_muscle tib_ant_r tib_post_r vas_int_r vas_lat_r vas_med_r)
    ObjectGroup hip_r: members=(TFL_r add_brev_r add_long_r add_mag1_r add_mag2_r add_mag3_r bi_fem_lh_r gemellus_r glut_max1_r glut_max2_r glut_max3_r glut_med1_r glut_med2_r glut_med3_r glut_min1_r glut_min2_r glut_min3_r gracilis_r iliacus_r pectineus_r piri_r psoas_r quad_fem_r rectus_fem_r sartorius_r semimem_r semiten_r test_muscle)
    ObjectGroup knee_r: members=(bi_fem_lh_r bi_fem_sh_r gas_lat_r gas_med_r gracilis_r pat_lig_r rectus_fem_r sartorius_r semimem_r semiten_r test_muscle vas_int_r vas_lat_r vas_med_r)
    ObjectGroup ankle_r: members=(ext_dig_r ext_hal_r flex_dig_r flex_hal_r gas_lat_r gas_med_r per_brev_r per_long_r per_tert_r soleus_r tib_ant_r tib_post_r)
    ObjectGroup left: members=(TFL_l add_brev_l add_long_l add_mag1_l add_mag2_l add_mag3_l bi_fem_lh_l bi_fem_sh_l ext_dig_l ext_hal_l flex_dig_l flex_hal_l gas_lat_l gas_med_l gemellus_l glut_max1_l glut_max2_l glut_max3_l glut_med1_l glut_med2_l glut_med3_l glut_min1_l glut_min2_l glut_min3_l gracilis_l iliacus_l pat_lig_l pectineus_l per_brev_l per_long_l per_tert_l piri_l psoas_l quad_fem_l rectus_fem_l sartorius_l semimem_l semiten_l soleus_l tib_ant_l tib_post_l vas_int_l vas_lat_l vas_med_l)
    ObjectGroup leg_l: members=(TFL_l add_brev_l add_long_l add_mag1_l add_mag2_l add_mag3_l bi_fem_lh_l bi_fem_sh_l ext_dig_l ext_hal_l flex_dig_l flex_hal_l gas_lat_l gas_med_l gemellus_l glut_max1_l glut_max2_l glut_max3_l glut_med1_l glut_med2_l glut_med3_l glut_min1_l glut_min2_l glut_min3_l gracilis_l iliacus_l pat_lig_l pectineus_l per_brev_l per_long_l per_tert_l piri_l psoas_l quad_fem_l rectus_fem_l sartorius_l semimem_l semiten_l soleus_l tib_ant_l tib_post_l vas_int_l vas_lat_l vas_med_l)
    ObjectGroup hip_l: members=(TFL_l add_brev_l add_long_l add_mag1_l add_mag2_l add_mag3_l bi_fem_lh_l bi_fem_sh_l gemellus_l glut_max1_l glut_max2_l glut_max3_l glut_med1_l glut_med2_l glut_med3_l glut_min1_l glut_min2_l glut_min3_l gracilis_l iliacus_l pectineus_l piri_l psoas_l quad_fem_l rectus_fem_l sartorius_l semimem_l semiten_l)
    ObjectGroup knee_l: members=(bi_fem_lh_l bi_fem_sh_l gas_lat_l gas_med_l gracilis_l pat_lig_l rectus_fem_l sartorius_l semimem_l semiten_l vas_int_l vas_lat_l vas_med_l)
    ObjectGroup ankle_l: members=(ext_dig_l ext_hal_l flex_dig_l flex_hal_l gas_lat_l gas_med_l per_brev_l per_long_l per_tert_l soleus_l tib_ant_l tib_post_l)
    Force FX: optimal_force=100 body_A=ground point_A=(0 0 0) direction_A=(-1 0 0) body_B=pelvis
        point_B=(-0.0724376 0 0)
    Force FY: optimal_force=200 body_A=ground point_A=(0 0 0) direction_A=(0 -1 0) body_B=pelvis
        point_B=(-0.0724376 0 0)
    Force FZ: optimal_force=100 body_A=ground point_A=(0 0 0) direction_A=(0 0 -1) body_B=pelvis
        point_B=(-0.0724376 0 0)
    Torque MX: optimal_force=80 body_A=ground direction_A=(-1 0 0) body_B=pelvis
    Torque MY: optimal_force=80 body_A=ground direction_A=(0 -1 0) body_B=pelvis
    Torque MZ: optimal_force=80 body_A=ground direction_A=(0 0 -1) body_B=pelvis
    GeneralizedForce hip_flexion_r_reserve: coordinate=hip_flex_r optimal_force=1
    GeneralizedForce hip_adduction_r_reserve: coordinate=hip_add_r optimal_force=1
    GeneralizedForce hip_rotation_r_reserve: coordinate=hip_rot_r optimal_force=1
    GeneralizedForce knee_flex_r_reserve: coordinate=knee_flex_r optimal_force=1
    GeneralizedForce ankle_flex_r_reserve: coordinate=ankle_flex_r optimal_force=1
    GeneralizedForce hip_flexion_l_reserve: coordinate=hip_flex_l optimal_force=1
    GeneralizedForce hip_adduction_l_reserve: coordinate=hip_add_l optimal_force=1
    GeneralizedForce hip_rotation_l_reserve: coordinate=hip_rot_l optimal_force=1
    GeneralizedForce knee_flex_l_reserve: coordinate=knee_flex_l optimal_force=1
    GeneralizedForce ankle_flex_l_reserve: coordinate=ankle_flex_l optimal_force=1
    Schutte1993Muscle test_muscle: max_isometric_force=779 optimal_fiber_length=0.084 tendon_slack_length=0.346
        pennation_angle=0.08726646 muscle_model=4
      MusclePoint: pelvis (-0.0388 -0.0474 0.0918)
      MuscleViaPoint: femur_r (0.0334 -0.403 0.0019) coordinate=knee_flex_r range=(1.459968 2.617994)
      MusclePoint: patella_r (0.0121 0.0437 -0.001)
      MuscleWrap: wrap_object=femur_ell method=hybrid
      MuscleWrap: wrap_object=femur_cyl
      MuscleWrap: wrap_object=femur_sph
    Schutte1993Muscle glut_max1_r: max_isometric_force=382 optimal_fiber_length=0.142 tendon_slack_length=0.125
        pennation_angle=0.08726646 muscle_model=4
      MusclePoint: pelvis (-0.1253 0.0425 0.0606)
      MusclePoint: pelvis (-0.1384 -0.0151 0.0836)
      MusclePoint: femur_r (-0.0457 -0.0248 0.0392)
      MusclePoint: femur_r (-0.0277 -0.0566 0.047)
    Schutte1993Muscle glut_max2_r: max_isometric_force=546 optimal_fiber_length=0.147 tendon_slack_length=0.127
        pennation_angle=0 muscle_model=4
      MusclePoint: pelvis (-0.1442 0.0013 0.0513)
      MusclePoint: pelvis (-0.1469 -0.0683 0.0864)
      MusclePoint: femur_r (-0.0426 -0.053 0.0293)
      MusclePoint: femur_r (-0.0156 -0.1016 0.0419)
    Schutte1993Muscle glut_max3_r: max_isometric_force=368 optimal_fiber_length=0.144 tendon_slack_length=0.114
        pennation_angle=0.08726646 muscle_model=4
      MusclePoint: pelvis (-0.1642 -0.0792 0.0074)
      MusclePoint: pelvis (-0.1622 -0.1215 0.0353)
      MusclePoint: femur_r (-0.0299 -0.1041 0.0135)
      MusclePoint: femur_r (-0.006 -0.1419 0.0411)
    Schutte1993Muscle glut_med1_r: max_isometric_force=546 optimal_fiber_length=0.0535 tendon_slack_length=0.078
        pennation_angle=0.1396263 muscle_model=4
      MusclePoint: pelvis (-0.0501 0.0141 0.1159)
      MusclePoint: femur_r (-0.0218 -0.0117 0.0555)
    Schutte1993Muscle glut_med2_r: max_isometric_force=382 optimal_fiber_length=0.0845 tendon_slack_length=0.037
        pennation_angle=0 muscle_model=4
      MusclePoint: pelvis (-0.0964 0.0137 0.0792)
      MusclePoint: femur_r (-0.0258 -0.0058 0.0527)
    Schutte1993Muscle glut_med3_r: max_isometric_force=435 optimal_fiber_length=0.0646 tendon_slack_length=0.053
        pennation_angle=0.3316126 muscle_model=4
      MusclePoint: pelvis (-0.1316 -0.0058 0.0598)
      MusclePoint: femur_r (-0.0309 -0.0047 0.0518)
    Schutte1993Muscle glut_min1_r: max_isometric_force=180 optimal_fiber_length=0.068 tendon_slack_length=0.016
        pennation_angle=0.1745329 muscle_model=4
      MusclePoint: pelvis (-0.056 -0.0243 0.1006)
      MusclePoint: femur_r (-0.0072 -0.0104 0.056)
    Schutte1993Muscle glut_min2_r: max_isometric_force=190 optimal_fiber_length=0.056 tendon_slack_length=0.026
        pennation_angle=0 muscle_model=4
      MusclePoint: pelvis (-0.0726 -0.0228 0.0941)
      MusclePoint: femur_r (-0.0096 -0.0104 0.056)
    Schutte1993Muscle glut_min3_r: max_isometric_force=215 optimal_fiber_length=0.038 tendon_slack_length=0.051
        pennation_angle=0.3665191 muscle_model=4
      MusclePoint: pelvis (-0.0927 -0.0226 0.0806)
      MusclePoint: femur_r (-0.0135 -0.0083 0.055)
    Schutte1993Muscle add_long_r: max_isometric_force=418 optimal_fiber_length=0.138 tendon_slack_length=0.1105
        pennation_angle=0.1047198 muscle_model=4
      MusclePoint: pelvis (-0.0434 -0.1058 0.0098)
      MusclePoint: femur_r (0.005 -0.2111 0.0234)
    Schutte1993Muscle add_brev_r: max_isometric_force=286 optimal_fiber_length=0.133 tendon_slack_length=0.013
        pennation_angle=0 muscle_model=4
      MusclePoint: pelvis (-0.0685 -0.1124 0.0164)
      MusclePoint: femur_r (0.0009 -0.1196 0.0294)
    Schutte1993Muscle add_mag1_r: max_isometric_force=346 optimal_fiber_length=0.087 tendon_slack_length=0.06
        pennation_angle=0.08726646 muscle_model=4
      MusclePoint: pelvis (-0.0825 -0.1337 0.0205)
      MusclePoint: femur_r (-0.0045 -0.1211 0.0339)
    Schutte1993Muscle add_mag2_r: max_isometric_force=312 optimal_fiber_length=0.121 tendon_slack_length=0.13
        pennation_angle=0.05235988 muscle_model=4
      MusclePoint: pelvis (-0.0924 -0.1355 0.0258)
      MusclePoint: femur_r (0.0054 -0.2285 0.0227)
    Schutte1993Muscle add_mag3_r: max_isometric_force=444 optimal_fiber_length=0.131 tendon_slack_length=0.26
        pennation_angle=0.08726646 muscle_model=4
      MusclePoint: pelvis (-0.0864 -0.1344 0.0226)
      MusclePoint: femur_r (0.007 -0.3837 -0.0266)
    Schutte1993Muscle pectineus_r: max_isometric_force=177 optimal_fiber_length=0.133 tendon_slack_length=0.001
        pennation_angle=0 muscle_model=4
      MusclePoint: pelvis (-0.0524 -0.0931 0.0401)
      MusclePoint: femur_r (-0.0122 -0.0822 0.0253)
    Schutte1993Muscle iliacus_r: max_isometric_force=429 optimal_fiber_length=0.1 tendon_slack_length=0.09
        pennation_angle=0.122173 muscle_model=4
      MusclePoint: pelvis (-0.0784 0.0194 0.0828)
      MusclePoint: pelvis (-0.0311 -0.0713 0.0801)
      MusclePoint: femur_r (0.0017 -0.0543 0.0057)
      MusclePoint: femur_r (-0.0193 -0.0621 0.0129)
    Schutte1993Muscle psoas_r: max_isometric_force=371 optimal_fiber_length=0.104 tendon_slack_length=0.113
        pennation_angle=0.1396263 muscle_model=4
      MusclePoint: pelvis (-0.07817 0.05129 0.0207)
      MusclePoint: pelvis (-0.0331 -0.0733 0.0709)
      MusclePoint: femur_r (0.0016 -0.0507 0.0038)
      MusclePoint: femur_r (-0.0188 -0.0597 0.0104)
    Schutte1993Muscle quad_fem_r: max_isometric_force=254 optimal_fiber_length=0.054 tendon_slack_length=0.024
        pennation_angle=0 muscle_model=4
      MusclePoint: pelvis (-0.1236 -0.1314 0.047)
      MusclePoint: femur_r (-0.0381 -0.0359 0.0366)
    Schutte1993Muscle gemellus_r: max_isometric_force=109 optimal_fiber_length=0.024 tendon_slack_length=0.039
        pennation_angle=0 muscle_model=4
      MusclePoint: pelvis (-0.1226 -0.0983 0.0664)
      MusclePoint: femur_r (-0.0142 -0.0033 0.0443)
    Schutte1993Muscle piri_r: max_isometric_force=296 optimal_fiber_length=0.026 tendon_slack_length=0.106
        pennation_angle=0.1745329 muscle_model=4
      MusclePoint: pelvis (-0.1679 -0.0458 0.0291)
      MusclePoint: pelvis (-0.1333 -0.0531 0.0605)
      MusclePoint: femur_r (-0.0148 -0.0036 0.0437)
    Schutte1993Muscle TFL_r: max_isometric_force=155 optimal_fiber_length=0.095 tendon_slack_length=0.425
        pennation_angle=0.05235988 muscle_model=4
      MusclePoint: pelvis (-0.0404 0.0051 0.1191)
      MusclePoint: femur_r (0.0294 -0.0995 0.0597)
      MusclePoint: femur_r (0.0054 -0.4049 0.0357)
      MusclePoint: tibia_r (0.006 -0.0487 0.0297)
    Schutte1993Muscle gracilis_r: max_isometric_force=108 optimal_fiber_length=0.352 tendon_slack_length=0.14
        pennation_angle=0.05235988 muscle_model=4
      MusclePoint: pelvis (-0.0656 -0.1201 0.0029)
      MusclePoint: tibia_r (-0.0154 -0.0475 -0.0358)
      MusclePoint: tibia_r (0.006 -0.0836 -0.0228)
    Schutte1993Muscle semimem_r: max_isometric_force=1030 optimal_fiber_length=0.08 tendon_slack_length=0.359
        pennation_angle=0.2617994 muscle_model=4
      MusclePoint: pelvis (-0.1285 -0.1178 0.0645)
      MusclePoint: tibia_r (-0.0243 -0.0536 -0.0194)
    Schutte1993Muscle semiten_r: max_isometric_force=328 optimal_fiber_length=0.201 tendon_slack_length=0.262
        pennation_angle=0.08726646 muscle_model=4
      MusclePoint: pelvis (-0.133 -0.1206 0.0553)
      MusclePoint: tibia_r (-0.0314 -0.0545 -0.0146)
      MusclePoint: tibia_r (-0.0113 -0.0746 -0.0245)
      MusclePoint: tibia_r (0.0027 -0.0956 -0.0193)
    Schutte1993Muscle bi_fem_lh_r: max_isometric_force=717 optimal_fiber_length=0.109 tendon_slack_length=0.341
        pennation_angle=0 muscle_model=4
      MusclePoint: pelvis (-0.1337 -0.1164 0.0616)
      MusclePoint: tibia_r (-0.0081 -0.0729 0.0423)
    Schutte1993Muscle bi_fem_sh_r: max_isometric_force=402 optimal_fiber_length=0.173 tendon_slack_length=0.1
        pennation_angle=0.4014257 muscle_model=4
      MusclePoint: femur_r (0.005 -0.2111 0.0234)
      MusclePoint: tibia_r (-0.0101 -0.0725 0.0406)
    Schutte1993Muscle sartorius_r: max_isometric_force=104 optimal_fiber_length=0.579 tendon_slack_length=0.04
        pennation_angle=0 muscle_model=4
      MusclePoint: pelvis (-0.0296 -0.018 0.1198)
      MusclePoint: femur_r (-0.003 -0.3568 -0.0421)
      MusclePoint: tibia_r (-0.0056 -0.0419 -0.0399)
      MusclePoint: tibia_r (0.006 -0.0589 -0.0383)
      MusclePoint: tibia_r (0.0243 -0.084 -0.0252)
    Schutte1993Muscle rectus_fem_r: max_isometric_force=779 optimal_fiber_length=0.084 tendon_slack_length=0.346
        pennation_angle=0.08726646 muscle_model=4
      MusclePoint: pelvis (-0.0388 -0.0474 0.0918)
      MuscleViaPoint: femur_r (0.0334 -0.403 0.0019) coordinate=knee_flex_r range=(1.459968 2.617994)
      MusclePoint: patella_r (0.0121 0.0437 -0.001)
    Schutte1993Muscle vas_med_r: max_isometric_force=1294 optimal_fiber_length=0.089 tendon_slack_length=0.126
        pennation_angle=0.08726646 muscle_model=4
      MusclePoint: femur_r (0.014 -0.2099 0.0188)
      MusclePoint: femur_r (0.0356 -0.2769 0.0009)
      MuscleViaPoint: femur_r (0.037 -0.4048 -0.0125) coordinate=knee_flex_r range=(1.209862 2.617994)
      MuscleViaPoint: femur_r (0.0274 -0.4255 -0.0131) coordinate=knee_flex_r range=(1.780061 2.617994)
      MusclePoint: patella_r (0.0063 0.0445 -0.017)
    Schutte1993Muscle vas_int_r: max_isometric_force=1365 optimal_fiber_length=0.087 tendon_slack_length=0.136
        pennation_angle=0.05235988 muscle_model=4
      MusclePoint: femur_r (0.029 -0.1924 0.031)
      MusclePoint: femur_r (0.0335 -0.2084 0.0285)
      MuscleViaPoint: femur_r (0.0343 -0.403 0.0055) coordinate=knee_flex_r range=(1.42 2.617994)
      MusclePoint: patella_r (0.0058 0.048 -0.0006)
    Schutte1993Muscle vas_lat_r: max_isometric_force=1871 optimal_fiber_length=0.084 tendon_slack_length=0.157
        pennation_angle=0.08726646 muscle_model=4
      MusclePoint: femur_r (0.0048 -0.1854 0.0349)
      MusclePoint: femur_r (0.0269 -0.2591 0.0409)
      MuscleViaPoint: femur_r (0.0361 -0.403 0.0205) coordinate=knee_flex_r range=(1.209862 2.617994)
      MuscleViaPoint: femur_r (0.0253 -0.4243 0.0184) coordinate=knee_flex_r range=(1.919862 2.617994)
      MusclePoint: patella_r (0.0103 0.0423 0.0141)
    Schutte1993Muscle pat_lig_r: max_isometric_force=1 optimal_fiber_length=0.05 tendon_slack_length=0.005
        pennation_angle=0 muscle_model=4
      MusclePoint: tibia_r (0.039 -0.0822 0)
      MusclePoint: patella_r (0.0021 0.0015 0.0001)
    Schutte1993Muscle gas_med_r: max_isometric_force=1113 optimal_fiber_length=0.045 tendon_slack_length=0.408
        pennation_angle=0.296706 muscle_model=4
      MusclePoint: femur_r (-0.0127 -0.3929 -0.0235)
      MuscleViaPoint: femur_r (-0.0239 -0.4022 -0.0258) coordinate=knee_flex_r range=(-0.3490659 0.7700393)
      MusclePoint: tibia_r (-0.0217 -0.0487 -0.0295)
      MusclePoint: foot_r (0.00336 0.03204 -0.00634)
    Schutte1993Muscle gas_lat_r: max_isometric_force=488 optimal_fiber_length=0.064 tendon_slack_length=0.385
        pennation_angle=0.1396263 muscle_model=4
      MusclePoint: femur_r (-0.0155 -0.3946 0.0272)
      MuscleViaPoint: femur_r (-0.0254 -0.4018 0.0274) coordinate=knee_flex_r range=(-0.3490659 0.7700393)
      MusclePoint: tibia_r (-0.0242 -0.0481 0.0235)
      MusclePoint: foot_r (0.00336 0.03204 -0.00634)
    Schutte1993Muscle soleus_r: max_isometric_force=2839 optimal_fiber_length=0.03 tendon_slack_length=0.268
        pennation_angle=0.4363323 muscle_model=4
      MusclePoint: tibia_r (-0.0024 -0.1533 0.0071)
      MusclePoint: foot_r (0.00336 0.03204 -0.00634)
    Schutte1993Muscle tib_post_r: max_isometric_force=1270 optimal_fiber_length=0.031 tendon_slack_length=0.31
        pennation_angle=0.2094395 muscle_model=4
      MusclePoint: tibia_r (-0.0094 -0.1348 0.0019)
      MusclePoint: tibia_r (-0.0144 -0.4051 -0.0229)
      MusclePoint: foot_r (0.0417 0.0334 -0.0286)
      MusclePoint: foot_r (0.0772 0.0159 -0.0281)
    Schutte1993Muscle tib_ant_r: max_isometric_force=603 optimal_fiber_length=0.098 tendon_slack_length=0.223
        pennation_angle=0.08726646 muscle_model=4
      MusclePoint: tibia_r (0.0179 -0.1624 0.0115)
      MusclePoint: tibia_r (0.0329 -0.3951 -0.0177)
      MusclePoint: foot_r (0.1166 0.0178 -0.0305)
    Schutte1993Muscle ext_dig_r: max_isometric_force=341 optimal_fiber_length=0.102 tendon_slack_length=0.345
        pennation_angle=0.1396263 muscle_model=4
      MusclePoint: tibia_r (0.0032 -0.1381 0.0276)
      MusclePoint: tibia_r (0.0289 -0.4007 0.0072)
      MusclePoint: foot_r (0.0922 0.0388 -0.0001)
      MusclePoint: foot_r (0.1616 0.0055 0.013)
      MusclePoint: toes_r (0.0003 0.0047 0.0153)
      MusclePoint: toes_r (0.0443 -0.0004 0.025)
    Schutte1993Muscle ext_hal_r: max_isometric_force=108 optimal_fiber_length=0.111 tendon_slack_length=0.305
        pennation_angle=0.1047198 muscle_model=4
      MusclePoint: tibia_r (0.0012 -0.1767 0.0228)
      MusclePoint: tibia_r (0.0326 -0.3985 -0.0085)
      MusclePoint: foot_r (0.097 0.0389 -0.0211)
      MusclePoint: foot_r (0.1293 0.0309 -0.0257)
      MusclePoint: foot_r (0.17778 0.01196 -0.0273)
      MusclePoint: toes_r (0.01217 0.01039 -0.02633)
      MusclePoint: toes_r (0.05628 -0.00131 -0.01852)
    Schutte1993Muscle flex_dig_r: max_isometric_force=310 optimal_fiber_length=0.034 tendon_slack_length=0.4
        pennation_angle=0.122173 muscle_model=4
      MusclePoint: tibia_r (-0.0083 -0.2046 -0.0018)
      MusclePoint: tibia_r (-0.0154 -0.4051 -0.0196)
      MusclePoint: foot_r (0.0436 0.0315 -0.028)
      MusclePoint: foot_r (0.0708 0.0176 -0.0263)
      MusclePoint: foot_r (0.16361 -0.00798 0.01009)
      MusclePoint: toes_r (-0.0019 -0.0078 0.0147)
      MusclePoint: toes_r (0.0285 -0.0071 0.0215)
      MusclePoint: toes_r (0.0441 -0.006 0.0242)
    Schutte1993Muscle flex_hal_r: max_isometric_force=322 optimal_fiber_length=0.043 tendon_slack_length=0.38
        pennation_angle=0.1745329 muscle_model=4
      MusclePoint: tibia_r (-0.0079 -0.2334 0.0244)
      MusclePoint: tibia_r (-0.0186 -0.4079 -0.0174)
      MusclePoint: foot_r (0.0374 0.0276 -0.0241)
      MusclePoint: foot_r (0.1038 0.0068 -0.0256)
      MusclePoint: foot_r (0.16956 -0.00501 -0.02761)
      MusclePoint: toes_r (0.00839 -0.00726 -0.0269)
      MusclePoint: toes_r (0.05607 -0.00839 -0.01817)
    Schutte1993Muscle per_brev_r: max_isometric_force=348 optimal_fiber_length=0.05 tendon_slack_length=0.161
        pennation_angle=0.08726646 muscle_model=4
      MusclePoint: tibia_r (-0.007 -0.2646 0.0325)
      MusclePoint: tibia_r (-0.0198 -0.4184 0.0283)
      MusclePoint: tibia_r (-0.0144 -0.4295 0.0289)
      MusclePoint: foot_r (0.0471 0.027 0.0233)
      MusclePoint: foot_r (0.07569 0.01934 0.02942)
    Schutte1993Muscle per_long_r: max_isometric_force=754 optimal_fiber_length=0.049 tendon_slack_length=0.345
        pennation_angle=0.1745329 muscle_model=4
      MusclePoint: tibia_r (0.0005 -0.1568 0.0362)
      MusclePoint: tibia_r (-0.0207 -0.4205 0.0286)
      MusclePoint: tibia_r (-0.0162 -0.4319 0.0289)
      MusclePoint: foot_r (0.0438 0.023 0.0221)
      MusclePoint: foot_r (0.0681 0.0106 0.0284)
      MusclePoint: foot_r (0.0852 0.0069 0.0118)
      MusclePoint: foot_r (0.1203 0.0085 -0.0184)
    Schutte1993Muscle per_tert_r: max_isometric_force=90 optimal_fiber_length=0.079 tendon_slack_length=0.1
        pennation_angle=0.2268928 muscle_model=4
      MusclePoint: tibia_r (0.001 -0.2804 0.0231)
      MusclePoint: tibia_r (0.0229 -0.4069 0.0159)
      MusclePoint: foot_r (0.0857 0.0228 0.0299)
    Schutte1993Muscle glut_max1_l: max_isometric_force=382 optimal_fiber_length=0.142 tendon_slack_length=0.125
        pennation_angle=0.08726646 muscle_model=4
      MusclePoint: pelvis (-0.1253 0.0425 -0.0606)
      MusclePoint: pelvis (-0.1384 -0.0151 -0.0836)
      MusclePoint: femur_l (-0.0457 -0.0248 -0.0392)
      MusclePoint: femur_l (-0.0277 -0.0566 -0.047)
    Schutte1993Muscle glut_max2_l: max_isometric_force=546 optimal_fiber_length=0.147 tendon_slack_length=0.127
        pennation_angle=0 muscle_model=4
      MusclePoint: pelvis (-0.1442 0.0013 -0.0513)
      MusclePoint: pelvis (-0.1469 -0.0683 -0.0864)
      MusclePoint: femur_l (-0.0426 -0.053 -0.0293)
      MusclePoint: femur_l (-0.0156 -0.1016 -0.0419)
    Schutte1993Muscle glut_max3_l: max_isometric_force=368 optimal_fiber_length=0.144 tendon_slack_length=0.114
        pennation_angle=0.08726646 muscle_model=4
      MusclePoint: pelvis (-0.1642 -0.0792 -0.0074)
      MusclePoint: pelvis (-0.1622 -0.1215 -0.0353)
      MusclePoint: femur_l (-0.0299 -0.1041 -0.0135)
      MusclePoint: femur_l (-0.006 -0.1419 -0.0411)
    Schutte1993Muscle glut_med1_l: max_isometric_force=546 optimal_fiber_length=0.0535 tendon_slack_length=0.078
        pennation_angle=0.1396263 muscle_model=4
      MusclePoint: pelvis (-0.0501 0.0141 -0.1159)
      MusclePoint: femur_l (-0.0218 -0.0117 -0.0555)
    Schutte1993Muscle glut_med2_l: max_isometric_force=382 optimal_fiber_length=0.0845 tendon_slack_length=0.037
        pennation_angle=0 muscle_model=4
      MusclePoint: pelvis (-0.0964 0.0137 -0.0792)
      MusclePoint: femur_l (-0.0258 -0.0058 -0.0527)
    Schutte1993Muscle glut_med3_l: max_isometric_force=435 optimal_fiber_length=0.0646 tendon_slack_length=0.053
        pennation_angle=0.3316126 muscle_model=4
      MusclePoint: pelvis (-0.1316 -0.0058 -0.0598)
      MusclePoint: femur_l (-0.0309 -0.0047 -0.0518)
    Schutte1993Muscle glut_min1_l: max_isometric_force=180 optimal_fiber_length=0.068 tendon_slack_length=0.016
        pennation_angle=0.1745329 muscle_model=4
      MusclePoint: pelvis (-0.056 -0.0243 -0.1006)
      MusclePoint: femur_l (-0.0072 -0.0104 -0.056)
    Schutte1993Muscle glut_min2_l: max_isometric_force=190 optimal_fiber_length=0.056 tendon_slack_length=0.026
        pennation_angle=0 muscle_model=4
      MusclePoint: pelvis (-0.0726 -0.0228 -0.0941)
      MusclePoint: femur_l (-0.0096 -0.0104 -0.056)
    Schutte1993Muscle glut_min3_l: max_isometric_force=215 optimal_fiber_length=0.038 tendon_slack_length=0.051
        pennation_angle=0.3665191 muscle_model=4
      MusclePoint: pelvis (-0.0927 -0.0226 -0.0806)
      MusclePoint: femur_l (-0.0135 -0.0083 -0.055)
    Schutte1993Muscle add_long_l: max_isometric_force=418 optimal_fiber_length=0.138 tendon_slack_length=0.1105
        pennation_angle=0.1047198 muscle_model=4
      MusclePoint: pelvis (-0.0434 -0.1058 -0.0098)
      MusclePoint: femur_l (0.005 -0.2111 -0.0234)
    Schutte1993Muscle add_brev_l: max_isometric_force=286 optimal_fiber_length=0.133 tendon_slack_length=0.013
        pennation_angle=0 muscle_model=4
      MusclePoint: pelvis (-0.0685 -0.1124 -0.0164)
      MusclePoint: femur_l (0.0009 -0.1196 -0.0294)
    Schutte1993Muscle add_mag1_l: max_isometric_force=346 optimal_fiber_length=0.087 tendon_slack_length=0.06
        pennation_angle=0.08726646 muscle_model=4
      MusclePoint: pelvis (-0.0825 -0.1337 -0.0205)
      MusclePoint: femur_l (-0.0045 -0.1211 -0.0339)
    Schutte1993Muscle add_mag2_l: max_isometric_force=312 optimal_fiber_length=0.121 tendon_slack_length=0.13
        pennation_angle=0.05235988 muscle_model=4
      MusclePoint: pelvis (-0.0924 -0.1355 -0.0258)
      MusclePoint: femur_l (0.0054 -0.2285 -0.0227)
    Schutte1993Muscle add_mag3_l: max_isometric_force=444 optimal_fiber_length=0.131 tendon_slack_length=0.26
        pennation_angle=0.08726646 muscle_model=4
      MusclePoint: pelvis (-0.0864 -0.1344 -0.0226)
      MusclePoint: femur_l (0.007 -0.3837 -0.0266)
    Schutte1993Muscle pectineus_l: max_isometric_force=177 optimal_fiber_length=0.133 tendon_slack_length=0.001
        pennation_angle=0 muscle_model=4
      MusclePoint: pelvis (-0.0524 -0.0931 -0.0401)
      MusclePoint: femur_l (-0.0122 -0.0822 -0.0253)
    Schutte1993Muscle iliacus_l: max_isometric_force=429 optimal_fiber_length=0.1 tendon_slack_length=0.09
        pennation_angle=0.122173 muscle_model=4
      MusclePoint: pelvis (-0.0784 0.0194 -0.0828)
      MusclePoint: pelvis (-0.0311 -0.0713 -0.0801)
      MusclePoint: femur_l (0.0017 -0.0543 -0.0057)
      MusclePoint: femur_l (-0.0193 -0.0621 -0.0129)
    Schutte1993Muscle psoas_l: max_isometric_force=371 optimal_fiber_length=0.104 tendon_slack_length=0.113
        pennation_angle=0.1396263 muscle_model=4
      MusclePoint: pelvis (-0.07817 0.05129 -0.0207)
      MusclePoint: pelvis (-0.0331 -0.0733 -0.0709)
      MusclePoint: femur_l (0.0016 -0.0507 -0.0038)
      MusclePoint: femur_l (-0.0188 -0.0597 -0.0104)
    Schutte1993Muscle quad_fem_l: max_isometric_force=254 optimal_fiber_length=0.054 tendon_slack_length=0.024
        pennation_angle=0 muscle_model=4
      MusclePoint: pelvis (-0.1236 -0.1314 -0.047)
      MusclePoint: femur_l (-0.0381 -0.0359 -0.0366)
    Schutte1993Muscle gemellus_l: max_isometric_force=109 optimal_fiber_length=0.024 tendon_slack_length=0.039
        pennation_angle=0 muscle_model=4
      MusclePoint: pelvis (-0.1226 -0.0983 -0.0664)
      MusclePoint: femur_l (-0.0142 -0.0033 -0.0443)
    Schutte1993Muscle piri_l: max_isometric_force=296 optimal_fiber_length=0.026 tendon_slack_length=0.106
        pennation_angle=0.1745329 muscle_model=4
      MusclePoint: pelvis (-0.1679 -0.0458 -0.0291)
      MusclePoint: pelvis (-0.1333 -0.0531 -0.0605)
      MusclePoint: femur_l (-0.0148 -0.0036 -0.0437)
    Schutte1993Muscle TFL_l: max_isometric_force=155 optimal_fiber_length=0.095 tendon_slack_length=0.425
        pennation_angle=0.05235988 muscle_model=4
      MusclePoint: pelvis (-0.0404 0.0051 -0.1191)
      MusclePoint: femur_l (0.0294 -0.0995 -0.0597)
      MusclePoint: femur_l (0.0054 -0.4049 -0.0357)
      MusclePoint: tibia_l (0.006 -0.0487 -0.0297)
    Schutte1993Muscle gracilis_l: max_isometric_force=108 optimal_fiber_length=0.352 tendon_slack_length=0.14
        pennation_angle=0.05235988 muscle_model=4
      MusclePoint: pelvis (-0.0656 -0.1201 -0.0029)
      MusclePoint: tibia_l (-0.0154 -0.0475 0.0358)
      MusclePoint: tibia_l (0.006 -0.0836 0.0228)
    Schutte1993Muscle semimem_l: max_isometric_force=1030 optimal_fiber_length=0.08 tendon_slack_length=0.359
        pennation_angle=0.2617994 muscle_model=4
      MusclePoint: pelvis (-0.1285 -0.1178 -0.0645)
      MusclePoint: tibia_l (-0.0243 -0.0536 0.0194)
    Schutte1993Muscle semiten_l: max_isometric_force=328 optimal_fiber_length=0.201 tendon_slack_length=0.262
        pennation_angle=0.08726646 muscle_model=4
      MusclePoint: pelvis (-0.133 -0.1206 -0.0553)
      MusclePoint: tibia_l (-0.0314 -0.0545 0.0146)
      MusclePoint: tibia_l (-0.0113 -0.0746 0.0245)
      MusclePoint: tibia_l (0.0027 -0.0956 0.0193)
    Schutte1993Muscle bi_fem_lh_l: max_isometric_force=717 optimal_fiber_length=0.109 tendon_slack_length=0.341
        pennation_angle=0 muscle_model=4
      MusclePoint: pelvis (-0.1337 -0.1164 -0.0616)
      MusclePoint: tibia_l (-0.0081 -0.0729 -0.0423)
    Schutte1993Muscle bi_fem_sh_l: max_isometric_force=402 optimal_fiber_length=0.173 tendon_slack_length=0.1
        pennation_angle=0.4014257 muscle_model=4
      MusclePoint: femur_l (0.005 -0.2111 -0.0234)
      MusclePoint: tibia_l (-0.0101 -0.0725 -0.0406)
    Schutte1993Muscle sartorius_l: max_isometric_force=104 optimal_fiber_length=0.579 tendon_slack_length=0.04
        pennation_angle=0 muscle_model=4
      MusclePoint: pelvis (-0.0296 -0.018 -0.1198)
      MusclePoint: femur_l (-0.003 -0.3568 0.0421)
      MusclePoint: tibia_l (-0.0056 -0.0419 0.0399)
      MusclePoint: tibia_l (0.006 -0.0589 0.0383)
      MusclePoint: tibia_l (0.0243 -0.084 0.0252)
    Schutte1993Muscle rectus_fem_l: max_isometric_force=779 optimal_fiber_length=0.084 tendon_slack_length=0.346
        pennation_angle=0.08726646 muscle_model=4
      MusclePoint: pelvis (-0.0388 -0.0474 -0.0918)
      MuscleViaPoint: femur_l (0.0334 -0.403 -0.0019) coordinate=knee_flex_l range=(1.459968 2.617994)
      MusclePoint: patella_l (0.0121 0.0437 0.001)
    Schutte1993Muscle vas_med_l: max_isometric_force=1294 optimal_fiber_length=0.089 tendon_slack_length=0.126
        pennation_angle=0.08726646 muscle_model=4
      MusclePoint: femur_l (0.014 -0.2099 -0.0188)
      MusclePoint: femur_l (0.0356 -0.2769 -0.0009)
      MuscleViaPoint: femur_l (0.037 -0.4048 0.0125) coordinate=knee_flex_l range=(1.209862 2.617994)
      MuscleViaPoint: femur_l (0.0274 -0.4255 0.0131) coordinate=knee_flex_l range=(1.780061 2.617994)
      MusclePoint: patella_l (0.0063 0.0445 0.017)
    Schutte1993Muscle vas_int_l: max_isometric_force=1365 optimal_fiber_length=0.087 tendon_slack_length=0.136
        pennation_angle=0.05235988 muscle_model=4
      MusclePoint: femur_l (0.029 -0.1924 -0.031)
      MusclePoint: femur_l (0.0335 -0.2084 -0.0285)
      MuscleViaPoint: femur_l (0.0343 -0.403 -0.0055) coordinate=knee_flex_l range=(1.42 2.617994)
      MusclePoint: patella_l (0.0058 0.048 0.0006)
    Schutte1993Muscle vas_lat_l: max_isometric_force=1871 optimal_fiber_length=0.084 tendon_slack_length=0.157
        pennation_angle=0.08726646 muscle_model=4
      MusclePoint: femur_l (0.0048 -0.1854 -0.0349)
      MusclePoint: femur_l (0.0269 -0.2591 -0.0409)
      MuscleViaPoint: femur_l (0.0361 -0.403 -0.0205) coordinate=knee_flex_l range=(1.209862 2.617994)
      MuscleViaPoint: femur_l (0.0253 -0.4243 -0.0184) coordinate=knee_flex_l range=(1.919862 2.617994)
      MusclePoint: patella_l (0.0103 0.0423 -0.0141)
    Schutte1993Muscle pat_lig_l: max_isometric_force=100 optimal_fiber_length=0.05 tendon_slack_length=0.005
        pennation_angle=0 muscle_model=4
      MusclePoint: tibia_l (0.039 -0.0822 0)
      MusclePoint: patella_l (0.0021 0.0015 -0.0001)
    Schutte1993Muscle gas_med_l: max_isometric_force=1113 optimal_fiber_length=0.045 tendon_slack_length=0.408
        pennation_angle=0.296706 muscle_model=4
      MusclePoint: femur_l (-0.0127 -0.3929 0.0235)
      MuscleViaPoint: femur_l (-0.0239 -0.4022 0.0258) coordinate=knee_flex_l range=(-0.3490659 0.7700393)
      MusclePoint: tibia_l (-0.0217 -0.0487 0.0295)
      MusclePoint: foot_l (0.00336 0.03204 0.00634)
    Schutte1993Muscle gas_lat_l: max_isometric_force=488 optimal_fiber_length=0.064 tendon_slack_length=0.385
        pennation_angle=0.1396263 muscle_model=4
      MusclePoint: femur_l (-0.0155 -0.3946 -0.0272)
      MuscleViaPoint: femur_l (-0.0254 -0.4018 -0.0274) coordinate=knee_flex_l range=(-0.3490659 0.7700393)
      MusclePoint: tibia_l (-0.0242 -0.0481 -0.0235)
      MusclePoint: foot_l (0.00336 0.03204 0.00634)
    Schutte1993Muscle soleus_l: max_isometric_force=2839 optimal_fiber_length=0.03 tendon_slack_length=0.268
        pennation_angle=0.4363323 muscle_model=4
      MusclePoint: tibia_l (-0.0024 -0.1533 -0.0071)
      MusclePoint: foot_l (0.00336 0.03204 0.00634)
    Schutte1993Muscle tib_post_l: max_isometric_force=1270 optimal_fiber_length=0.031 tendon_slack_length=0.31
        pennation_angle=0.2094395 muscle_model=4
      MusclePoint: tibia_l (-0.0094 -0.1348 -0.0019)
      MusclePoint: tibia_l (-0.0144 -0.4051 0.0229)
      MusclePoint: foot_l (0.0417 0.0334 0.0286)
      MusclePoint: foot_l (0.0772 0.0159 0.0281)
    Schutte1993Muscle tib_ant_l: max_isometric_force=603 optimal_fiber_length=0.098 tendon_slack_length=0.223
        pennation_angle=0.08726646 muscle_model=4
      MusclePoint: tibia_l (0.0179 -0.1624 -0.0115)
      MusclePoint: tibia_l (0.0329 -0.3951 0.0177)
      MusclePoint: foot_l (0.1166 0.0178 0.0305)
    Schutte1993Muscle ext_dig_l: max_isometric_force=341 optimal_fiber_length=0.102 tendon_slack_length=0.345
        pennation_angle=0.1396263 muscle_model=4
      MusclePoint: tibia_l (0.0032 -0.1381 -0.0276)
      MusclePoint: tibia_l (0.0289 -0.4007 -0.0072)
      MusclePoint: foot_l (0.0922 0.0388 0.0001)
      MusclePoint: foot_l (0.1616 0.0055 -0.013)
      MusclePoint: toes_l (0.0003 0.0047 -0.0153)
      MusclePoint: toes_l (0.0443 -0.0004 -0.025)
    Schutte1993Muscle ext_hal_l: max_isometric_force=108 optimal_fiber_length=0.111 tendon_slack_length=0.305
        pennation_angle=0.1047198 muscle_model=4
      MusclePoint: tibia_l (0.0012 -0.1767 -0.0228)
      MusclePoint: tibia_l (0.0326 -0.3985 0.0085)
      MusclePoint: foot_l (0.097 0.0389 0.0211)
      MusclePoint: foot_l (0.1293 0.0309 0.0257)
      MusclePoint: foot_l (0.17778 0.01196 0.0273)
      MusclePoint: toes_l (0.01217 0.01039 0.02633)
      MusclePoint: toes_l (0.05628 -0.00131 0.01852)
    Schutte1993Muscle flex_dig_l: max_isometric_force=310 optimal_fiber_length=0.034 tendon_slack_length=0.4
        pennation_angle=0.122173 muscle_model=4
      MusclePoint: tibia_l (-0.0083 -0.2046 0.0018)
      MusclePoint: tibia_l (-0.0154 -0.4051 0.0196)
      MusclePoint: foot_l (0.0436 0.0315 0.028)
      MusclePoint: foot_l (0.0708 0.0176 0.0263)
      MusclePoint: foot_l (0.16361 -0.00798 -0.01009)
      MusclePoint: toes_l (-0.0019 -0.0078 -0.0147)
      MusclePoint: toes_l (0.0285 -0.0071 -0.0215)
      MusclePoint: toes_l (0.0441 -0.006 -0.0242)
    Schutte1993Muscle flex_hal_l: max_isometric_force=322 optimal_fiber_length=0.043 tendon_slack_length=0.38
        pennation_angle=0.1745329 muscle_model=4
      MusclePoint: tibia_l (-0.0079 -0.2334 -0.0244)
      MusclePoint: tibia_l (-0.0186 -0.4079 0.0174)
      MusclePoint: foot_l (0.0374 0.0276 0.0241)
      MusclePoint: foot_l (0.1038 0.0068 0.0256)
      MusclePoint: foot_l (0.16956 -0.00501 0.02761)
      MusclePoint: toes_l (0.00839 -0.00726 0.0269)
      MusclePoint: toes_l (0.05607 -0.00839 0.01817)
    Schutte1993Muscle per_brev_l: max_isometric_force=348 optimal_fiber_length=0.05 tendon_slack_length=0.161
        pennation_angle=0.08726646 muscle_model=4
      MusclePoint: tibia_l (-0.007 -0.2646 -0.0325)
      MusclePoint: tibia_l (-0.0198 -0.4184 -0.0283)
      MusclePoint: tibia_l (-0.0144 -0.4295 -0.0289)
      MusclePoint: foot_l (0.0471 0.027 -0.0233)
      MusclePoint: foot_l (0.07569 0.01934 -0.02942)
    Schutte1993Muscle per_long_l: max_isometric_force=754 optimal_fiber_length=0.049 tendon_slack_length=0.345
        pennation_angle=0.1745329 muscle_model=4
      MusclePoint: tibia_l (0.0005 -0.1568 -0.0362)
      MusclePoint: tibia_l (-0.0207 -0.4205 -0.0286)
      MusclePoint: tibia_l (-0.0162 -0.4319 -0.0289)
      MusclePoint: foot_l (0.0438 0.023 -0.0221)
      MusclePoint: foot_l (0.0681 0.0106 -0.0284)
      MusclePoint: foot_l (0.0852 0.0069 -0.0118)
      MusclePoint: foot_l (0.1203 0.0085 0.0184)
    Schutte1993Muscle per_tert_l: max_isometric_force=90 optimal_fiber_length=0.079 tendon_slack_length=0.1
        pennation_angle=0.2268928 muscle_model=4
      MusclePoint: tibia_l (0.001 -0.2804 -0.0231)
      MusclePoint: tibia_l (0.0229 -0.4069 -0.0159)
      MusclePoint: foot_l (0.0857 0.0228 -0.0299)
  DynamicsEngine:
    SimmKinematicsEngine: gravity=(0 0 -9.80665)
      MarkerSet:
        Marker V.Sacral: pelvis (-0.17 0 0) weight=2
        Marker Sacral: pelvis (-0.17 0 0) weight=2
        Marker V.Sacrum: pelvis (-0.17 0 0) weight=2
        Marker Sacrum: pelvis (-0.17 0 0) weight=2
        Marker SACR: pelvis (-0.17 0 0) weight=2
        Marker VSAC: pelvis (-0.17 0 0) weight=2
        Marker R.ASIS: pelvis (0.014 0.0115 0.128) weight=2
        Marker RASIS: pelvis (0.014 0.0115 0.128) weight=2
        Marker RASI: pelvis (0.014 0.0115 0.128) weight=2
        Marker R.PSIS: pelvis (-0.145 0.04 0.055) weight=2
        Marker RPSIS: pelvis (-0.145 0.04 0.055) weight=2
        Marker RPSI: pelvis (-0.145 0.04 0.055) weight=2
        Marker R.Trochanter: pelvis (-0.01 -0.02 0.08) weight=2
        Marker L.ASIS: pelvis (0.014 0.0115 -0.128) weight=2
        Marker LASIS: pelvis (0.014 0.0115 -0.128) weight=2
        Marker LASI: pelvis (0.014 0.0115 -0.128) weight=2
        Marker L.PSIS: pelvis (-0.145 0.04 -0.055) weight=2
        Marker LPSIS: pelvis (-0.145 0.04 -0.055) weight=2
        Marker LPSI: pelvis (-0.145 0.04 -0.055) weight=2
        Marker L.Trochanter: pelvis (-0.01 -0.02 -0.08) weight=2
        Marker Offset: torso (-0.18 0.22 0) weight=1
        Marker Sternum: torso (0.035 0.41 0) weight=1
        Marker T10: torso (0 0 0) weight=1
        Marker CLAV: torso (0.18 0.22 0) weight=1
        Marker STRN: torso (0.18 0.22 0) weight=1
        Marker RBAK: torso (0.18 0.22 0) weight=1
        Marker R.Scapula: torso (-0.12 -0.1 -0.08) weight=1
        Marker R.Scapula.Top: torso (0 0 0) weight=1
        Marker R.Scapula.Bottom: torso (0 0 0) weight=1
        Marker R.Angulus Acromialis: torso (-0.085 0.435 0.184) weight=1
        Marker R.Trigonum Spinae: torso (-0.126 0.4 0.119) weight=1
        Marker R.Angulus Inferior: torso (-0.135 0.27 0.135) weight=1
        Marker C7 Spinous Process: torso (-0.08 0.455 0) weight=1
        Marker L.Scapula: torso (-0.12 -0.1 0.08) weight=1
        Marker L.Scapula.Top: torso (0 0 0) weight=1
        Marker L.Scapula.Bottom: torso (0 0 0) weight=1
        Marker L.Angulus Acromialis: torso (-0.085 0.435 -0.184) weight=1
        Marker L.Trigonum Spinae: torso (-0.126 0.4 -0.119) weight=1
        Marker L.Angulus Inferior: torso (-0.135 0.27 -0.135) weight=1
        Marker C7: neckhead (0 0 0) weight=1
        Marker C7 Spinous Process: neckhead (0 0 0) weight=1
        Marker Rear.Head: OT_head (0 0 0) weight=1
        Marker Head.Rear: OT_head (0 0 0) weight=1
        Marker RearHead: OT_head (0 0 0) weight=1
        Marker HeadRear: OT_head (0 0 0) weight=1
        Marker Front.Head: OT_head (0 0.19 0) weight=1
        Marker Head.Front: OT_head (0 0.19 0) weight=1
        Marker FrontHead: OT_head (0 0.19 0) weight=1
        Marker HeadFront: OT_head (0 0.19 0) weight=1
        Marker Top.Head: OT_head (-0.06 0.095 0) weight=1
        Marker Head.Top: OT_head (-0.06 0.095 0) weight=1
        Marker TopHead: OT_head (-0.06 0.095 0) weight=1
        Marker HeadTop: OT_head (-0.06 0.095 0) weight=1
        Marker R.Ear: OT_head (0 0 0) weight=1
        Marker L.Ear: OT_head (0 0 0) weight=1
        Marker RBHD: OT_head (0 0 0) weight=1
        Marker RFHD: OT_head (0 0 0) weight=1
        Marker LBHD: OT_head (0 0 0) weight=1
        Marker LFHD: OT_head (0 0 0) weight=1
        Marker HEDO: OT_head (0 0 0) weight=1
        Marker HEDP: OT_head (0 0 0) weight=1
        Marker HEDA: OT_head (0 0 0) weight=1
        Marker HEDL: OT_head (0 0 0) weight=1
        Marker R.Shoulder: clavicle_marker_r (0 0 0.165) weight=1
        Marker RSHO: clavicle_marker_r (0 0 0.165) weight=1
        Marker R.Bicep: humerus_r (0.04 -0.15 0) weight=2
        Marker R.Tricep: humerus_r (-0.04 -0.15 0) weight=2
        Marker R.Biceps.Lateral: humerus_r (0.03 -0.15 0.02) weight=2
        Marker R.Elbow: elbow_marker_r (-0.01 -0.281 0.04) weight=2
        Marker R.Elbow.Lateral: elbow_marker_r (-0.01 -0.281 0.04) weight=2
        Marker R.Elbow.Lat: elbow_marker_r (-0.01 -0.281 0.04) weight=2
        Marker RELB: elbow_marker_r (-0.01 -0.281 0.04) weight=2
        Marker R.Elbow.Medial: elbow_marker_r (0 -0.281 -0.04) weight=2
        Marker R.Elbow.Med: elbow_marker_r (0 -0.281 -0.04) weight=2
        Marker R.Forearm: ulna_r (0 -0.15 0) weight=2
        Marker R.Wrist: wrist_marker_r (-0.025 -0.245 0.006) weight=2
        Marker R.Wrist.Lateral: wrist_marker_r (-0.025 -0.245 0.006) weight=2
        Marker R.Wrist.Lat: wrist_marker_r (-0.025 -0.245 0.006) weight=2
        Marker R.Wrist.Medial: wrist_marker_r (0.035 -0.245 0) weight=2
        Marker R.Wrist.Med: wrist_marker_r (0.035 -0.245 0) weight=2
        Marker R.Ulna: wrist_marker_r (0 -0.245 -0.03) weight=2
        Marker R.Radius: wrist_marker_r (0 -0.245 0.04) weight=2
        Marker RWRI: wrist_marker_r (-0.025 -0.245 0.006) weight=2
        Marker RWRA: wrist_marker_r (-0.025 -0.245 0.006) weight=2
        Marker RWRB: wrist_marker_r (0.035 -0.245 0) weight=2
        Marker R.Hand: hand_r (-0.03 -0.05 0) weight=1
        Marker L.Shoulder: clavicle_marker_l (0 0 -0.165) weight=1
        Marker LSHO: clavicle_marker_l (0 0 -0.165) weight=1
        Marker L.Bicep: humerus_l (0.04 -0.15 0) weight=2
        Marker L.Tricep: humerus_l (-0.04 -0.15 0) weight=2
        Marker L.Biceps.Lateral: humerus_l (0.03 -0.15 -0.02) weight=2
        Marker L.Elbow: elbow_marker_l (0.01 -0.281 -0.04) weight=2
        Marker L.Elbow.Lateral: elbow_marker_l (0.01 -0.281 -0.04) weight=2
        Marker L.Elbow.Lat: elbow_marker_l (0.01 -0.281 -0.04) weight=2
        Marker LELB: elbow_marker_l (0.01 -0.281 -0.04) weight=2
        Marker L.Elbow.Medial: elbow_marker_l (-0.02 -0.281 0.04) weight=2
        Marker L.Elbow.Med: elbow_marker_l (-0.02 -0.281 0.04) weight=2
        Marker L.Forearm: ulna_l (0 -0.15 0) weight=2
        Marker L.Wrist: wrist_marker_l (-0.025 -0.245 -0.006) weight=2
        Marker L.Wrist.Lateral: wrist_marker_l (-0.025 -0.245 -0.006) weight=2
        Marker L.Wrist.Lat: wrist_marker_l (-0.025 -0.245 -0.006) weight=2
        Marker L.Wrist.Medial: wrist_marker_l (0.035 -0.245 0) weight=2
        Marker L.Wrist.Med: wrist_marker_l (0.035 -0.245 0) weight=2
        Marker L.Ulna: wrist_marker_l (0 -0.245 0.03) weight=2
        Marker L.Radius: wrist_marker_l (0 -0.245 -0.04) weight=2
        Marker LWRI: wrist_marker_l (-0.025 -0.245 -0.006) weight=2
        Marker LWRA: wrist_marker_l (-0.025 -0.245 -0.006) weight=2
        Marker LWRB: wrist_marker_l (0.025 -0.245 0) weight=2
        Marker L.Hand: hand_l (-0.03 -0.05 0) weight=1
        Marker R.Knee: femur_r (0 -0.404 0.05) weight=1
        Marker R.Knee.Lateral: femur_r (0 -0.404 0.05) weight=1
        Marker R.Knee.Lat: femur_r (0 -0.404 0.05) weight=1
        Marker RKNE: femur_r (0 -0.404 0.05) weight=1
        Marker R.Knee.Medial: femur_r (0 -0.404 -0.05) weight=1
        Marker R.Knee.Med: femur_r (0 -0.404 -0.05) weight=1
        Marker R.Thigh: femur_r (0.0179 -0.224 0.1147) weight=1
        Marker R.Thigh.Upper: femur_r (0.0179 -0.264 0.0647) weight=1
        Marker R.Thigh.Front: femur_r (0.08 -0.324 0.0047) weight=1
        Marker R.Thigh.Rear: femur_r (-0.0479 -0.324 0.0047) weight=1
        Marker RTHI: femur_r (0.0179 -0.264 0.0647) weight=1
        Marker R.Ankle: tibia_r (-0.005 -0.41 0.053) weight=2
        Marker R.Ankle.Lateral: tibia_r (-0.005 -0.41 0.053) weight=2
        Marker R.Ankle.Lat: tibia_r (-0.005 -0.41 0.053) weight=2
        Marker RANK: tibia_r (-0.005 -0.41 0.053) weight=2
        Marker R.Ankle.Medial: tibia_r (0.006 -0.3888 -0.038) weight=2
        Marker R.Ankle.Med: tibia_r (0.006 -0.3888 -0.038) weight=2
        Marker R.Shank: tibia_r (0.0104 -0.2322 0.0748) weight=1
        Marker R.Shank.Upper: tibia_r (0.0125 -0.3196 0.06) weight=1
        Marker R.Shank.Front: tibia_r (0.0425 -0.3596 0) weight=1
        Marker R.Shank.Rear: tibia_r (-0.0325 -0.3596 0) weight=1
        Marker RTIB: tibia_r (0.0125 -0.3196 0.06) weight=1
        Marker R.Toe: foot_marker_r (0.19 0 0) weight=2
        Marker RTOE: foot_marker_r (0.19 0 0) weight=2
        Marker R.MedFoot: foot_marker_r (0.13 0 -0.03) weight=2
        Marker R.LatFoot: foot_marker_r (0.13 0 0.05) weight=2
        Marker R.Heel: foot_marker_r (0 0 0) weight=2
        Marker RHEE: foot_marker_r (0 0 0) weight=2
        Marker L.Knee: femur_l (0 -0.404 -0.05) weight=1
        Marker L.Knee.Lateral: femur_l (0 -0.404 -0.05) weight=1
        Marker L.Knee.Lat: femur_l (0 -0.404 -0.05) weight=1
        Marker LKNE: femur_l (0 -0.404 -0.05) weight=1
        Marker L.Knee.Medial: femur_l (0 -0.404 0.05) weight=1
        Marker L.Knee.Med: femur_l (0 -0.404 0.05) weight=1
        Marker L.Thigh: femur_l (0.0179 -0.224 -0.1147) weight=1
        Marker L.Thigh.Upper: femur_l (0.0179 -0.264 -0.0647) weight=1
        Marker L.Thigh.Front: femur_l (0.08 -0.324 -0.0047) weight=1
        Marker L.Thigh.Rear: femur_l (-0.0479 -0.324 -0.0047) weight=1
        Marker LTHI: femur_l (0.0179 -0.264 -0.0647) weight=1
        Marker L.Ankle: tibia_l (-0.005 -0.41 -0.053) weight=2
        Marker L.Ankle.Lateral: tibia_l (-0.005 -0.41 -0.053) weight=2
        Marker L.Ankle.Lat: tibia_l (-0.005 -0.41 -0.053) weight=2
        Marker LANK: tibia_l (-0.005 -0.41 -0.053) weight=2
        Marker L.Ankle.Medial: tibia_l (0.006 -0.3888 0.038) weight=2
        Marker L.Ankle.Med: tibia_l (0.006 -0.3888 0.038) weight=2
        Marker L.Shank: tibia_l (0.0104 -0.2322 -0.0748) weight=1
        Marker L.Shank.Upper: tibia_l (0.0125 -0.3196 -0.06) weight=1
        Marker L.Shank.Front: tibia_l (0.0425 -0.3596 0) weight=1
        Marker L.Shank.Rear: tibia_l (-0.0325 -0.3596 0) weight=1
        Marker LTIB: tibia_l (0.0125 -0.3196 -0.06) weight=1
        Marker L.Toe: foot_marker_l (0.19 0 0) weight=2
        Marker LTOE: foot_marker_l (0.19 0 0) weight=2
        Marker L.MedFoot: foot_marker_l (0.13 0 0.03) weight=2
        Marker L.LatFoot: foot_marker_l (0.13 0 -0.05) weight=2
        Marker L.Heel: foot_marker_l (0 0 0) weight=2
        Marker LHEE: foot_marker_l (0 0 0) weight=2
      BodySet:
        SimmBody ground: mass=0 mass_center=(0 0 0) inertia=(0 0 0 0 0 0 0 0 0)
          WrapEllipsoid femur_ell: dimensions=(0.03 0.08 0.03) translation=(-0.0173 -0.0875 0.7895) quadrant=x
          WrapCylinder femur_cyl: radius=0.03 length=0.12 xyz_body_rotation=(-1.643053 -0.02426008 -0.02042035)
              translation=(0.0051 -0.0803 0.6164) quadrant=x
          WrapSphere femur_sph: radius=0.04 xyz_body_rotation=(-0.01902409 -0.09599311 -0.02722714)
              translation=(0.0427 -0.0858 0.708) quadrant=-x
        SimmBody pelvis: mass=8.3775 mass_center=(-0.0893 -0.025796 0) inertia=(0.053993 0 0 0 0.061279 0 0 0 0.067263)
            meshes=(pelvis_rv.vtp pelvis_lv.vtp sacrumv.vtp)
        SimmBody torso: mass=24.2175 mass_center=(0.0145 0.256438 0) inertia=(0.440821 0 0 0 0.276872 0 0 0 0.596511)
            meshes=(lumbar1sm.vtp lumbar2sm.vtp lumbar3sm.vtp lumbar4sm.vtp lumbar5.vtp ribcage_s.vtp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)
        SimmBody neckhead: mass=5.205 mass_center=(0.0288 0.161501 0) inertia=(0.030471 0 0 0 0.02092 0 0 0 0.028195)
            meshes=(cerv1sm.vtp cerv2sm.vtp cerv3sm.vtp cerv4sm.vtp cerv5sm.vtp cerv6sm.vtp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)
        SimmBody OT_head: mass=0 mass_center=(0 0 0) inertia=(0 0 0 0 0 0 0 0 0)
        SimmBody clavicle_marker_r: mass=0 mass_center=(0 0 0) inertia=(0 0 0 0 0 0 0 0 0)
        SimmBody humerus_r: mass=2.0325 mass_center=(0 -0.164502 0) inertia=(0.011946 0 0 0 0.004121 0 0 0 0.013409)
            meshes=humerus_rv.vtp
        SimmBody elbow_marker_r: mass=0 mass_center=(0 0 0) inertia=(0 0 0 0 0 0 0 0 0)
        SimmBody ulna_r: mass=0.6075 mass_center=(0 -0.120525 0) inertia=(0.002962 0 0 0 0.000618 0 0 0 0.003213)
            meshes=ulna_rv.vtp
        SimmBody radius_r: mass=0.6075 mass_center=(0 -0.120525 0) inertia=(0.002962 0 0 0 0.000618 0 0 0 0.003213)
            meshes=radius_rv.vtp
        SimmBody wrist_marker_r: mass=0 mass_center=(0 0 0) inertia=(0 0 0 0 0 0 0 0 0)
        SimmBody hand_r: mass=0.4575 mass_center=(0 -0.068095 0) inertia=(0.000892 0 0 0 0.000547 0 0 0 0.00134)
            meshes=(pisiform_rvs.vtp lunate_rvs.vtp scaphoid_rvs.vtp triquetrum_rvs.vtp hamate_rvs.vtp capitate_rvs.vtp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)
        SimmBody clavicle_marker_l: mass=0 mass_center=(0 0 0) inertia=(0 0 0 0 0 0 0 0 0)
        SimmBody humerus_l: mass=2.0325 mass_center=(0 -0.164502 0) inertia=(0.011946 0 0 0 0.004121 0 0 0 0.013409)
            meshes=humerus_lv.vtp
        SimmBody elbow_marker_l: mass=0 mass_center=(0 0 0) inertia=(0 0 0 0 0 0 0 0 0)
        SimmBody ulna_l: mass=0.6075 mass_center=(0 -0.120525 0) inertia=(0.002962 0 0 0 0.000618 0 0 0 0.003213)
            meshes=ulna_lv.vtp
        SimmBody radius_l: mass=0.6075 mass_center=(0 -0.120525 0) inertia=(0.002962 0 0 0 0.000618 0 0 0 0.003213)
            meshes=radius_lv.vtp
        SimmBody wrist_marker_l: mass=0 mass_center=(0 0 0) inertia=(0 0 0 0 0 0 0 0 0)
        SimmBody hand_l: mass=0.4575 mass_center=(0 -0.068095 0) inertia=(0.000892 0 0 0 0.000547 0 0 0 0.00134)
            meshes=(pisiform_lvs.vtp lunate_lvs.vtp scaphoid_lvs.vtp triquetrum_lvs.vtp hamate_lvs.vtp capitate_lvs.vtp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)
        SimmBody femur_r: mass=10.5225 mass_center=(0 -0.162162 0) inertia=(0.178608 0 0 0 0.036634 0 0 0 0.178608)
            meshes=femur_r.vtp
        SimmBody tibia_r: mass=3.2475 mass_center=(0 -0.171713 0) inertia=(0.029999 0 0 0 0.005157 0 0 0 0.031231)
            meshes=(tibia_r.vtp fibula_r.vtp)
        SimmBody patella_r: mass=0.0975 mass_center=(0.0018 0.0264 0) inertia=(0.000003 0 0 0 0.000015 0 0 0 0.000015)
            meshes=patella_r.vtp
        SimmBody talus_r: mass=0.045 mass_center=(0.0055 0.0023 0) inertia=(0.000003 0 0 0 0.000001 0 0 0 0.000003)
            meshes=talus_rv.vtp
        SimmBody foot_r: mass=0.885 mass_center=(0.101865 0.0156 0) inertia=(0.000909 0 0 0 0.002314 0 0 0 0.002683)
            meshes=(calcaneous_rv.vtp navicular_rv.vtp cuboid_rv.vtp first_cuneiform_rv.vtp second_cuneiform_rv.vtp third_cuneiform_rv.vtp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)
        SimmBody foot_marker_r: mass=0 mass_center=(0 0 0) inertia=(0 0 0 0 0 0 0 0 0)
        SimmBody toes_r: mass=0.0975 mass_center=(0.0307 -0.0026 0.0105) inertia=(0.0001 0 0 0 0.000255 0 0 0 0.000294)
            meshes=(prox_phalanx1_rvs.vtp prox_phalanx2_rvs.vtp prox_phalanx3_rvs.vtp prox_phalanx4_rvs.vtp prox_phalanx5_rvs.vtp mid_phalanx2_rvs.vtp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)
        SimmBody femur_l: mass=10.5225 mass_center=(0 -0.162162 0) inertia=(0.178608 0 0 0 0.036634 0 0 0 0.178608)
            meshes=femur_l.vtp
        SimmBody tibia_l: mass=3.2475 mass_center=(0 -0.171713 0) inertia=(0.029999 0 0 0 0.005157 0 0 0 0.031231)
            meshes=(tibia_l.vtp fibula_l.vtp)
        SimmBody patella_l: mass=0.0975 mass_center=(0.0018 0.0264 0) inertia=(0.000003 0 0 0 0.000015 0 0 0 0.000015)
            meshes=patella_l.vtp
        SimmBody talus_l: mass=0.045 mass_center=(0.0055 0.0023 0) inertia=(0.000003 0 0 0 0.000001 0 0 0 0.000003)
            meshes=talus_lv.vtp
        SimmBody foot_l: mass=0.885 mass_center=(0.101865 0.0156 0) inertia=(0.000909 0 0 0 0.002314 0 0 0 0.002683)
            meshes=(calcaneous_lv.vtp navicular_lv.vtp cuboid_lv.vtp first_cuneiform_lv.vtp second_cuneiform_lv.vtp third_cuneiform_lv.vtp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)
        SimmBody foot_marker_l: mass=0 mass_center=(0 0 0) inertia=(0 0 0 0 0 0 0 0 0)
        SimmBody toes_l: mass=0.0975 mass_center=(0.0307 -0.0026 -0.0105)
            inertia=(0.0001 0 0 0 0.000255 0 0 0 0.000294)
            meshes=(prox_phalanx1_lvs.vtp prox_phalanx2_lvs.vtp prox_phalanx3_lvs.vtp prox_phalanx4_lvs.vtp prox_phalanx5_lvs.vtp mid_phalanx2_lvs.vtp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)
      SimmCoordinate [values shared by the 40 below unless stated]: default_value=0 tolerance=0 restraint_active=false
          clamped=true
      SimmCoordinate lower_torso_TX: range=(-10 10) stiffness=0.1 clamped=false
      SimmCoordinate lower_torso_TY: range=(-10 10) stiffness=0.1 clamped=false
      SimmCoordinate lower_torso_TZ: range=(-10 10) default_value=0.969 stiffness=0.1 clamped=false
      SimmCoordinate lower_torso_RX: range=(-4.712389 4.712389) default_value=1.570796 stiffness=0.1 clamped=false
      SimmCoordinate lower_torso_RY: range=(-4.712389 4.712389) stiffness=0.1 clamped=false
      SimmCoordinate lower_torso_RZ: range=(-4.712389 4.712389) stiffness=0.1 clamped=false
      SimmCoordinate lumbar_roll: range=(-0.7853982 0.7853982) stiffness=0.1
        min_restraint_function: natCubicSpline: x=(0 0.1745329 0.5235988) y=(0 20 70)
        max_restraint_function: natCubicSpline: x=(0 0.1745329 0.5235988) y=(0 20 70)
      SimmCoordinate lumbar_yaw: range=(-1.047198 1.047198) stiffness=0.1
        min_restraint_function: natCubicSpline: x=(0 0.1745329 0.5235988) y=(0 20 70)
        max_restraint_function: natCubicSpline: x=(0 0.1745329 0.5235988) y=(0 20 70)
      SimmCoordinate lumbar_pitch: range=(-0.7853982 0.7853982) stiffness=0.1
        min_restraint_function: natCubicSpline: x=(0 0.1745329 0.5235988) y=(0 20 70)
        max_restraint_function: natCubicSpline: x=(0 0.1745329 0.5235988) y=(0 20 70)
      SimmCoordinate neck_roll: range=(-0.6981317 0.6981317) stiffness=0.01
        min_restraint_function: natCubicSpline: x=(0 0.1745329 0.5235988) y=(0 20 70)
        max_restraint_function: natCubicSpline: x=(0 0.1745329 0.5235988) y=(0 20 70)
      SimmCoordinate neck_yaw: range=(-1.151917 1.151917) stiffness=0.01
        min_restraint_function: natCubicSpline: x=(0 0.1745329 0.5235988) y=(0 20 70)
        max_restraint_function: natCubicSpline: x=(0 0.1745329 0.5235988) y=(0 20 70)
      SimmCoordinate neck_pitch: range=(-0.8726646 1.256637) stiffness=0.01
        min_restraint_function: natCubicSpline: x=(0 0.1745329 0.5235988) y=(0 20 70)
        max_restraint_function: natCubicSpline: x=(0 0.1745329 0.5235988) y=(0 20 70)
      SimmCoordinate arm_add_r: range=(-2.094395 1.570796) stiffness=0.01
        min_restraint_function: natCubicSpline: x=(0 0.1745329 0.5235988) y=(0 20 70)
        max_restraint_function: natCubicSpline: x=(0 0.1745329 0.5235988) y=(0 20 70)
      SimmCoordinate arm_rot_r: range=(-0.1745329 0.1745329) stiffness=0.01
        min_restraint_function: natCubicSpline: x=(0 0.1745329 0.5235988) y=(0 20 70)
        max_restraint_function: natCubicSpline: x=(0 0.1745329 0.5235988) y=(0 20 70)
      SimmCoordinate arm_flex_r: range=(-0.7853982 1.570796) stiffness=0.01
        min_restraint_function: natCubicSpline: x=(0 0.1745329 0.5235988) y=(0 20 70)
        max_restraint_function: natCubicSpline: x=(0 0.1745329 0.5235988) y=(0 20 70)
      SimmCoordinate elbow_flex_r: range=(0 2.268928) stiffness=0.01
        min_restraint_function: natCubicSpline: x=(0 0.1745329 0.5235988) y=(0 20 70)
        max_restraint_function: natCubicSpline: x=(0 0.1745329 0.5235988) y=(0 20 70)
      SimmCoordinate pro_sup_r: range=(0.8726646 1.22173) default_value=1.047198 stiffness=0.01
        min_restraint_function: natCubicSpline: x=(0 0.1745329 0.5235988) y=(0 20 70)
        max_restraint_function: natCubicSpline: x=(0 0.1745329 0.5235988) y=(0 20 70)
      SimmCoordinate wrist_dev_r: range=(-0.4363323 0.6108652) stiffness=0.01
        min_restraint_function: natCubicSpline: x=(0 0.1745329 0.5235988) y=(0 20 70)
        max_restraint_function: natCubicSpline: x=(0 0.1745329 0.5235988) y=(0 20 70)
      SimmCoordinate wrist_flex_r: range=(-1.22173 1.22173) stiffness=0.01
        min_restraint_function: natCubicSpline: x=(0 0.1745329 0.5235988) y=(0 20 70)
        max_restraint_function: natCubicSpline: x=(0 0.1745329 0.5235988) y=(0 20 70)
      SimmCoordinate arm_add_l: range=(-2.094395 1.570796) stiffness=0.01
        min_restraint_function: natCubicSpline: x=(0 0.1745329 0.5235988) y=(0 20 70)
        max_restraint_function: natCubicSpline: x=(0 0.1745329 0.5235988) y=(0 20 70)
      SimmCoordinate arm_rot_l: range=(-0.1745329 0.1745329) stiffness=0.01
        min_restraint_function: natCubicSpline: x=(0 0.1745329 0.5235988) y=(0 20 70)
        max_restraint_function: natCubicSpline: x=(0 0.1745329 0.5235988) y=(0 20 70)
      SimmCoordinate arm_flex_l: range=(-0.7853982 1.570796) stiffness=0.01
        min_restraint_function: natCubicSpline: x=(0 0.1745329 0.5235988) y=(0 20 70)
        max_restraint_function: natCubicSpline: x=(0 0.1745329 0.5235988) y=(0 20 70)
      SimmCoordinate elbow_flex_l: range=(0 2.268928) stiffness=0.01
        min_restraint_function: natCubicSpline: x=(0 0.1745329 0.5235988) y=(0 20 70)
        max_restraint_function: natCubicSpline: x=(0 0.1745329 0.5235988) y=(0 20 70)
      SimmCoordinate pro_sup_l: range=(0.8726646 1.22173) default_value=1.047198 stiffness=0.01
        min_restraint_function: natCubicSpline: x=(0 0.1745329 0.5235988) y=(0 20 70)
        max_restraint_function: natCubicSpline: x=(0 0.1745329 0.5235988) y=(0 20 70)
      SimmCoordinate wrist_dev_l: range=(-0.4363323 0.6108652) stiffness=0.01
        min_restraint_function: natCubicSpline: x=(0 0.1745329 0.5235988) y=(0 20 70)
        max_restraint_function: natCubicSpline: x=(0 0.1745329 0.5235988) y=(0 20 70)
      SimmCoordinate wrist_flex_l: range=(-1.22173 1.22173) stiffness=0.01
        min_restraint_function: natCubicSpline: x=(0 0.1745329 0.5235988) y=(0 20 70)
        max_restraint_function: natCubicSpline: x=(0 0.1745329 0.5235988) y=(0 20 70)
      SimmCoordinate hip_add_r: range=(-0.8726646 0.3490659) stiffness=0.1
        min_restraint_function: natCubicSpline: x=(0 0.1745329 0.5235988) y=(0 20 70)
        max_restraint_function: natCubicSpline: x=(0 0.1745329 0.5235988) y=(0 20 70)
      SimmCoordinate hip_rot_r: range=(-0.6981317 0.6981317) stiffness=0.1
        min_restraint_function: natCubicSpline: x=(0 0.1745329 0.5235988) y=(0 20 70)
        max_restraint_function: natCubicSpline: x=(0 0.1745329 0.5235988) y=(0 20 70)
      SimmCoordinate hip_flex_r: range=(-0.1919862 1.658063) stiffness=0.1
        min_restraint_function: natCubicSpline: x=(0 0.1745329 0.5235988) y=(0 20 70)
        max_restraint_function: natCubicSpline: x=(0 0.1745329 0.5235988) y=(0 20 70)
      SimmCoordinate knee_flex_r: range=(-0.1745329 2.094395) stiffness=0.2
        min_restraint_function: natCubicSpline: x=(0 0.1745329 0.5235988) y=(0 20 70)
        max_restraint_function: natCubicSpline: x=(0 0.1745329 0.5235988) y=(0 20 70)
      SimmCoordinate ankle_flex_r: range=(-0.5235988 0.5235988) stiffness=2
        min_restraint_function: natCubicSpline: x=(0 0.1745329 0.5235988) y=(0 20 70)
        max_restraint_function: natCubicSpline: x=(0 0.1745329 0.5235988) y=(0 20 70)
      SimmCoordinate subt_angle_r: range=(-0.3490659 0.3490659) stiffness=2
        min_restraint_function: natCubicSpline: x=(0 0.1745329 0.5235988) y=(0 20 70)
        max_restraint_function: natCubicSpline: x=(0 0.1745329 0.5235988) y=(0 20 70)
      SimmCoordinate toe_angle_r: range=(-0.5235988 0.5235988) stiffness=0.1
        min_restraint_function: natCubicSpline: x=(0 0.1745329 0.5235988) y=(0 20 70)
        max_restraint_function: natCubicSpline: x=(0 0.1745329 0.5235988) y=(0 20 70)
      SimmCoordinate hip_add_l: range=(-0.8726646 0.3490659) stiffness=0.1
        min_restraint_function: natCubicSpline: x=(0 0.1745329 0.5235988) y=(0 20 70)
        max_restraint_function: natCubicSpline: x=(0 0.1745329 0.5235988) y=(0 20 70)
      SimmCoordinate hip_rot_l: range=(-0.6981317 0.6981317) stiffness=0.1
        min_restraint_function: natCubicSpline: x=(0 0.1745329 0.5235988) y=(0 20 70)
        max_restraint_function: natCubicSpline: x=(0 0.1745329 0.5235988) y=(0 20 70)
      SimmCoordinate hip_flex_l: range=(-0.1919862 1.658063) stiffness=0.1
        min_restraint_function: natCubicSpline: x=(0 0.1745329 0.5235988) y=(0 20 70)
        max_restraint_function: natCubicSpline: x=(0 0.1745329 0.5235988) y=(0 20 70)
      SimmCoordinate knee_flex_l: range=(-0.1745329 2.094395) stiffness=0.2
        min_restraint_function: natCubicSpline: x=(0 0.1745329 0.5235988) y=(0 20 70)
        max_restraint_function: natCubicSpline: x=(0 0.1745329 0.5235988) y=(0 20 70)
      SimmCoordinate ankle_flex_l: range=(-0.5235988 0.5235988) stiffness=2
        min_restraint_function: natCubicSpline: x=(0 0.1745329 0.5235988) y=(0 20 70)
        max_restraint_function: natCubicSpline: x=(0 0.1745329 0.5235988) y=(0 20 70)
      SimmCoordinate subt_angle_l: range=(-0.3490659 0.3490659) stiffness=2
        min_restraint_function: natCubicSpline: x=(0 0.1745329 0.5235988) y=(0 20 70)
        max_restraint_function: natCubicSpline: x=(0 0.1745329 0.5235988) y=(0 20 70)
      SimmCoordinate toe_angle_l: range=(-0.5235988 0.5235988) stiffness=0.1
        min_restraint_function: natCubicSpline: x=(0 0.1745329 0.5235988) y=(0 20 70)
        max_restraint_function: natCubicSpline: x=(0 0.1745329 0.5235988) y=(0 20 70)
      JointSet:
        SimmJoint gnd_pelvis: bodies=(ground pelvis)
          DofSet:
            SimmTranslationDof tx: coordinate=lower_torso_TX
              Value:
                natCubicSpline: x=(-360 360) y=(-360 360)
            SimmTranslationDof ty: coordinate=lower_torso_TY
              Value:
                natCubicSpline: x=(-360 360) y=(-360 360)
            SimmTranslationDof tz: coordinate=lower_torso_TZ
              Value:
                natCubicSpline: x=(-360 360) y=(-360 360)
            SimmRotationDof r1: axis=(1 0 0) coordinate=lower_torso_RX
              Value:
                natCubicSpline: x=(-6.283185 6.283185) y=(-6.283185 6.283185)
            SimmRotationDof r2: axis=(0 1 0) coordinate=lower_torso_RY
              Value:
                natCubicSpline: x=(-6.283185 6.283185) y=(-6.283185 6.283185)
            SimmRotationDof r3: axis=(0 0 1) coordinate=lower_torso_RZ
              Value:
                natCubicSpline: x=(-6.283185 6.283185) y=(-6.283185 6.283185)
        SimmJoint pelvis_torso: bodies=(pelvis torso)
          DofSet:
            SimmTranslationDof tx:
              Value: Constant(value=-0.0872)
            SimmTranslationDof ty:
              Value: Constant(value=0.0331)
            SimmTranslationDof tz:
              Value: Constant(value=0)
            SimmRotationDof r1: axis=(0 0 1) coordinate=lumbar_pitch
              Value:
                natCubicSpline: x=(-6.283185 6.283185) y=(-6.283185 6.283185)
            SimmRotationDof r2: axis=(1 0 0) coordinate=lumbar_roll
              Value:
                natCubicSpline: x=(-6.283185 6.283185) y=(-6.283185 6.283185)
            SimmRotationDof r3: axis=(0 1 0) coordinate=lumbar_yaw
              Value:
                natCubicSpline: x=(-6.283185 6.283185) y=(-6.283185 6.283185)
        SimmJoint torso_neckhead: bodies=(torso neckhead)
          DofSet:
            SimmTranslationDof tx:
              Value: Constant(value=-0.0253)
            SimmTranslationDof ty:
              Value: Constant(value=0.44895)
            SimmTranslationDof tz:
              Value: Constant(value=0)
            SimmRotationDof r1: axis=(0 0 1) coordinate=neck_pitch
              Value:
                natCubicSpline: x=(-6.283185 6.283185) y=(-6.283185 6.283185)
            SimmRotationDof r2: axis=(1 0 0) coordinate=neck_roll
              Value:
                natCubicSpline: x=(-6.283185 6.283185) y=(-6.283185 6.283185)
            SimmRotationDof r3: axis=(0 1 0) coordinate=neck_yaw
              Value:
                natCubicSpline: x=(-6.283185 6.283185) y=(-6.283185 6.283185)
        SimmJoint neckhead_OT_head: bodies=(neckhead OT_head)
          DofSet:
            SimmTranslationDof tx:
              Value: Constant(value=-0.07166)
            SimmTranslationDof ty:
              Value: Constant(value=0.2359)
            SimmTranslationDof tz:
              Value: Constant(value=0)
            SimmRotationDof r1: axis=(0 0 1)
              Value: Constant(value=-1.570796)
            SimmRotationDof r2: axis=(1 0 0)
              Value: Constant(value=0)
            SimmRotationDof r3: axis=(0 1 0)
              Value: Constant(value=0)
        SimmJoint clavicularmarker_r: bodies=(torso clavicle_marker_r)
          DofSet:
            SimmRotationDof r1: axis=(1 0 0)
              Value: Constant(value=0)
            SimmRotationDof r2: axis=(0 0 1)
              Value: Constant(value=0)
            SimmRotationDof r3: axis=(0 1 0)
              Value: Constant(value=0)
            SimmTranslationDof tx:
              Value: Constant(value=-0.0488)
            SimmTranslationDof ty:
              Value: Constant(value=0.47065)
            SimmTranslationDof tz:
              Value: Constant(value=0)
        SimmJoint acromial_r: bodies=(torso humerus_r)
          DofSet:
            SimmTranslationDof tx:
              Value: Constant(value=-0.0281)
            SimmTranslationDof ty:
              Value: Constant(value=0.41645)
            SimmTranslationDof tz:
              Value: Constant(value=0.199)
            SimmRotationDof r1: axis=(1 0 0) coordinate=arm_add_r
              Value:
                natCubicSpline: x=(-6.283185 6.283185) y=(-6.283185 6.283185)
            SimmRotationDof r2: axis=(0 0 1) coordinate=arm_flex_r
              Value:
                natCubicSpline: x=(-6.283185 6.283185) y=(-6.283185 6.283185)
            SimmRotationDof r3: axis=(0 1 0) coordinate=arm_rot_r
              Value:
                natCubicSpline: x=(-6.283185 6.283185) y=(-6.283185 6.283185)
        SimmJoint elbowmarker_r: bodies=(humerus_r elbow_marker_r)
          DofSet:
            SimmTranslationDof tx:
              Value: Constant(value=0)
            SimmTranslationDof ty:
              Value: Constant(value=0)
            SimmTranslationDof tz:
              Value: Constant(value=0)
            SimmRotationDof r1: axis=(0.226047 0.022269 0.9738618)
              Value: Constant(value=0.05235988)
            SimmRotationDof r2: axis=(0 1 0)
              Value: Constant(value=0.2617994)
            SimmRotationDof r3: axis=(1 0 0)
              Value: Constant(value=0)
        SimmJoint elbow_r: bodies=(humerus_r ulna_r)
          DofSet:
            SimmTranslationDof tx:
              Value: Constant(value=0.013144)
            SimmTranslationDof ty:
              Value: Constant(value=-0.286273)
            SimmTranslationDof tz:
              Value: Constant(value=-0.009595)
            SimmRotationDof r1: axis=(0.226047 0.022269 0.9738618) coordinate=elbow_flex_r
              Value:
                natCubicSpline: x=(-6.283185 6.283185) y=(-6.283185 6.283185)
            SimmRotationDof r2: axis=(0 1 0)
              Value: Constant(value=0)
            SimmRotationDof r3: axis=(1 0 0)
              Value: Constant(value=0)
        SimmJoint radioulnar_r: bodies=(ulna_r radius_r)
          DofSet:
            SimmTranslationDof tx:
              Value: Constant(value=-0.006727)
            SimmTranslationDof ty:
              Value: Constant(value=-0.013007)
            SimmTranslationDof tz:
              Value: Constant(value=0.026083)
            SimmRotationDof r1: axis=(1 0 0)
              Value: Constant(value=0)
            SimmRotationDof r2: axis=(0.05639803 0.9984065 0.001952001) coordinate=pro_sup_r
              Value:
                natCubicSpline: x=(-6.283185 6.283185) y=(-6.283185 6.283185)
            SimmRotationDof r3: axis=(0 0 1)
              Value: Constant(value=0)
        SimmJoint wristmarker_r: bodies=(radius_r wrist_marker_r)
          DofSet:
            SimmTranslationDof tx:
              Value: Constant(value=0.006727)
            SimmTranslationDof ty:
              Value: Constant(value=0.013007)
            SimmTranslationDof tz:
              Value: Constant(value=-0.026083)
            SimmRotationDof r1: axis=(1 0 0)
              Value: Constant(value=-0.1396263)
            SimmRotationDof r2: axis=(0 1 0)
              Value: Constant(value=0.1745329)
            SimmRotationDof r3: axis=(0 0 1)
              Value: Constant(value=-0.06981317)
        SimmJoint radius_hand_r: bodies=(radius_r hand_r)
          DofSet:
            SimmTranslationDof tx:
              Value: Constant(value=-0.008797)
            SimmTranslationDof ty:
              Value: Constant(value=-0.235841)
            SimmTranslationDof tz:
              Value: Constant(value=0.01361)
            SimmRotationDof r1: axis=(0 0 1) coordinate=wrist_flex_r
              Value:
                natCubicSpline: x=(-6.283185 6.283185) y=(-6.283185 6.283185)
            SimmRotationDof r2: axis=(0 1 0)
              Value: Constant(value=0)
            SimmRotationDof r3: axis=(1 0 0) coordinate=wrist_dev_r
              Value:
                natCubicSpline: x=(-6.283185 6.283185) y=(-6.283185 6.283185)
        SimmJoint clavicularmarker_l: bodies=(torso clavicle_marker_l)
          DofSet:
            SimmRotationDof r1: axis=(1 0 0)
              Value: Constant(value=0)
            SimmRotationDof r2: axis=(0 0 1)
              Value: Constant(value=0)
            SimmRotationDof r3: axis=(0 1 0)
              Value: Constant(value=0)
            SimmTranslationDof tx:
              Value: Constant(value=-0.0488)
            SimmTranslationDof ty:
              Value: Constant(value=0.47065)
            SimmTranslationDof tz:
              Value: Constant(value=0)
        SimmJoint acromial_l: bodies=(torso humerus_l)
          DofSet:
            SimmTranslationDof tx:
              Value: Constant(value=-0.0281)
            SimmTranslationDof ty:
              Value: Constant(value=0.41645)
            SimmTranslationDof tz:
              Value: Constant(value=-0.199)
            SimmRotationDof r1: axis=(-1 0 0) coordinate=arm_add_l
              Value:
                natCubicSpline: x=(-6.283185 6.283185) y=(-6.283185 6.283185)
            SimmRotationDof r2: axis=(0 0 1) coordinate=arm_flex_l
              Value:
                natCubicSpline: x=(-6.283185 6.283185) y=(-6.283185 6.283185)
            SimmRotationDof r3: axis=(0 -1 0) coordinate=arm_rot_l
              Value:
                natCubicSpline: x=(-6.283185 6.283185) y=(-6.283185 6.283185)
        SimmJoint elbowmarker_l: bodies=(humerus_l elbow_marker_l)
          DofSet:
            SimmTranslationDof tx:
              Value: Constant(value=0)
            SimmTranslationDof ty:
              Value: Constant(value=0)
            SimmTranslationDof tz:
              Value: Constant(value=0)
            SimmRotationDof r1: axis=(-0.226047 -0.022269 0.9738618)
              Value: Constant(value=0.05235988)
            SimmRotationDof r2: axis=(0 -1 0)
              Value: Constant(value=-0.2617994)
            SimmRotationDof r3: axis=(-1 0 0)
              Value: Constant(value=0)
        SimmJoint elbow_l: bodies=(humerus_l ulna_l)
          DofSet:
            SimmTranslationDof tx:
              Value: Constant(value=0.013144)
            SimmTranslationDof ty:
              Value: Constant(value=-0.286273)
            SimmTranslationDof tz:
              Value: Constant(value=0.009595)
            SimmRotationDof r1: axis=(-0.226047 -0.022269 0.9738618) coordinate=elbow_flex_l
              Value:
                natCubicSpline: x=(-6.283185 6.283185) y=(-6.283185 6.283185)
            SimmRotationDof r2: axis=(0 -1 0)
              Value: Constant(value=0)
            SimmRotationDof r3: axis=(-1 0 0)
              Value: Constant(value=0)
        SimmJoint radioulnar_l: bodies=(ulna_l radius_l)
          DofSet:
            SimmTranslationDof tx:
              Value: Constant(value=-0.006727)
            SimmTranslationDof ty:
              Value: Constant(value=-0.013007)
            SimmTranslationDof tz:
              Value: Constant(value=-0.026083)
            SimmRotationDof r1: axis=(-1 0 0)
              Value: Constant(value=0)
            SimmRotationDof r2: axis=(-0.05639803 -0.9984065 0.001952001) coordinate=pro_sup_l
              Value:
                natCubicSpline: x=(-6.283185 6.283185) y=(-6.283185 6.283185)
            SimmRotationDof r3: axis=(0 0 1)
              Value: Constant(value=0)
        SimmJoint wristmarker_l: bodies=(radius_l wrist_marker_l)
          DofSet:
            SimmTranslationDof tx:
              Value: Constant(value=0.006727)
            SimmTranslationDof ty:
              Value: Constant(value=0.013007)
            SimmTranslationDof tz:
              Value: Constant(value=0.026083)
            SimmRotationDof r1: axis=(1 0 0)
              Value: Constant(value=0.1396263)
            SimmRotationDof r2: axis=(0 1 0)
              Value: Constant(value=-0.1745329)
            SimmRotationDof r3: axis=(0 0 1)
              Value: Constant(value=-0.06981317)
        SimmJoint radius_hand_l: bodies=(radius_l hand_l)
          DofSet:
            SimmTranslationDof tx:
              Value: Constant(value=-0.008797)
            SimmTranslationDof ty:
              Value: Constant(value=-0.235841)
            SimmTranslationDof tz:
              Value: Constant(value=-0.01361)
            SimmRotationDof r1: axis=(0 0 1) coordinate=wrist_flex_l
              Value:
                natCubicSpline: x=(-6.283185 6.283185) y=(-6.283185 6.283185)
            SimmRotationDof r2: axis=(0 -1 0)
              Value: Constant(value=0)
            SimmRotationDof r3: axis=(-1 0 0) coordinate=wrist_dev_l
              Value:
                natCubicSpline: x=(-6.283185 6.283185) y=(-6.283185 6.283185)
        SimmJoint hip_r: bodies=(pelvis femur_r)
          DofSet:
            SimmTranslationDof tx:
              Value: Constant(value=-0.08)
            SimmTranslationDof ty:
              Value: Constant(value=-0.0824)
            SimmTranslationDof tz:
              Value: Constant(value=0.0785)
            SimmRotationDof r1: axis=(0 0 1) coordinate=hip_flex_r
              Value:
                natCubicSpline: x=(-6.283185 6.283185) y=(-6.283185 6.283185)
            SimmRotationDof r2: axis=(1 0 0) coordinate=hip_add_r
              Value:
                natCubicSpline: x=(-6.283185 6.283185) y=(-6.283185 6.283185)
            SimmRotationDof r3: axis=(0 1 0) coordinate=hip_rot_r
              Value:
                natCubicSpline: x=(-6.283185 6.283185) y=(-6.283185 6.283185)
        SimmJoint knee_flexion_r: bodies=(femur_r tibia_r)
          DofSet:
            SimmTranslationDof tx: coordinate=knee_flex_r
              Value:
                natCubicSpline: x=(0 0.1745329 0.3490659 0.6981317 1.047198 1.396263 1.745329 2.094395)
                    y=(-0.00525 -0.0031 -0.001 0.00212 0.0041 0.00411 0.00179 -0.0032)
            SimmTranslationDof ty: coordinate=knee_flex_r
              Value:
                natCubicSpline: x=(0 0.1745329 0.3490659 0.5235988 1.22173 2.094395)
                    y=(-0.396 -0.3966 -0.3976 -0.399 -0.4082 -0.4226)
            SimmTranslationDof tz:
              Value: Constant(value=0)
            SimmRotationDof r1: axis=(0 0 -1) coordinate=knee_flex_r
              Value:
                natCubicSpline: x=(-6.283185 6.283185) y=(-6.283185 6.283185)
            SimmRotationDof r2: axis=(1 0 0)
              Value: Constant(value=0)
            SimmRotationDof r3: axis=(0 1 0)
              Value: Constant(value=0)
        SimmJoint tib_pat_r: bodies=(tibia_r patella_r)
          DofSet:
            SimmTranslationDof tx: coordinate=knee_flex_r
              Value:
                natCubicSpline: x=(0 0.1745329 0.3490659 0.6981317 1.047198 1.396263 2.094395)
                    y=(0.0496 0.0484 0.0469 0.043 0.0381 0.0324 0.0173)
            SimmTranslationDof ty: coordinate=knee_flex_r
              Value:
                natCubicSpline: x=(0.004991642 0.1745329 0.3490659 0.6981317 1.047198 1.396263 1.570796 2.094395)
                    y=(-0.0227 -0.0223 -0.0219 -0.0211 -0.0204 -0.02 -0.0202 -0.0219)
            SimmTranslationDof tz:
              Value: Constant(value=0.0024)
            SimmRotationDof r1: axis=(0 0 1) coordinate=knee_flex_r
              Value:
                natCubicSpline: x=(-0.1745329 -0.002617994 0.355 0.9848893 1.999973 2.094395)
                    y=(-0.1612684 -0.04258603 0.1062906 0.2419026 0.3080506 0.3080506)
            SimmRotationDof r2: axis=(1 0 0)
              Value: Constant(value=0)
            SimmRotationDof r3: axis=(0 1 0)
              Value: Constant(value=0)
        SimmJoint ankle_r: bodies=(tibia_r talus_r)
          DofSet:
            SimmTranslationDof tx:
              Value: Constant(value=0)
            SimmTranslationDof ty:
              Value: Constant(value=-0.426)
            SimmTranslationDof tz:
              Value: Constant(value=0)
            SimmRotationDof r1: axis=(-0.104529 -0.1736491 0.9792444) coordinate=ankle_flex_r
              Value:
                natCubicSpline: x=(-6.283185 6.283185) y=(-6.283185 6.283185)
            SimmRotationDof r2: axis=(1 0 0)
              Value: Constant(value=0)
            SimmRotationDof r3: axis=(0 1 0)
              Value: Constant(value=0)
        SimmJoint subtalar_r: bodies=(talus_r foot_r)
          DofSet:
            SimmTranslationDof tx:
              Value: Constant(value=-0.04877)
            SimmTranslationDof ty:
              Value: Constant(value=-0.04195)
            SimmTranslationDof tz:
              Value: Constant(value=0.00792)
            SimmRotationDof r1: axis=(0.78718 0.604747 -0.120949) coordinate=subt_angle_r
              Value:
                natCubicSpline: x=(-6.283185 6.283185) y=(-6.283185 6.283185)
            SimmRotationDof r2: axis=(0 1 0)
              Value: Constant(value=0)
            SimmRotationDof r3: axis=(0 0 1)
              Value: Constant(value=0)
        SimmJoint foot_mark_r: bodies=(foot_r foot_marker_r)
          DofSet:
            SimmTranslationDof tx:
              Value: Constant(value=-0.02)
            SimmTranslationDof ty:
              Value: Constant(value=0.018)
            SimmTranslationDof tz:
              Value: Constant(value=-0.01)
            SimmRotationDof r1: axis=(1 0 0)
              Value: Constant(value=0)
            SimmRotationDof r2: axis=(0 1 0)
              Value: Constant(value=0)
            SimmRotationDof r3: axis=(0 0 1)
              Value: Constant(value=0)
        SimmJoint toes_r: bodies=(foot_r toes_r)
          DofSet:
            SimmTranslationDof tx:
              Value: Constant(value=0.1768)
            SimmTranslationDof ty:
              Value: Constant(value=-0.002)
            SimmTranslationDof tz:
              Value: Constant(value=0.00108)
            SimmRotationDof r1: axis=(0.541717 0 -0.840561) coordinate=toe_angle_r
              Value:
                natCubicSpline: x=(-6.283185 6.283185) y=(-6.283185 6.283185)
            SimmRotationDof r2: axis=(0 1 0)
              Value: Constant(value=0)
            SimmRotationDof r3: axis=(0 0 1)
              Value: Constant(value=0)
        SimmJoint hip_l: bodies=(pelvis femur_l)
          DofSet:
            SimmTranslationDof tx:
              Value: Constant(value=-0.08)
            SimmTranslationDof ty:
              Value: Constant(value=-0.0824)
            SimmTranslationDof tz:
              Value: Constant(value=-0.0785)
            SimmRotationDof r1: axis=(0 0 1) coordinate=hip_flex_l
              Value:
                natCubicSpline: x=(-6.283185 6.283185) y=(-6.283185 6.283185)
            SimmRotationDof r2: axis=(-1 0 0) coordinate=hip_add_l
              Value:
                natCubicSpline: x=(-6.283185 6.283185) y=(-6.283185 6.283185)
            SimmRotationDof r3: axis=(0 -1 0) coordinate=hip_rot_l
              Value:
                natCubicSpline: x=(-6.283185 6.283185) y=(-6.283185 6.283185)
        SimmJoint knee_flexion_l: bodies=(femur_l tibia_l)
          DofSet:
            SimmTranslationDof tx: coordinate=knee_flex_l
              Value:
                natCubicSpline: x=(0 0.1745329 0.3490659 0.6981317 1.047198 1.396263 1.745329 2.094395)
                    y=(-0.00525 -0.0031 -0.001 0.00212 0.0041 0.00411 0.00179 -0.0032)
            SimmTranslationDof ty: coordinate=knee_flex_l
              Value:
                natCubicSpline: x=(0 0.1745329 0.3490659 0.5235988 1.22173 2.094395)
                    y=(-0.396 -0.3966 -0.3976 -0.399 -0.4082 -0.4226)
            SimmTranslationDof tz:
              Value: Constant(value=0)
            SimmRotationDof r1: axis=(0 0 -1) coordinate=knee_flex_l
              Value:
                natCubicSpline: x=(-6.283185 6.283185) y=(-6.283185 6.283185)
            SimmRotationDof r2: axis=(1 0 0)
              Value: Constant(value=0)
            SimmRotationDof r3: axis=(0 1 0)
              Value: Constant(value=0)
        SimmJoint tib_pat_l: bodies=(tibia_l patella_l)
          DofSet:
            SimmTranslationDof tx: coordinate=knee_flex_l
              Value:
                natCubicSpline: x=(0 0.1745329 0.3490659 0.6981317 1.047198 1.396263 2.094395)
                    y=(0.0496 0.0484 0.0469 0.043 0.0381 0.0324 0.0173)
            SimmTranslationDof ty: coordinate=knee_flex_l
              Value:
                natCubicSpline: x=(0.004991642 0.1745329 0.3490659 0.6981317 1.047198 1.396263 1.570796 2.094395)
                    y=(-0.0227 -0.0223 -0.0219 -0.0211 -0.0204 -0.02 -0.0202 -0.0219)
            SimmTranslationDof tz:
              Value: Constant(value=-0.0024)
            SimmRotationDof r1: axis=(0 0 1) coordinate=knee_flex_l
              Value:
                natCubicSpline: x=(-0.1745329 -0.002617994 0.355 0.9848893 1.999973 2.094395)
                    y=(-0.1612684 -0.04258603 0.1062906 0.2419026 0.3080506 0.3080506)
            SimmRotationDof r2: axis=(-1 0 0)
              Value: Constant(value=0)
            SimmRotationDof r3: axis=(0 -1 0)
              Value: Constant(value=0)
        SimmJoint ankle_l: bodies=(tibia_l talus_l)
          DofSet:
            SimmTranslationDof tx:
              Value: Constant(value=0)
            SimmTranslationDof ty:
              Value: Constant(value=-0.426)
            SimmTranslationDof tz:
              Value: Constant(value=0)
            SimmRotationDof r1: axis=(0.104529 0.1736491 0.9792444) coordinate=ankle_flex_l
              Value:
                natCubicSpline: x=(-6.283185 6.283185) y=(-6.283185 6.283185)
            SimmRotationDof r2: axis=(-1 0 0)
              Value: Constant(value=0)
            SimmRotationDof r3: axis=(0 -1 0)
              Value: Constant(value=0)
        SimmJoint subtalar_l: bodies=(talus_l foot_l)
          DofSet:
            SimmTranslationDof tx:
              Value: Constant(value=-0.04877)
            SimmTranslationDof ty:
              Value: Constant(value=-0.04195)
            SimmTranslationDof tz:
              Value: Constant(value=-0.00792)
            SimmRotationDof r1: axis=(-0.78718 -0.604747 -0.120949) coordinate=subt_angle_l
              Value:
                natCubicSpline: x=(-6.283185 6.283185) y=(-6.283185 6.283185)
            SimmRotationDof r2: axis=(0 -1 0)
              Value: Constant(value=0)
            SimmRotationDof r3: axis=(0 0 1)
              Value: Constant(value=0)
        SimmJoint foot_mark_l: bodies=(foot_l foot_marker_l)
          DofSet:
            SimmTranslationDof tx:
              Value: Constant(value=-0.02)
            SimmTranslationDof ty:
              Value: Constant(value=0.018)
            SimmTranslationDof tz:
              Value: Constant(value=0.01)
            SimmRotationDof r1: axis=(1 0 0)
              Value: Constant(value=0)
            SimmRotationDof r2: axis=(0 1 0)
              Value: Constant(value=0)
            SimmRotationDof r3: axis=(0 0 1)
              Value: Constant(value=0)
        SimmJoint toes_l: bodies=(foot_l toes_l)
          DofSet:
            SimmTranslationDof tx:
              Value: Constant(value=0.1768)
            SimmTranslationDof ty:
              Value: Constant(value=-0.002)
            SimmTranslationDof tz:
              Value: Constant(value=-0.00108)
            SimmRotationDof r1: axis=(-0.541717 0 -0.840561) coordinate=toe_angle_l
              Value:
                natCubicSpline: x=(-6.283185 6.283185) y=(-6.283185 6.283185)
            SimmRotationDof r2: axis=(0 1 0)
              Value: Constant(value=0)
            SimmRotationDof r3: axis=(0 0 1)
              Value: Constant(value=0)
